Simulations: Version=193
  DataStore Database
    ExcelInput ObsAllData: FileNames=[ObsAllData.xlsx]; SheetNames=[ObsAllData]
    PredictedObserved: PredictedTableName=Report; ObservedTableName=ObsAllData; FieldNameUsedForMatch=SimulationName; FieldName2UsedForMatch=Clock.Today; AllColumns=false
  Folder Replacements
    Report: EventNames=[Clock].DoReport
      VariableNames:
        [Clock].Today
        [Lucerne].Arbitrator.N.Retranslocation
        [Lucerne].AboveGround.Wt
        [Lucerne].AboveGround.NConc
        [Lucerne].AboveGroundLive.N
        [Lucerne].AboveGroundLive.Wt
        [Lucerne].Leaf.CoverGreen
        [Lucerne].Leaf.CrudeProteinConc
        [Lucerne].Leaf.Dead.Wt
        [Lucerne].Leaf.MEConc
        [Lucerne].Leaf.Photosynthesis
        [Lucerne].Leaf.Fn
        [Lucerne].Leaf.Fw
        [Lucerne].Leaf.Height
        [Lucerne].Leaf.LAI
        [Lucerne].Leaf.Area
        [Lucerne].Leaf.Transpiration
        [Lucerne].Leaf.N
        [Lucerne].Leaf.Live.N
        [Lucerne].Leaf.NConc
        [Lucerne].Leaf.Live.Wt
        [Lucerne].Leaf.Wt
        [Lucerne].Leaf.NodeNumber
        [Lucerne].Leaf.BasalBuds.NodeNumber
        [Lucerne].Leaf.SenescenceRate
        [Lucerne].Leaf.Dead.Wt
        [Lucerne].Leaf.WaterDemand
        [Lucerne].Leaf.BasalBuds.LAI
        [Lucerne].Nodule.FixationRate
        [Lucerne].Nodule.FixationMetabolicCost
        [Lucerne].Phenology.CurrentPhase.Name
        [Lucerne].Phenology.CurrentStageName
        [Lucerne].Phenology.DaysAfterCutting
        [Lucerne].Phenology.BudsVisableDaysAfterCutting
        [Lucerne].Phenology.FloweringDaysAfterCutting
        [Lucerne].Phenology.Stage
        [Lucerne].Phenology.Photoperiod
        [Lucerne].Phenology.ThermalTimeAfterCutting
        [Lucerne].Phenology.AccumulatedTT
        [Lucerne].Phenology.AccumulatedEmergedTT
        [Lucerne].Population
        [Lucerne].Root.Dead.Wt
        [Lucerne].Root.Depth
        [Lucerne].Root.LengthDensity
        [Lucerne].Root.WaterTensionFactor
        [Lucerne].Root.Wt
        [Lucerne].Root.Wt
        [Lucerne].Root.Live.NConc
        [Lucerne].Root.MaintenanceRespiration
        [Lucerne].Root.NSupply
        [Lucerne].Root.SWUptakeLayered
        [Lucerne].Stem.CrudeProteinConc
        [Lucerne].Stem.Dead.Wt
        [Lucerne].Stem.MEConc
        [Lucerne].Stem.NConc
        [Lucerne].Stem.Live.Wt
        [Lucerne].Stem.Live.N
        [Lucerne].Stem.Wt
        [Lucerne].Stem.N
        [Lucerne].TapRoot.Wt
        [Lucerne].TapRoot.Live.Wt
        [Lucerne].TapRoot.N*10 as RootNWt
        [Lucerne].TapRoot.Live.N
        [Lucerne].TapRoot.Live.StorageN
        [Lucerne].TapRoot.Dead.Wt
        [Lucerne].TapRoot.Live.MetabolicN
        [Lucerne].TapRoot.Live.StorageNConc
        [Lucerne].TapRoot.NConc
        [Lucerne].TapRoot.Live.StorageWt
        [Lucerne].TapRoot.Live.StorageWt
        [Lucerne].TapRoot.Live.MetabolicWt
        [Lucerne].TapRoot.Live.StructuralWt
        [Lucerne].TapRoot.Live.StructuralWt
        [Lucerne].TapRoot.MaintenanceRespiration
        [Lucerne].TapRoot.RetranslocationWt
        [Lucerne].TapRoot.NRetranslocationFactor
        [lucerne].TapRoot.Senesced.Wt
        [Lucerne].TapRoot.StructuralFraction.FixedValue
        [Lucerne].TapRoot.Total.Wt
        [Soil].SoilWater.PAWmm
        sum([Soil].SoilWater.PAWmm)
        [Soil].SoilWater.Eo
        [Soil].SoilWater.Es
        [Soil].SoilWater.Runoff
        sum([Soil].SoilWater.Runoff)
        [Soil].Water.MM
        [Soil].Water.Volumetric
        [Soil].SoilWater.WaterTable
        [Soil].SoilWater.Drainage
        [Soil].SoilWater.LeachNO3
        sum([Soil].Water.MM)
        sum([Soil].NO3.kgha)
        (-1*[Lucerne].Root.NUptake)
        ([Lucerne].Leaf.Transpiration + [Soil].SoilWater.Es +[MicroClimate].PrecipitationInterception)
        [Weather].DaysSinceWinterSolstice
        [Weather].StartDate
        [Irrigation].IrrigationApplied
        [Phenology].Photoperiod
        [Phenology].DeltaPhotoperiod
        [Phenology].DaysAfterCutting
        //Dignose output
        [Leaf].SenescenceRate
        [Lucerne].Leaf.DMDemands.Structural
        [Lucerne].Leaf.DMDemands.Metabolic
        [Lucerne].Leaf.DMDemands.Storage
        [Lucerne].Leaf.NDemands.Structural
        [Lucerne].Leaf.NDemands.Metabolic
        [Lucerne].Leaf.NDemands.Storage
        [Lucerne].Stem.DMDemands.Structural
        [Lucerne].Stem.DMDemands.Metabolic
        [Lucerne].Stem.DMDemands.Storage
        [Lucerne].Stem.NDemands.Structural
        [Lucerne].Stem.NDemands.Metabolic
        [Lucerne].Stem.NDemands.Storage
        [Lucerne].TapRoot.DMDemands.Structural
        [Lucerne].TapRoot.DMDemands.Metabolic
        [Lucerne].TapRoot.DMDemands.Storage
        [Lucerne].TapRoot.NDemands.Structural
        [Lucerne].TapRoot.NDemands.Metabolic
        [Lucerne].TapRoot.NDemands.Storage
        [Lucerne].Root.DMDemands.Structural
        [Lucerne].Root.DMDemands.Metabolic
        [Lucerne].Root.DMDemands.Storage
        [Lucerne].Root.NDemands.Structural
        [Lucerne].Root.NDemands.Metabolic
        [Lucerne].Root.NDemands.Storage
        [Lucerne].Leaf.SLW_act
    Plant Lucerne: PlantType=Lucerne
      Memo References
        # The APSIM-NextGen Lucerne Model

        Xiumei Yang(1), Hamish Brown(1), Edmar Teixeira(1), Derrick Moot(2)

        -1 Plant & Food Research

        -2 Lincoln University

        ## History:
        The lucerne model is based on the APSIM classic v 7.10 (**Robertson et al 2002**) with calibration from **Moot et al 2015** and **Yang (2021) implementation within the Plant Modelling Framework **(Brown et al 2014)**.

        - Brown H et al. 2014. Plant modelling framework: software for building and running crop models on the APSIM platform. Environ. Model. Softw. 62:385-398. doi: 10.1016/j.envsoft.2014.09.005.

        - Moot DJ, Hargreaves J, Brown HE, Teixeira EI. 2015. Calibration of the APSIM-Lucerne model for ˜'Grasslands Kaituna' lucerne crops grown in New Zealand. New Zeal. J. Agric. Res. 58(2): 190-202.

        - Robertson MJ et al. 2002. Simulation of growth and development of diverse legume species in APSIM. Aust. J. Agric. Res. 53(4): 429-446. https://doi.org/10.1071/AR01106.

        - Yang, X. 2020. Modelling phenological development, yield and quality of lucerne (Medicago sativa L.) using APSIM next generation. PhD thesis, Lincoln University, Canterbury, New Zealand.

        - Yang X, Brown HE, Teixeira EI, Moot DJ 2021. Development of a lucerne model in APSIM next generation: 1 phenology and morphology of genotypes with different fall dormancies. European Journal of Agronomy 130, 126372.

        - Yang X, Brown HE, Teixeira EI, Moot DJ 2022. Development of a lucerne model in APSIM next generation: 2 canopy expansion and light interception of genotypes with different fall dormancy ratings. European Journal of Agronomy 139, 126570.

        - Yang X, Brown HE, Teixeira EI, Moot DJ 2023. Development of a lucerne model in APSIM next generation: 3 Biomass accumulation and partitioning for different fall dormancy ratings. European Journal of Agronomy 142, 126665.
      Memo Issues
        **Issues that require attention in this prototype:**

        - Node number estimates were unrealistically high - Action: Temporarily set BasalBudFactor to 0. FIXME: Factor logic needs revision if used [EIT March 2021]
        - Thresholds in NSE tests are low as model is not yet stable (raising them iterativelly as fits improve) [EIT March 2021]
        - Taproot maintenence respiration is negligible at the moment. Reason is that DMRetraslocation is doing nearly all of taproot seasonality - may need an optimisation of multiple parameters all together (RUEt, resp,retr)  [EIT March 2021]
        - Senescence of fine-roots (Root) is only partially implemented based on literature - no data available [EIT March 2021]
        - Leaf and Stem N% estimates had too narrow range compared to observed data - Action: Empirically constrained max/min N% based on allometry - FIXME: Arbitrator should capture N% decay dynamically [EIT March 2021]
        - LAI senesced is NOT being yet converted to biomass and discounted - some **BUG** that affects arbitration

        Developers:

        XY: Xiumei Yang

        HEB: Hamish Brown

        EIT: Edmar Teixeira
      OrganArbitrator Arbitrator
        Memo ArbitrationMethod
          FIXME: Add info here

          The arbitration method for **Biomass**, **Nitrogen** and **Water** for lucerne are the f
          following:

          ## Biomass arbitration

          text

          ## Nitrogen arbitration

          text

          ## Water arbitration

          text
        BiomassTypeArbitrator DMArbitration
          Folder PotentialPartitioningMethods
            ReallocationMethod
            AllocateFixationMethod
            RetranslocationMethod
            SendPotentialDMAllocationsMethod
          Folder AllocationMethods
            NutrientConstrainedAllocationMethod
            DryMatterAllocationsMethod
          RelativeAllocation ArbitrationMethod
        BiomassTypeArbitrator NArbitration
          Folder PotentialPartitioningMethods
            ReallocationMethod
          Folder ActualPartitioningMethods
            AllocateFixationMethod
            RetranslocationMethod
          Folder AllocationMethods
            NitrogenAllocationsMethod
          RelativeAllocation ArbitrationMethod
          AllocateUptakesMethod
        WaterUptakeMethod
        NitrogenUptakeMethod
      Phenology
        Memo PhenologyMethod
          ## Summary and details of current phenological stages and codes are:

          1 - Sowing

          2 - Germination

          3 - Emergence       (visible seedlings)

          4 - End of Juvenile (regrowth crops are re-set to this stage after defoliation)

          5 - Floral initiation (bud-visible stage)

          6 - Start Flowering  (visible early-flowers stage)

          7 -Start pod fill (not tested)

          8 - Maturity (not tested)

          9 - Ripenning (not tested)

          ## The phenological phases are:

          Juvenile: 3 to 4 (Reproductive development is not sensitive to photoperiod)

          Inductive: 4 to 5 (Reproductive development is sensitive to photoperiod)

          Induced: 5 to 6 (Reproductive development was induced)

          Flowering: 6 to 7

          Podfilling: 7 to 8

          Ripening: >8

          ## Observations:

          - Estimate for Flowering and Podfilling and Ripening of 1,500 oCd, which is not tested.

          ## References for phenology parameterisation

          - Moot, D.J., Brown, H.E., Teixeira, E.I., Pollock, K.M., others, 2003. Crop growth and development affect seasonal priorities for lucerne management. Legum. Dryl. pastures Proc. a New Zeal. Grassl. Assoc. Inc Symp. held Lincoln Univ.

          - Moot, D. J., Robertson, M. J. and Pollock, K. M. 2001. Validation of the APSIM-Lucerne model for phenological development in a cool-temperate climate. Presented at: Australian Agronomy Conference. Hobart. pp. 1-5.

          - Teixeira, E.I., Brown, H.E., Meenken, E.D., Moot, D.J., 2011. Growth and phenological development patterns differ between seedling and regrowth lucerne crops (Medicago sativa L.). Eur. J. Agron. 35, 47–55.

          - Yang, X., Brown, H. E., Teixeira, E. I. and Moot, D. J. 2021. Development of a lucerne model in APSIM next generation: 1 phenology and morphology of genotypes with different fall dormancies. European Journal of Agronomy, 130, 126372.
        SubDailyInterpolation ThermalTime: agregationMethod=0
          XYPairs Response: X=[1, 15, 30, 40]; Y=[0, 10, 25, 0]
          ThreeHourAirTemperature InterpolationMethod
          Memo ThermalTimeMethod
            Thermal-time reference:

            - Moot, D. J., Robertson, M. J. and Pollock, K. M. 2001. Validation of the APSIM-Lucerne model for phenological development in a cool-temperate climate. Presented at: Australian Agronomy Conference. Hobart. pp. 1-5.

            - Yang, X., Brown, H. E., Teixeira, E. I. and Moot, D. J. 2021. Development of a lucerne model in APSIM next generation: 1 phenology and morphology of genotypes with different fall dormancies. European Journal of Agronomy, 130, 126372.
        PhotoperiodFunction Photoperiod: Twilight=-6; DayLength=0
        PhotoperiodDeltaFunction DeltaPhotoperiod: Twilight=-6
        GerminatingPhase Germinating: Start=Sowing; End=Germination; IsEmerged=false
          Constant MinSoilTemperature: FixedValue=0
        EmergingPhase Emerging: Start=Germination; End=Emergence; IsEmerged=true; TTForTimeStep=0
          VariableReference Progression: VariableName=[Phenology].ThermalTime
          AddFunction Target
            Constant ShootLag: FixedValue=15
            MultiplyFunction DepthxRate
              VariableReference SowingDepth: VariableName=[Plant].SowingData.Depth
              Constant ShootRate: FixedValue=10
          Memo
            Lag phase before emergence starts (oCd)
            Emergence rate of seedling (oCd/mm)

            Reference:

            - Robertson MJ et al. 2002. Simulation of growth and development of diverse legume species in APSIM. Aust. J. Agric. Res. 53:429-446. https://doi.org/10.1071/AR01106.
        GenericPhase Juvenile: Start=Emergence; End=EndJuvenile; IsEmerged=true
          VariableReference Progression: VariableName=[Phenology].ThermalTime
          LinearInterpolationFunction Target
            XYPairs: X=[10, 14, 18]; Y=[521, 521, 90]
            VariableReference XValue: VariableName=[Phenology].Photoperiod
        GenericPhase Inductive: Start=EndJuvenile; End=FloralInitiation; IsEmerged=true
          VariableReference Progression: VariableName=[Phenology].ThermalTime
          LinearInterpolationFunction Target
            XYPairs: X=[10, 14, 18]; Y=[646, 265, 265]
            VariableReference XValue: VariableName=[Phenology].Photoperiod
        GenericPhase Induced: Start=FloralInitiation; End=StartFlowering; IsEmerged=true
          Constant Target: FixedValue=310; Units=oCd
          VariableReference Progression: VariableName=[Phenology].ThermalTime
        GenericPhase Flowering: Start=StartFlowering; End=StartPodfill; IsEmerged=true
          VariableReference Progression: VariableName=[Phenology].ThermalTime
          Constant Target: FixedValue=1500; Units=oCd
        GenericPhase Podfilling: Start=StartPodfill; End=Maturity; IsEmerged=true
          Constant Target: FixedValue=1500; Units=oCd
          VariableReference Progression: VariableName=[Phenology].ThermalTime
        GenericPhase Ripening: Start=Maturity; End=HarvestRipe; IsEmerged=true
          Constant Target: FixedValue=1500; Units=oCd
          VariableReference Progression: VariableName=[Phenology].ThermalTime
        EndPhase ReadyForHarvesting: Start=HarvestRipe; End=Unused; IsEmerged=true
          VariableReference Progression: VariableName=[Phenology].ThermalTime
        AccumulateFunction DaysAfterCutting: StartStageName=Emergence; EndStageName=HarvestRipe; FractionRemovedOnCut=1; FractionRemovedOnHarvest=1; FractionRemovedOnGraze=1; FractionRemovedOnPrune=1
          Constant: FixedValue=1; Units=days
        OnEventFunction FloweringDaysAfterCutting: SetEvent=StartFlowering; ReSetEvent=Harvesting
          Constant PreEventValue: FixedValue=0; Units=days
          VariableReference PostEventValue: VariableName=[Phenology].DaysAfterCutting
          Memo
            Days from cutting until next flowering. Variable is used to compare with observed data on days to flowering.
        AccumulateFunction ThermalTimeAfterCutting: StartStageName=Emergence; EndStageName=Maturity; FractionRemovedOnCut=1; FractionRemovedOnHarvest=1; FractionRemovedOnGraze=1; FractionRemovedOnPrune=1
          VariableReference ThermalTime: VariableName=[Phenology].ThermalTime
          Memo
            Thermal-time (oCd) from cutting until next flowering. Variable is used to compare with observed data on days to flowering.
        OnEventFunction BudsVisableDaysAfterCutting: SetEvent=FloralInitiation; ReSetEvent=Harvesting
          Constant PreEventValue: FixedValue=0; Units=days
          VariableReference PostEventValue: VariableName=[Phenology].DaysAfterCutting
          Memo
            Days from cutting until next bud visible stage. Variable is used to compare with observed data.
        AccumulateFunction ThermalTimeAfterFlowering: StartStageName=StartFlowering; EndStageName=Maturity; FractionRemovedOnCut=1; FractionRemovedOnHarvest=1; FractionRemovedOnGraze=1; FractionRemovedOnPrune=1
          VariableReference ThermalTime: VariableName=[Phenology].ThermalTime
          Memo
            Thermal-time accumulation from Flowering until next harvest (oCd).
        AccumulateResetAtStage ThermalTimeAfterBudsVisible: ResetStageName=FloralInitiation
          VariableReference ThermalTime: VariableName=[Phenology].ThermalTime
          Memo
            Thermal-time accumulation from bud-visible until next harvest (oCd).
      Constant MortalityRate: FixedValue=0; Units=fractional (/day) - FIXME
      Root: GrowthRespiration=0; MaintenanceRespiration=0
        Memo 01_FineRootWaterUptake
          Root water uptake has no effects considered for:

          - KL

          - Temperature effect

          - FIXME: What is RootShape doing?

          ## References for parameterisation
        RootShapeCylinder RootShape
        LinearInterpolationFunction KLModifier
          XYPairs: X=[0, 3]; Y=[1, 1]
          VariableReference XValue: VariableName=[Leaf].LAI
          Memo
            FIXME: Document needed.
        SubDailyInterpolation TemperatureEffect: agregationMethod=0
          XYPairs Response: X=[0, 26, 35]; Y=[1, 1, 1]
          ThreeHourAirTemperature InterpolationMethod
          Memo
            FIXME: Document needed.
        PhaseLookup RootFrontVelocity
          PhaseLookupValue PreEmergence: Start=Germination; End=Emergence
            Constant Function: FixedValue=3; Units=mm/day
          PhaseLookupValue early: Start=Emergence; End=StartFlowering
            Constant Function: FixedValue=15; Units=mm/day
          PhaseLookupValue late: Start=StartFlowering; End=Maturity
            Constant Function: FixedValue=17; Units=mm/day
          Memo
            **RootFrontVelocity** value from

            FIXME: NEED reference for values

            - Needs documentation on processes affected.

            Known references (with different values from water front velocity - not **measured root front**):

            **10 mm/day (estimated)** Teixeira EI et al. 2018. Field estimation of water extraction coefficients with APSIM-Slurp for water uptake assessments in perennial forages. F. Crop. Res. 222:26-38. doi: 10.1016/j.fcr.2018.03.011.

            **14 to 33 mm/day (measured)** Sim RE, Brown HE, Teixeira EI, Moot DJ. 2017. Soil water extraction patterns of lucerne grown on stony soils. Plant Soil. 414:95-112. doi: 10.1007/s11104-016-3112-x.
        Constant MaximumRootDepth: FixedValue=1000000; Units=mm (FIXME)
        Constant RootDepthStressFactor: FixedValue=1; Units=1 is no stress FIXME: check logic here
        Memo 02_FineRootBiomass
          **InitialWt** is initial plant weight minus initial leaf weight (assumes leaf/root only for seedlings)

          FIXME: What is the purpose of KNO3 and KNH4??? ... which units /day/ppm from code?

          ## References:

          **MaxDailyNUptake** needs reference (FIXME)

          **RootFrontVelocity** value from

          **MaximumNConc** from

          **MinimumNConc** from

          FIXME: What about taproot wt in initial weight?
        NutrientPoolFunctions InitialWt
          MultiplyFunction Structural
            VariableReference InitialWeightPerPlant: VariableName=[Leaf].InitialWt.InitialWeightPerPlant
            SubtractFunction RootProportion
              Constant One: FixedValue=1; Units=100% of initial weight
              VariableReference LeafProportion: VariableName=[Leaf].InitialWt.LeafProportion
              VariableReference StemProportion: VariableName=[Stem].InitialWt.Structural.StemProportion
          Constant Metabolic: FixedValue=0; Units=g/m2
          Constant Storage: FixedValue=0; Units=g/m2
        Constant SpecificRootLength: FixedValue=40; Units=m/g
          Memo
            **Specific Root Length** value is aproximate upper limit from:  He H et al. 2017. Growth, morphological and physiological responses of alfalfa (Medicago sativa) to phosphorus supply in two alkaline soils. Plant Soil. 416:565-584. doi: 10.1007/s11104-017-3242-9.
        PhaseLookupValue NitrogenDemandSwitch: Start=Emergence; End=Maturity
          Memo
            - This is setting N storage in the organ to ZERO. i.e. not a storage organ.
          Constant: FixedValue=1; Units=Switch: 0 (off) and 1 (on)
        BiomassRemoval BiomassRemovalDefaults: HarvestFractionLiveToRemove=0.3; HarvestFractionDeadToRemove=0; HarvestFractionLiveToResidue=0.3; HarvestFractionDeadToResidue=0
        Constant DMConversionEfficiency: FixedValue=1; Units=FIXME: What's the unit?
        Constant RemobilisationCost: FixedValue=0; Units=FIXME: What's the unit?
        Constant CarbonConcentration: FixedValue=0.4; Units=g C/g dry matter
        NutrientDemandFunctions DMDemands
          PartitionFractionDemandFunction Structural
            Constant PartitionFraction: FixedValue=0.1; Units=FIXME fractional of what?
            Memo ReferenceNeeded
              Simplified from previous prototype with a PhaseLookup to have a constant 10% (where is this value coming from?).

              **FIXME:** Requires reference and meaning
          Constant Storage: FixedValue=0; Units=FIXME:what's the unit?
          Constant Metabolic: FixedValue=0; Units=FIXME:what's the unit?
          Constant QStructuralPriority: FixedValue=1
          Constant QMetabolicPriority: FixedValue=1
          Constant QStoragePriority: FixedValue=1
          Memo ReferenceNeeded
            DMDemands are in **g DM/m2 per day**

            FIXME: What are the Q parameters doing?
        MultiplyFunction SenescenceRate
          Constant Switch: FixedValue=1; Units=0 is off and 1 is on (for testing fine-root respiration)
          Constant MaxSenescRate: FixedValue=0.028; Units=/day
          LinearInterpolationFunction TempEff_root
            SoilTemperatureDepthFunction: Depth=100
            XYPairs: X=[0, 20, 30, 45, 50]; Y=[0, 0.25, 0.5, 1, 0.2]
            VariableReference XValue
              VariableName=[Root].SenescenceRate.TempEff_root.SoilTemperatureDepthFunction
          LinearInterpolationFunction ChoEff_root
            XYPairs: X=[0, 0.04, 0.2, 0.3]; Y=[1, 1, 1, 1]
            DivideFunction XValue
              VariableReference STG: VariableName=[Root].Live.StorageWt
              VariableReference LIVE: VariableName=[Root].Live.Wt
          Memo
            ## Reference

            Note: First attempt to have some seasonnal dynamics of fine-roots, no data available for testing so based only in Luo et al 1995 at this initial stage.

            https://www.sciencedirect.com/science/article/pii/037842909400090Y

            Y.Luo; P.A.Meyerhoff; R.S.Loomis (1995) Seasonal patterns and vertical distributions of fine roots of alfalfa (Medicago sativa L.).Field Crops Research
            Volume 40, Issue 2, February 1995, Pages 119-127

            0.0012/h (page 122) converts into 0.028/day of MaxSenescRate

            Temp_Eff_root is effect of temperature from Figure 2 panel D

            ChoEff_root is effect of soluble CHOs from Figure 2 Panel C - This is not functional yet.

            Some sensible patterns checked:

            - Temperature adjusted turnover rates were assumed sensible if around 1%/day
            - Seasonality with lowest amounts in summer
            - Total amounts (1.5 m depth) from 1 to 3 t DM/ha

            based on Reid, J., Gray, R., Springett, J. and Crush, J. (2015), Root turnover in pasture species: chicory, lucerne, perennial ryegrass and white clover. Ann Appl Biol, 167: 327-342. doi:10.1111/aab.12228

            https://onlinelibrary.wiley.com/doi/abs/10.1111/aab.12228

            FIXME: Need data and suggested that parameters are estimated by optmising [RUEtot + Resp + Translocation] in relation to [Shoot + Root]

            - We do not have data to test that for fine-roots in New Zealand
        MultiplyFunction MaintenanceRespirationFunction
          Constant Switch: FixedValue=0; Units=FIXME off at the moment
          LinearInterpolationFunction BaseRespirationCoefficient
            XYPairs: X=[10.5, 16.5]; Y=[0.005, 0.005]
            VariableReference XValue: VariableName=[Phenology].Photoperiod
          ExpressionFunction Q10TempAdj: Expression=Q10^ExpTempAdj
            Constant Q10: FixedValue=1.8
            DivideFunction ExpTempAdj
              SubtractFunction
                SoilTemperatureDepthFunction: Depth=100
                Constant: FixedValue=20
              Constant: FixedValue=10
          Memo Description
            Indexes from Xiumei Yang PhD Lincoln University 2021: Base resp coeff is assumed "zero" here as senescence is doing nearly all seasonality of taproots as per Xiumei's 2021 approach.

            The Q10 part is at:Modelling respiration of vegetation: evidence for a general temperature-dependent Q10. Global Change Biology (2001) 7, 223-230. https://onlinelibrary.wiley.com/doi/epdf/10.1046/j.1365-2486.2001.00397.x

            FIXME: Suggested that parameters are estimated by optmising [RUEtot + Resp + Translocation] in relation to [Shoot + Root]
        Memo 03_FineRootNitrogenContent
          FIXME: Need references

          - Critical N was assumed to be set as Minimum to simplify model
          - This ensures growth is not limited by N supply.
          - There is no data available in NZ to test data.
        Constant MaximumNConc: FixedValue=0.01; Units=g/g
        Constant MinimumNConc: FixedValue=0.005; Units=g/g
        VariableReference CriticalNConc: VariableName=[Root].MinimumNConc
        Memo 04_FineRootNitrogenUptake
          FIXME: Needs refs
        NutrientDemandFunctions NDemands
          MultiplyFunction Structural
            VariableReference MinNconc: VariableName=[Root].minimumNconc
            VariableReference PotentialDMAllocation: VariableName=[Root].potentialDMAllocation.Structural
          MultiplyFunction Metabolic
            SubtractFunction MetabolicNconc
              VariableReference CritNconc: VariableName=[Root].criticalNConc
              VariableReference MinNconc: VariableName=[Root].minimumNconc
            VariableReference PotentialDMAllocation: VariableName=[Root].potentialDMAllocation.Structural
          StorageNDemandFunction Storage
            VariableReference NitrogenDemandSwitch: VariableName=[Root].nitrogenDemandSwitch
            VariableReference MaxNconc: VariableName=[Root].maximumNconc
          Constant QStructuralPriority: FixedValue=1; Units=FIXME
          Constant QMetabolicPriority: FixedValue=1
          Constant QStoragePriority: FixedValue=1
        LinearInterpolationFunction NUptakeSWFactor
          XYPairs: X=[0, 1]; Y=[0, 1]
          VariableReference XValue: VariableName=[Root].RWC
          Memo
            N uptake is reduced by RWC (0-1; relative water content; ie fraction between LL15 and DUL) by **NUptakeSWFactor**

            FIXME: Is this integrated across all layers where roots are?
            How is **NUptakeSWFactor** applied?
        LinearInterpolationFunction KNO3
          XYPairs: X=[0, 0.003]; Y=[0.02, 0.02]
          VariableReference XValue: VariableName=[Root].LengthDensity
          Memo
            FIXME: What's this for and which units?
        LinearInterpolationFunction KNH4
          XYPairs: X=[0, 0.003]; Y=[0, 0]
          VariableReference XValue: VariableName=[Root].LengthDensity
        Constant MaxDailyNUptake: FixedValue=6; Units=FIXME: what's the unit? g N/ha per day ?
      Nodule
        Memo
          FIXME: References and Units for nodule parameterisation please

          Assumes N fixation in nodules is proportitional to photosynthesis.

          Vance, C. P. et al. (1979) ˜Nitrogen fixation, nodule development, and vegetative regrowth of Alfalfa (Medicago sativa L. ), Plant Physiology. Thimann Lab., California Univ., Santa Cruz, CA 95064, USA., 64, pp. 1-8.
        Constant FixationMetabolicCost: FixedValue=0
        Constant DMDemandFunction: FixedValue=0.01
        Constant MaximumNConc: FixedValue=0.02
        Constant MinimumNConc: FixedValue=0.01
        Constant SenescenceRate: FixedValue=0
        Constant NReallocationFactor: FixedValue=0
        PhaseLookupValue NitrogenDemandSwitch: Start=Emergence; End=Maturity
          Constant: FixedValue=1
        BiomassRemoval BiomassRemovalDefaults: HarvestFractionLiveToRemove=0.5; HarvestFractionDeadToRemove=0; HarvestFractionLiveToResidue=0.1; HarvestFractionDeadToResidue=0
        Constant StructuralFraction: FixedValue=1; Units=g/g
        Constant InitialWtFunction: FixedValue=0; Units=g/m^2
        Constant DetachmentRateFunction: FixedValue=0; Units=/d
        Constant MaintenanceRespirationFunction: FixedValue=0; Units=0-1
        Constant DMConversionEfficiency: FixedValue=1; Units=0-1
        MultiplyFunction FixationRate
          Constant FixationCoefficiency: FixedValue=0.022; Units=fractional
          VariableReference: VariableName=[Leaf].Photosynthesis
          Memo
            Fixation unit: g N /m2 per day
            Coefficient is a fraction of daily biomass growth from total RUE.

            Reference:

            - Yang, X. 2020. Modelling phenological development, yield and quality of lucerne (Medicago sativa L.) using APSIM next generation. PhD thesis, Lincoln University, Canterbury, New Zealand.
          LinearInterpolationFunction RegrowthEffect
            XYPairs: X=[0, 200, 350]; Y=[0.5, 1, 1]
            VariableReference XValue: VariableName=[Phenology].ThermalTimeAfterCutting
        Constant NRetranslocationFactor: FixedValue=0
        Constant DMReallocationFactor: FixedValue=0
        Constant DMRetranslocationFactor: FixedValue=0
        VariableReference CriticalNConc: VariableName=[Nodule].MinimumNConc
        Constant RemobilisationCost: FixedValue=0
        Constant CarbonConcentration: FixedValue=0.4
        NutrientPoolFunctions DMDemands
          Constant Structural: FixedValue=0.01
          Constant Storage: FixedValue=0
          Constant Metabolic: FixedValue=0
        NutrientPoolFunctions NDemands
          MultiplyFunction Structural
            VariableReference MinNconc: VariableName=[Nodule].minimumNconc
            VariableReference PotentialDMAllocation: VariableName=[Nodule].potentialDMAllocation.Structural
          MultiplyFunction Metabolic
            SubtractFunction MetabolicNconc
              VariableReference CritNconc: VariableName=[Nodule].criticalNConc
              VariableReference MinNconc: VariableName=[Nodule].minimumNconc
            VariableReference PotentialDMAllocation: VariableName=[Nodule].potentialDMAllocation.Structural
          StorageNDemandFunction Storage
            VariableReference NitrogenDemandSwitch: VariableName=[Nodule].nitrogenDemandSwitch
            VariableReference MaxNconc: VariableName=[Nodule].maximumNconc
      SimpleLeaf Leaf: Albedo=0.25; Gsmax350=0.006; R50=175; LeafInitialisationStage=Emergence; Height=0; BaseHeight=0; Width=0; FRGR=0; PotentialEP=0; WaterDemand=0; KDead=0; LAIDead=0
        RUEModel Photosynthesis
          Memo 00_photosynthesis
            Radiation use efficiency (RUEtotal) for total DM (DMtotal; shoot plus toproot biomass) was calculated from the linear regression of DMtotal against accumulated intercepted radiation for each regrowth cycle, where the slope of the linear regression represents RUEtotal. The calculated values for RUEtotal were then used to develop the function of RUEtotal in response to mean air temperature.

            Reference:

            - Yang X, Brown HE, Teixeira EI, Moot DJ 2023. Development of a lucerne model in APSIM next generation: 3 Biomass accumulation and partitioning for different fall dormancy ratings. European Journal of Agronomy 142: 126665.
          Constant RUE: FixedValue=1.6; Units=g DM/MJ global solar radiation intercepted
            Memo
              Radiation Use Efficiency considering "total biomass" (above and  belowground) and temperature adjustment coefficients from:

               - Brown et al 2006. European Journal of Agronomy Volume 25, Issue 4, November 2006, Pages 319-327

              Water-stress RUE adjustment from:

              - Brown, H.E., Moot, D.J., Fletcher, A.L., Jamieson, P.D., 2009. A framework for quantifying water extraction and water stress responses of perennial lucerne. Crop Pasture Sci. 60, 785–794. https://doi.org/http://dx.doi.org/10.1071/CP08415

              FIXME: Triple-check the water-stress on RUE and Canopy

              Currently, no effect of vapour pressure deficit (FVPD) or limited N supply are considered (FN)
          WeightedTemperatureFunction FT: MaximumTemperatureWeighting=0.5
            XYPairs: X=[0, 18, 30, 40]; Y=[0, 1, 1, 0]
          LinearInterpolationFunction FW
            XYPairs: X=[0, 0.15, 0.75, 0.9]; Y=[0, 0.4, 0.75, 1]
            VariableReference XValue: VariableName=[Leaf].Fw
          RUECO2Function FCO2: PhotosyntheticPathway=C3
          VariableReference RadnInt: VariableName=[Leaf].RadiationIntercepted
          Constant FVPD: FixedValue=1; Units=fractional
          Constant FN: FixedValue=1; Units=fractional
        Constant StomatalConductanceCO2Modifier: FixedValue=1; Units=fractional
        Memo 01_LeafArea
          Empirical parameterisation of lucerne LAI with the "simple leaf" class.

          **Context:**

          - This is a first step towards a "simple leaf" LAI model that is still empirical without representing individual leaves and canopy components.
          - The **Leaf Area** node in simple leaf is same as **LAI (m2 leaf/m2 soil)**
          - LeafArea is accumulating daily fractions of LAI **(DeltaLAI)** and subtracting it from Senescence (**SenFracLAI**) and frost damage (**FrostDeath**)

          **Assumptions:**

          - Plant population is optimum for canopy expansion (i.e. plants x shoots/plant x branches/shoot x leaves/shoot or branch compensate to potential rates)

          - Other empirical adjustment factors minimise LAI expansion rates to **actual** values by simple fractional adjustments.
        AddFunction Area
          MultiplyFunction Area
            VariableReference SLA: VariableName=[Leaf].SpecificArea
              VariableReference Population: VariableName=[Plant].SowingData.Population
              Constant AreaPerPlant: FixedValue=0.0005
            VariableReference LeafWt: VariableName=[Leaf].Live.Wt
          AccumulateFunction BasalBudArea: StartStageName=Emergence; EndStageName=Maturity; FractionRemovedOnCut=1; FractionRemovedOnHarvest=1; FractionRemovedOnGraze=1; FractionRemovedOnPrune=1
            LessThanFunction BasalBudLAI
              VariableReference DaysAfterCutting: VariableName=[Phenology].DaysAfterCutting
              Constant Two: FixedValue=2
              VariableReference BasalBudLAIAtCutting: VariableName=[BasalBuds].LAI
              Constant Zero: FixedValue=0
        LinearInterpolationFunction SpecificArea
          XYPairs: X=[0.001, 0.5, 7]; Y=[0.021, 0.022, 0.035]
          VariableReference XValue: VariableName=[Leaf].LAI
        MultiplyFunction DeltaLAI
          MultiplyFunction PotDeltaLAI
            Constant LaiPerNodeMax: FixedValue=0.58; Units=DeltaLAI/node
            VariableReference DeltaNodeToday: VariableName=[Leaf].NodeNumber.DeltaNode
            LinearInterpolationFunction DeltaLAIPerNodePosAdj
              XYPairs: X=[0, 3, 5, 9, 20]; Y=[0, 0.3, 1, 1, 0.2]
              VariableReference XValue: VariableName=[Lucerne].Leaf.NodeNumber
            LessThanFunction LeafSizeSeasonAdj
              VariableReference DeltaPhotoperiod: VariableName=[Phenology].DeltaPhotoperiod
              Constant Zero: FixedValue=0
              LinearInterpolationFunction Decreasing
                XYPairs: X=[10, 16.5]; Y=[0.8, 1]
                VariableReference XValue: VariableName=[Phenology].Photoperiod
              LinearInterpolationFunction Increasing
                XYPairs: X=[10, 16.5]; Y=[0.5, 1]
                VariableReference XValue: VariableName=[Phenology].Photoperiod
            LinearInterpolationFunction PopulationAdj
              XYPairs: X=[0, 400]; Y=[0.001, 1]
              VariableReference XValue: VariableName=[Lucerne].Population
          LinearInterpolationFunction WaterStressLAI
            XYPairs: X=[0, 0.5, 0.9, 1]; Y=[0, 0.4, 0.8, 1]
            VariableReference XValue: VariableName=[Lucerne].Root.WaterTensionFactor
        ProtectedDivideFunction SLW_act: NumeratorErrVal=0; DenominatorErrVal=0
          VariableReference LeafWeight_gM2: VariableName=[Leaf].Wt
          VariableReference LeafArea_m2m2: VariableName=[Leaf].LAI
        AccumulateFunction NodeNumber: StartStageName=Emergence; EndStageName=Maturity; FractionRemovedOnCut=1; FractionRemovedOnHarvest=1; FractionRemovedOnGraze=1; FractionRemovedOnPrune=0
          VariableReference BasalBudNode: VariableName=[BasalBuds].NodeNumber
          MultiplyFunction DeltaNode
            DivideFunction DeltaNodePot
              VariableReference ThermalTime: VariableName=[Phenology].ThermalTime
              PhaseLookup Phyllochron
                PhaseLookupValue Juvenile: Start=Emergence; End=EndJuvenile
                  Constant: FixedValue=55; Units=oCd/leaf
                PhaseLookupValue Vegetative: Start=EndJuvenile; End=StartFlowering
                  LessThanFunction Phyllochron
                    VariableReference DeltaPhotoperiod: VariableName=[Phenology].DeltaPhotoperiod
                    Constant Zero: FixedValue=0
                    LinearInterpolationFunction Decreasing
                      XYPairs: X=[10, 16.5]; Y=[49, 35]
                      VariableReference XValue: VariableName=[Phenology].Photoperiod
                    LinearInterpolationFunction Increasing
                      XYPairs: X=[10, 12, 16.5]; Y=[49, 31, 31]
                      VariableReference XValue: VariableName=[Phenology].Photoperiod
                PhaseLookupValue Reproductive: Start=StartFlowering; End=Maturity
                  LinearInterpolationFunction Phyllochron
                    XYPairs: X=[12, 16]; Y=[69, 69]
                    VariableReference XValue: VariableName=[Phenology].Photoperiod
                Memo
                  **Phyllochron coefficients** from

                  - Brown HE, Moot DJ, Teixeira EI. 2005. The components of lucerne (Medicago sativa) leaf area index respond to temperature and photoperiod in a temperate climate. Eur. J. Agron. 23:348–358. doi: 10.1016/j.eja.2005.02.001.

                  - Teixeira EI, Moot DJ, Pollock KM, Brown HE, Pollock KM. 2007. How does defoliation management affect yield, canopy forming processes and light interception in lucerne (Medicago sativa L.) crops? Eur. J. Agron. 27:154–164. doi: 10.1016/j.eja.2007.03.001.

                  - Ta, H. T. 2018. Growth and development of lucerne with different fall dormancy ratings. PhD thesis, Lincoln University, Canterbury, New Zealand.

                  - Yang, X. 2020. Modelling phenological development, yield and quality of lucerne (Medicago sativa L.) using APSIM next generation. PhD thesis, Lincoln University, Canterbury, New Zealand.

                  - Yang, X., Brown, H. E., Teixeira, E. I. and Moot, D. J. 2021. Development of a lucerne model in APSIM next generation: 1 phenology and morphology of genotypes with different fall dormancies. European Journal of Agronomy, 130, 126372.
            LinearInterpolationFunction WaterStressNode
              XYPairs: X=[0, 0.5, 1]; Y=[0, 0.3, 1]
              VariableReference XValue: VariableName=[Lucerne].Leaf.Fw
          MultiplyFunction FrostDeath
            VariableReference NodeNumber: VariableName=[Leaf].NodeNumber
            VariableReference FrostFraction: VariableName=[Leaf].FrostFraction
            Constant: FixedValue=-1
        BasialBuds BasalBuds: ResetStageName=FloralInitiation; NodeNumber=0; LAI=0
          PhaseLookup DeltaLAI
            Memo Description
              FIXME: The logic here is having basal buds contributing to LAI already before cutting.

              This was turned-off due to accumulating unrealistically large numbers of nodes given simple leaf DeltaLAI initial logic. Will be re-evaluated later.

              Note BasalBudFactor = 0
            PhaseLookupValue: Start=FloralInitiation; End=Maturity
              MultiplyFunction
                VariableReference DeltaLAI: VariableName=[Leaf].DeltaLAI
                Constant BasalBudFactor: FixedValue=0; Units=basal bud LAI per main stem LAI
          PhaseLookup DeltaNodeNumber
            PhaseLookupValue: Start=StartFlowering; End=Maturity
              MultiplyFunction
                VariableReference: VariableName=[Leaf].NodeNumber.DeltaNode
                Constant BasalBudFactor: FixedValue=0; Units=basal bud node per main stem node
          Memo Description
            FIXME: Note, opted to set both "BasalBudFactor" coefficients to zero (i.e. turned off) as these were causing unrealistically high estimates of node number. Needs revision of logic + refs if opted to be used.
        LessThanFunction FrostFraction
          VariableReference DeltaPhotoperiod: VariableName=[Phenology].DeltaPhotoperiod
          Constant Zero: FixedValue=0
          LinearInterpolationFunction Decreasing
            XYPairs: X=[-15, -5]; Y=[1, 0]
            VariableReference XValue: VariableName=[Weather].MinT
          LinearInterpolationFunction Increasing
            XYPairs: X=[-10, -5]; Y=[1, 0]
            VariableReference XValue: VariableName=[Weather].MinT
          Memo
            Spring leaves have higher nutrient concentration and therefire assumed to be more resilient to frost damaged.

            FIXME: Check parameters and add References
        MinimumFunction FRGR
          SubDailyInterpolation FRGRFunctionTemp: agregationMethod=0
            XYPairs Response: X=[0, 10, 25, 40]; Y=[0, 1, 1, 0]
            ThreeHourAirTemperature InterpolationMethod
          Memo
            FIXME: What is this for?
        Constant ExtinctionCoefficient: FixedValue=0.81; Units=fractional
          Memo
            **Extinction coefficient** from

            - Brown HE, Moot DJ, Teixeira EI. 2005. The components of lucerne (Medicago sativa) leaf area index respond to temperature and photoperiod in a temperate climate. Eur. J. Agron. 23:348–358. doi: 10.1016/j.eja.2005.02.001.

            - Teixeira EI, Moot DJ, Pollock KM, Brown HE, Pollock KM. 2007. How does defoliation management affect yield, canopy forming processes and light interception in lucerne (Medicago sativa L.) crops? Eur. J. Agron. 27:154–164. doi: 10.1016/j.eja.2007.03.001.

            - Ta, H. T. 2018. Growth and development of lucerne with different fall dormancy ratings. PhD thesis, Lincoln University, Canterbury, New Zealand.

            - Yang, X. 2020. Modelling phenological development, yield and quality of lucerne (Medicago sativa L.) using APSIM next generation. PhD thesis, Lincoln University, Canterbury, New Zealand.
        BiomassRemoval BiomassRemovalDefaults: HarvestFractionLiveToRemove=0; HarvestFractionDeadToRemove=0; HarvestFractionLiveToResidue=0.3; HarvestFractionDeadToResidue=0
        MultiplyFunction HeightFunction
          AccumulateFunction Tallness: StartStageName=Emergence; EndStageName=StartPodfill; FractionRemovedOnCut=1; FractionRemovedOnHarvest=1; FractionRemovedOnGraze=1; FractionRemovedOnPrune=1
            MultiplyFunction Height
              DivideFunction DeltaHeight
                VariableReference ThermalTime: VariableName=[Phenology].ThermalTime
                PhaseLookup Heightchron
                  PhaseLookupValue Juvenile: Start=Emergence; End=EndJuvenile
                    Constant: FixedValue=3
                  PhaseLookupValue Vegetative: Start=EndJuvenile; End=StartFlowering
                    MultiplyFunction Heightchron
                      ExponentialFunction Heightchron: A=0.8; B=217123; C=-1.09
                        VariableReference XValue: VariableName=[Phenology].Photoperiod
                  PhaseLookupValue Reproductive: Start=StartFlowering; End=Maturity
                    LinearInterpolationFunction Heightchron
                      XYPairs: X=[12, 16]; Y=[2.2, 1.8]
                      VariableReference XValue: VariableName=[Phenology].Photoperiod
              MultiplyFunction WaterStress
                LinearInterpolationFunction WaterStressHeight
                  XYPairs: X=[0, 0.5, 1]; Y=[0, 0.2, 1]
                  VariableReference XValue: VariableName=[Lucerne].Leaf.Fw
              MultiplyFunction NFactor
                LinearInterpolationFunction NFactor
                  XYPairs: X=[0, 1.5]; Y=[1, 1]
                  VariableReference XValue: VariableName=[Lucerne].TapRoot.RetranslocationWt
            MultiplyFunction FrostDeath
              VariableReference Height: VariableName=[Leaf].Height
              VariableReference FrostFraction: VariableName=[Leaf].FrostFraction
              Constant: FixedValue=-1
          Memo
            Reference:

            - Yang, X. 2020. Modelling phenological development, yield and quality of lucerne (Medicago sativa L.) using APSIM next generation. PhD thesis, Lincoln University, Canterbury, New Zealand.

            - Yang, X., Brown, H. E., Teixeira, E. I. and Moot, D. J. 2021. Development of a lucerne model in APSIM next generation: 1 phenology and morphology of genotypes with different fall dormancies. European Journal of Agronomy, 130, 126372.
            Memo
              Reference:

              - Yang, X. 2020. Modelling phenological development, yield and quality of lucerne (Medicago sativa L.) using APSIM next generation. PhD thesis, Lincoln University, Canterbury, New Zealand.

              - Yang, X., Brown, H. E., Teixeira, E. I. and Moot, D. J. 2021. Development of a lucerne model in APSIM next generation: 1 phenology and morphology of genotypes with different fall dormancies. European Journal of Agronomy, 130, 126372.
        Constant DetachmentRate: FixedValue=0.1; Units=/d
        Constant StructuralFraction: FixedValue=1; Units=0-1
        Memo 03_LeafBiomass
          **This needs revision and references please**

          Unit od DMDemands is: **g DM/ha per day**

          1. Leaf has only **Structural** tissue in this logic
          2. DM demand of leaf is assumed a **curvilinear response to LAI** (i.e. so assumes Specific Leaf Weight (SLW implicitly)
          3. Initial plant weight is assumed as **33% leaf (needs ref)**

          **This logic and parameterisation reuires further documentation**

          - Leaf is 100% Structural biomass because ....
          - Leaf biomass demand is set based on LAI expansion (i.e. assumes SLW? then?)
          - 100% of leaf N is available to other organs after sensecence **NRealalocation = 1**
          - 0% N in storage **NRetrsnslocation = 0**
        MultiplyFunction InitialWt
          VariableReference PlantPopulation: VariableName=[Lucerne].Population
          DivideFunction InitialWeightPerPlant
            Constant ThousendSeedWeight: FixedValue=2; Units=g/1000 seeds
              Memo
                **Thousand seed weight** is upper limit from:

                - Askarian M, Hampton JG, Hill MJ. 1995. Effect of row spacing and sowing rate on seed production of lucerne (Medicago sativa L.) cv. Grasslands Oranga. New Zeal. J. Agric. Res. 38:289–295. doi: 10.1080/00288233.1995.9513129.

                - StanisavljeviÄ‡ R et al. 2012. Influence of plant density on yield components, yield and quality of seed and forage yields of alfalfa varieties. Rom. Agric. Res. 29.
            Constant Thousend: FixedValue=1000; Units=seeds
          Constant LeafProportion: FixedValue=0.33; Units=initial leaf proportion per total biomass
          Memo
            FIXME: add reference and check parameterization.
        MinimumFunction SenescenceRate
          AddFunction SenescenceRate
            LinearInterpolationFunction AgeSenescence
              XYPairs: X=[0, 10, 15]; Y=[0, 0, 0.008]
              VariableReference XValue: VariableName=[Lucerne].Leaf.NodeNumber
            LinearInterpolationFunction ShadeSenescence
              XYPairs: X=[0, 5, 5.5]; Y=[0, 0, 0.01]
              VariableReference XValue: VariableName=[Lucerne].Leaf.LAI
            LessThanFunction FrostFraction
              VariableReference DeltaPhotoperiod: VariableName=[Phenology].DeltaPhotoperiod
              Constant Zero: FixedValue=0
              LinearInterpolationFunction Decreasing
                XYPairs: X=[-15, -5]; Y=[0, 0]
                VariableReference XValue: VariableName=[Weather].MinT
              LinearInterpolationFunction Increasing
                XYPairs: X=[-10, -5]; Y=[0, 0]
                VariableReference XValue: VariableName=[Weather].MinT
              Memo
                Spring leaves have higher nutrient concentration and therefire assumed to be more resilient to frost damaged.

                FIXME: Check parameters and add References
          Constant One: FixedValue=1
        NutrientDemandFunctions DMDemands
          DivideFunction Structural
            VariableReference DeltaLAI: VariableName=[Leaf].DeltaLAI
            VariableReference SpecificArea: VariableName=[Leaf].SpecificArea
          Constant Storage: FixedValue=0; Units=g/m2 per day
          Constant Metabolic: FixedValue=0; Units=g/m2 per day
          Constant QStructuralPriority: FixedValue=1
          Constant QMetabolicPriority: FixedValue=1
          Constant QStoragePriority: FixedValue=1
        Constant MaintenanceRespiration: FixedValue=0; Units=0-1
        Constant LaiDead: FixedValue=0; Units=m^2/m^2
        Constant DMConversionEfficiency: FixedValue=1; Units=0-1
        Constant DMReallocationFactor: FixedValue=0; Units=FIXME: unit please
        Constant DMRetranslocationFactor: FixedValue=0; Units=FIXME: unit please
        Constant RemobilisationCost: FixedValue=0; Units=FIXME: unit please
        Constant CarbonConcentration: FixedValue=0.4; Units=g C/g biomass
        Memo 04_LeafNitrogen
          ## Leaf Nitrogen dynamics

          **NDemand** is in **g N/m2 per day**

          - 100% of leaf N is available to other organs after sensecence **NRealalocation = 1**
          - 0% N in storage **NRetrsnslocation = 0**

          - Maximum leaf N% is parameterised based on empirical data from Lincoln University and aligned with Lemaire et al 1992 allometric "slow" decay with above-ground biomass.
          - Critical and Minimum N% are assumed as fractions of maximum N% at a given above-ground biomass

          Lemaire, G., Khaiti, M., Onillon, B., Allirand, J.M., Chartier, M., Gosse, G., 1992. Dynamics of accumulation and partitioning of N in leaves, stems and roots of lucerne (Medicago sativa L.) in a dense canopy. Ann. Bot. 70, 429-435.
        NutrientDemandFunctions NDemands
          MultiplyFunction Structural
            VariableReference MinNconc: VariableName=[Leaf].minimumNconc
            VariableReference PotentialDMAllocation: VariableName=[Leaf].potentialDMAllocation.Structural
          MaximumFunction Metabolic
            MultiplyFunction MetabolicAmount
              SubtractFunction MetabolicNconc
                VariableReference CritNconc: VariableName=[Leaf].criticalNConc
                VariableReference MinNconc: VariableName=[Leaf].minimumNconc
              VariableReference PotentialDMAllocation: VariableName=[Leaf].potentialDMAllocation.Structural
            Constant Zero: FixedValue=0; Units=do not allow negative
          Constant Storage: FixedValue=0; Units=g/m2 per day
          Constant QStructuralPriority: FixedValue=1
          Constant QMetabolicPriority: FixedValue=1
          Constant QStoragePriority: FixedValue=1
        LinearInterpolationFunction NConcDilutionFactor
          XYPairs: X=[0, 400]; Y=[1, 0.34]
          VariableReference XValue: VariableName=[Leaf].Live.Wt
          Memo
            Parameter values empirically derived from all observed data.

            N% decay with leaf biomass follows allometry logic as per Lemaire et al 1992 but at a gentle rate in comparison with stem as in lucerne leaves as there's mostly metabolic tissue.

            Lemaire, G., Khaiti, M., Onillon, B., Allirand, J.M., Chartier, M., Gosse, G., 1992. Dynamics of accumulation and partitioning of N in leaves, stems and roots of lucerne (Medicago sativa L.) in a dense canopy. Ann. Bot. 70, 429-435.

            Yang X 2020. Modelling phenological development, yield and quality of lucerne (Medicago sativa L.) using APSIM next generation, Lincoln University, Canterbury, New Zealand.
        MultiplyFunction MaximumNConc
          Constant MaxValue: FixedValue=0.08; Units=fraction of drymatter
          VariableReference NConcDilutionFactor: VariableName=[Leaf].NConcDilutionFactor
          Memo
            FIXME: Maximum value is above measured to give better fit (shows quick drop) - check logic to fix
        MultiplyFunction CriticalNConc
          VariableReference MaxConc: VariableName=[Leaf].MaximumNConc
          Constant FracOfMax: FixedValue=0.8; Units=fraction of maximum concentration
        MultiplyFunction MinimumNConc
          VariableReference MaxConc: VariableName=[Leaf].MaximumNConc
          Constant FracOfMax: FixedValue=0.6; Units=fraction of maximum concentration
        Constant NRetranslocationFactor: FixedValue=0
        Constant NReallocationFactor: FixedValue=1
        Memo 05_LeafQuality
          Leaf Nitrogen

          - 100% of leaf N is available to other organs after sensecence **NRealalocation = 1**
          - 0% N in storage **NRetrsnslocation = 0**
        MultiplyFunction CrudeProteinConc
          VariableReference LeafLiveNConc: VariableName=[Leaf].Live.NConc
          Constant: FixedValue=6.25
          Constant UniteConvert: FixedValue=100
          Memo
            Yang, X. 2020. Modelling phenological development, yield and quality of lucerne (Medicago sativa L.) using APSIM next generation. PhD thesis, Lincoln University, Canterbury, New Zealand.
        MultiplyFunction MEConc
          LinearInterpolationFunction MEContent
            XYPairs: X=[0, 200, 400]; Y=[12.5, 11, 11]
            VariableReference XValue: VariableName=[Leaf].Live.Wt
          Memo
            Yang, X. 2020. Modelling phenological development, yield and quality of lucerne (Medicago sativa L.) using APSIM next generation. PhD thesis, Lincoln University, Canterbury, New Zealand.
        Memo
          Yield limitation at populations below 30 plants/m2

          Palmer TP, Wynn-Williams RB. 1976. Relationships between density and yield of lucerne. New Zeal. J. Exp. Agric. 4:71-77. doi: 10.1080/03015521.1976.10425847.
      GenericOrgan Stem: IsAboveGround=true
        Memo 01_StemBiomass
          DMDemands are in **g DM/m2 per day**

          **1. Current logic and assumptions:**

          - Potential **stem biomass** demand is a function of allometry growth of **leaf biomass** (which is derived from LAI expansion itself)
          - Leaf to stem ratio is bounded around measured "biologically sensible" values of 2.5 (~0.5 t shoot DM/ha) and 0.5 at 6 t shoot DM/ha
          - Stem has only **Structural** tissue

          **2. References**

          Lemaire, G., Khaiti, M., Onillon, B., Allirand, J.M., Chartier, M., Gosse, G., 1992. Dynamics of accumulation and partitioning of N in leaves, stems and roots of lucerne (Medicago sativa L.) in a dense canopy. Ann. Bot. 70, 429-435.

          Teixeira, E.I., Moot, D.J.D.J., Brown, H.E.H.E., 2009. Modelling seasonality of dry matter partitioning and root maintenance respiration in lucerne (Medicago sativa L.) crops. Crop Pasture Sci. 60, 778-784. https://doi.org/10.1071/CP08409

          Yang, X. 2020. Modelling phenological development, yield and quality of lucerne (Medicago sativa L.) using APSIM next generation. PhD thesis, Lincoln University, Canterbury, New Zealand.
        NutrientPoolFunctions InitialWt
          MultiplyFunction Structural
            VariableReference InitialWeightPerPlant: VariableName=[Leaf].InitialWt.InitialWeightPerPlant
            DivideFunction StemProportion
              VariableReference LeafProportion: VariableName=[Leaf].InitialWt.LeafProportion
              Constant MaxLeafToStemRatio: FixedValue=2.5; Units=maximum observed leaf/stem ratio (Lemaire et al 1991)
          Constant Metabolic: FixedValue=0; Units=g/m^2
          Constant Storage: FixedValue=0; Units=g/m^2
          Memo
             FIXME: add reference and check parametrization.
        NutrientDemandFunctions DMDemands
          AllometricDemandFunction Structural: Const=0.14; Power=1.24
            VariableReference XValue: VariableName=[AboveGround].Wt
            VariableReference YValue: VariableName=[Stem].Live.Wt
          Constant Storage: FixedValue=0; Units=FIXME: g DM/m2 per day ?
          Constant Metabolic: FixedValue=0; Units=FIXME: g DM/m2 per day ?
          Memo StemBiomassMethod
            Lemaire, G., Khaiti, M., Onillon, B., Allirand, J.M., Chartier, M., Gosse, G., 1992. Dynamics of accumulation and partitioning of N in leaves, stems and roots of lucerne (Medicago sativa L.) in a dense canopy. Ann. Bot. 70, 429-435.
          Constant QStructuralPriority: FixedValue=1
          Constant QMetabolicPriority: FixedValue=1
          Constant QStoragePriority: FixedValue=1
        Constant DMConversionEfficiency: FixedValue=1; Units=0-1
        RetranslocateNonStructural RetranslocateNitrogen
        Constant StructuralFraction: FixedValue=1
        Constant DMRetranslocationFactor: FixedValue=0.1
        Constant DMReallocationFactor: FixedValue=0
        Constant DetachmentRateFunction: FixedValue=0; Units=/d
        Constant RemobilisationCost: FixedValue=0
        Constant MaintenanceRespirationFunction: FixedValue=0; Units=0-1
        Constant SenescenceRate: FixedValue=0; Units=/d
        BiomassRemoval BiomassRemovalDefaults: HarvestFractionLiveToRemove=0.5; HarvestFractionDeadToRemove=0; HarvestFractionLiveToResidue=0.1; HarvestFractionDeadToResidue=0.01
        Memo 02_StemNitrogen
          **Stem Nitrogen**

          - **Structural and Metabolic** tissue present
          - 0% leaf N is available to other organs after sensecence **NRealalocation = 0**
          - 0% N in storage **NRetrsnslocation = 0**
        PhaseLookupValue NitrogenDemandSwitch: Start=Emergence; End=Maturity
          Constant: FixedValue=1
        NutrientDemandFunctions NDemands
          MultiplyFunction Structural
            VariableReference MinNconc: VariableName=[Stem].minimumNconc
            VariableReference PotentialDMAllocation: VariableName=[Stem].potentialDMAllocation.Structural
          MaximumFunction Metabolic
            MultiplyFunction MetabolicAmount
              SubtractFunction MetabolicNconc
                VariableReference CritNconc: VariableName=[Stem].criticalNConc
                VariableReference MinNconc: VariableName=[Stem].minimumNconc
              VariableReference PotentialDMAllocation: VariableName=[Stem].potentialDMAllocation.Structural
            Constant Zero: FixedValue=0; Units=do not allow negative
          Constant Storage: FixedValue=0; Units=g/m2 per day
          Constant QStructuralPriority: FixedValue=1
          Constant QMetabolicPriority: FixedValue=1
          Constant QStoragePriority: FixedValue=1
        Constant NRetranslocationFactor: FixedValue=0
        Constant NReallocationFactor: FixedValue=0
        LinearInterpolationFunction NConcDilutionFactor
          XYPairs: X=[0, 30, 40, 50, 100, 150]; Y=[0.06, 0.047, 0.042, 0.038, 0.025, 0.006]
          VariableReference XValue: VariableName=[Stem].Live.Wt
          Memo
            Parameter values empirically derived from all observed data.

            N% decay with leaf biomass follows allometry logic as per Lemaire et al 1992 but at a gentle rate as there's mostly metabolic tissue in lucerne leaves.

            Lemaire, G., Khaiti, M., Onillon, B., Allirand, J.M., Chartier, M., Gosse, G., 1992. Dynamics of accumulation and partitioning of N in leaves, stems and roots of lucerne (Medicago sativa L.) in a dense canopy. Ann. Bot. 70, 429–435.
        MultiplyFunction MaximumNConc
          Constant MaxValue: FixedValue=1; Units=fraction of drymatter
          VariableReference NConcDilutionFactor: VariableName=[Stem].NConcDilutionFactor
          Memo
            Assumes a range around mid-point of concentration from NConcDillutionFactor in response to organ biomass
        MultiplyFunction CriticalNConc
          Memo
            Assumes critical is in between min and max N%
            FIXME: Temporary, needs revision
          VariableReference MaxConc: VariableName=[Stem].MaximumNConc
          Constant FracOfMax: FixedValue=0.85; Units=fraction of maximum concentration
        MultiplyFunction MinimumNConc
          Memo
            Minimum leaf N% is assumed as a fraction of maximum N%.

            The difference between max and min is assumed narrower at low leaf biomass (small/young plants) and wider at large biomass accumulation (big/old plants).

            Empirical fit from all data.
          VariableReference MaxConc: VariableName=[Stem].MaximumNConc
          Constant FracOfMax: FixedValue=0.6; Units=fraction of maximum concentration
        Memo 03_StemQuality
          Leaf Nitrogen

          - 100% of leaf N is available to other organs after sensecence **NRealalocation = 1**
          - 0% N in storage **NRetrsnslocation = 0**
        Constant CarbonConcentration: FixedValue=0.4
        MultiplyFunction MEConc
          LinearInterpolationFunction MEContent
            XYPairs: X=[0, 260, 600]; Y=[10.5, 5.7, 5.7]
            VariableReference XValue: VariableName=[Stem].Live.Wt
          Memo
            Yang, X. 2020. Modelling phenological development, yield and quality of lucerne (Medicago sativa L.) using APSIM next generation. PhD thesis, Lincoln University, Canterbury, New Zealand.
        MultiplyFunction CrudeProteinConc
          VariableReference StemLiveNConc: VariableName=[Stem].Live.NConc
          Constant CPContent: FixedValue=6.25
          Constant UniteConvert: FixedValue=100
          Memo
            Yang, X. 2020. Modelling phenological development, yield and quality of lucerne (Medicago sativa L.) using APSIM next generation. PhD thesis, Lincoln University, Canterbury, New Zealand.
        VariableReference initialNConcFunction: VariableName=[Stem].MinimumNConc
        Constant Photosynthesis: FixedValue=0
      GenericOrgan TapRoot: IsAboveGround=false
        Memo 01_TapRootBiomass
          DMDemands in **g/m2 per day**

          **Note:** Structure and parameterisaion for a dynamic seasonal taproot biomass are under test - see context below.

          **Rationale:**

          - TapRoot has **Structural and Storage tissues** (i.e. no Metabolic)

          **Assumptions:**

          **1. Input "demand" for biomass:**

          - There is a **minimum "structural" taproot biomass** possible per plant (e.g. 0.8 g /plant x plant pop = 2.5 t/ha for a 300 plants/m2 pop)
          - **Structural demand** grows taproot at a max of 1% of gap between actual and mimimum structural, until min structural/plant is achieved.
          - **Storage demand** depends on storage "capacity" which is proportional to available structural taproot biomass (**XXX = 5** or ~17% of taproot)

          **2. Output "desapearance" of taproot biomass:**

          - **Storage demand** is reduced at decreasing photoperiod (winter/spring) but fixed at 100% at increasing Pp.
          - Taproot biomass is then consumed via **Retranslocation (to shoots) or MaintenceRespiration (to void)**
          - **DMRetranslocationFactor** is a maximum fraction of storage N available per day for retranslocation (1%/day)
          - **Maintenencece respiration** is linearly responsive to TapRoot protein content (1 to 2%/day)

          **3. Issues:**

          - Retranslocation logic **requires documentation/ref**
          - References for root dynamics logic **(seasonality and respiration)** given bellow

          **4. References:**

          Atkinson, L.J., Hellicar, M.A., Fitter, A.H., Atkin, O.K., 2007. Impact of temperature on the relationship between respiration and nitrogen concentration in roots: an analysis of scaling relationships, Q10 values and thermal acclimation ratios. New Phytol. 173, 110-120. https://doi.org/https://doi.org/10.1111/j.1469-8137.2006.01891.x

          Burton, A., Pregitzer, K., Ruess, R., Hendrick, R., Allen, M., 2002. Root respiration in North American forests: effects of nitrogen concentration and temperature across biomes. Oecologia 131, 559-568. https://doi.org/10.1007/s00442-002-0931-7

          Waring, R.H., Running, S.W., 2007. CHAPTER 3 - Carbon Cycle, in: Waring, R.H., Running, S.W.B.T.-F.E. (Third E. (Eds.), . Academic Press, San Diego, pp. 59–98. https://doi.org/https://doi.org/10.1016/B978-012370605-8.50008-6

          https://www.sciencedirect.com/topics/agricultural-and-biological-sciences/maintenance-respiration

          Atkin, O.K., Edwards, E.J., Loveys, B.R., Norby, R., Fitter, A., Jackson, R., 2000. Response of root respiration to changes in temperature and its relevance to global warming. New Phytol. 147, 141-154.

          Teixeira, E.I., Moot, D.J.D.J., Brown, H.E.H.E., 2009. Modelling seasonality of dry matter partitioning and root maintenance respiration in lucerne (Medicago sativa L.) crops. Crop Pasture Sci. 60, 778-784. https://doi.org/10.1071/CP08409

          Teixeira, E.I., Moot, D.J., Mickelbart, M. V., 2007. Seasonal patterns of root C and N reserves of lucerne crops (Medicago sativa L.) grown in a temperate climate were affected by defoliation regime. Eur. J. Agron. 26, 10-20.

          Avice, J.C., Ourry, A., Lemaire, G., Boucaud, J., 1996. Nitrogen and carbon flows estimated by 15N and 13C pulse-chase labeling during regrowth of alfalfa. Plant-Physiology 112, 281-290.
        NutrientPoolFunctions InitialWt
          Constant Structural: FixedValue=0; Units=g/m^2
          Constant Metabolic: FixedValue=0
          Constant Storage: FixedValue=0
        Constant StructuralFraction: FixedValue=0.4; Units=fractional
        Constant SenescenceRate: FixedValue=0; Units=/d
        Constant DetachmentRateFunction: FixedValue=0; Units=/d
        Constant DMConversionEfficiency: FixedValue=1; Units=0-1
        Constant DMReallocationFactor: FixedValue=0
        Constant RemobilisationCost: FixedValue=0; Units=FIXME: what's unit?
        Constant CarbonConcentration: FixedValue=0.4; Units=g C/ g dry matter
        DivideFunction MaintenanceRespirationFunction
          MultiplyFunction AbsoluteRespiration
            VariableReference NTranslocation: VariableName=[Arbitrator].N.Retranslocation[5]
            Constant Rate: FixedValue=40; Units=g dm/g N remobilized
          AddFunction Weight
            VariableReference MetabolicWt: VariableName=[TapRoot].Live.MetabolicWt
            VariableReference StorageWt: VariableName=[TapRoot].Live.StorageWt
          Memo MaintRespMethod
            Respiration was parameterized as a function of root dry matter loss to remobilize N (g) from root to shoot.

            The Q10 part is at: Modelling respiration of vegetation: evidence for a general temperature-dependent Q10. Global Change Biology (2001) 7, 223-230. https://onlinelibrary.wiley.com/doi/epdf/10.1046/j.1365-2486.2001.00397.x
        PhaseLookup DMRetranslocationFactor
          PhaseLookupValue Juvenile: Start=Emergence; End=EndJuvenile
            Constant: FixedValue=0; Units=fractional (/day)
          PhaseLookupValue Vegetative: Start=EndJuvenile; End=StartFlowering
            MultiplyFunction
              Constant: FixedValue=0.1; Units=fraction of storage DM per day
              LinearInterpolationFunction RegrowthEffect
                XYPairs: X=[0, 210]; Y=[1, 0]
                VariableReference XValue: VariableName=[Phenology].ThermalTimeAfterCutting
          PhaseLookupValue Reproductive: Start=StartFlowering; End=Maturity
            Constant: FixedValue=0; Units=fractional (/day)
          Memo
            Logic and parameters from Xiumei's Lincoln University PhD Thesis 2021. Refactored to simplify interpretation.
        PhaseLookup NRetranslocationFactor
          PhaseLookupValue Juvenile: Start=Emergence; End=EndJuvenile
            Constant: FixedValue=0
          PhaseLookupValue Vegetative: Start=EndJuvenile; End=StartFlowering
            MultiplyFunction
              Constant: FixedValue=0.1
              LinearInterpolationFunction RegrowthEffect
                XYPairs: X=[0, 210]; Y=[1, 0]
                VariableReference XValue: VariableName=[Phenology].ThermalTimeAfterCutting
          PhaseLookupValue Reproductive: Start=StartFlowering; End=Maturity
            Constant: FixedValue=0
        BiomassRemoval BiomassRemovalDefaults: HarvestFractionLiveToRemove=0; HarvestFractionDeadToRemove=0; HarvestFractionLiveToResidue=0; HarvestFractionDeadToResidue=0
        Memo 02_TapRootNitrogen
          N retranslocation factor is a maximum fraction of storage N available per day for retranslocation
        Constant NReallocationFactor: FixedValue=1; Units=FIXME: what's teh unit?
        LinearInterpolationFunction MaximumNConc
          XYPairs: X=[0, 1000]; Y=[0.015, 0.025]
          VariableReference XValue: VariableName=[Taproot].Live.Wt
          Memo
            Yang, X. 2020. Modelling phenological development, yield and quality of lucerne (Medicago sativa L.) using APSIM next generation. PhD thesis, Lincoln University, Canterbury, New Zealand.
        MultiplyFunction CriticalNConc
          VariableReference MaxConc: VariableName=[TapRoot].MaximumNConc
          Constant FracOfMax: FixedValue=0.9; Units=fraction of maximum concentration
        LinearInterpolationFunction MinimumNConc
          XYPairs: X=[0, 1000]; Y=[0.01, 0.022]
          VariableReference XValue: VariableName=[Taproot].Live.Wt
        PhaseLookupValue NitrogenDemandSwitch: Start=Emergence; End=Maturity
          Constant: FixedValue=1; Units=FIXME: what's this switch is doing?
        NutrientDemandFunctions DMDemands
          MultiplyFunction Structural
            SubtractFunction GapToMaxStructural
              MaximumFunction MaximumTapRootStructuralDM
                VariableReference ActualStructuralDM: VariableName=[TapRoot].Live.StructuralWt
                MinimumFunction
                  Constant MaxStrTapRootPerM2: FixedValue=250; Units=g structural DM/m2
                  MultiplyFunction MinStrTapRootPerM2ByPlant
                    Constant MaxStrTapRootPerPlant: FixedValue=0.6; Units=minimum g structural taproot DM / lucerne plant
                    VariableReference Population: VariableName=[Lucerne].Population
              VariableReference TapRootStructuralDM: VariableName=[TapRoot].Live.StructuralWt
            Constant DailyStrucDemandRate: FixedValue=0.025; Units=fraction of biomass gap per day as demand
            Memo
              The logic here is:

              - Assume a mimimum amount of structural biomass
              - Create demand to reach this target if current amount is less than that
              - Assumes that 1% of potential difference is "demanded" by day
              - Assumes a maximum 2.5 t/ha of taproot
          MultiplyFunction Storage
            SubtractFunction StorageGap
              DivideFunction PotentialStorage
                VariableReference CurrentStructural: VariableName=[TapRoot].Live.StructuralWt
                Constant StructuralFraction: FixedValue=0.37; Units=minimum share of structural in taproot
              VariableReference ActualStorage: VariableName=[TapRoot].Live.StorageWt
            MultiplyFunction
              LessThanFunction AnnualEffect
                VariableReference DeltaPp: VariableName=[Phenology].DeltaPhotoperiod
                Constant Ref: FixedValue=-0.02
                Constant DecreasingPp: FixedValue=1; Units=100% storage demand at decreasing Pp
                LinearInterpolationFunction IncreasingPp
                  XYPairs: X=[10, 16.8]; Y=[0, 1]
                  VariableReference XValue: VariableName=[Phenology].Photoperiod
              LinearInterpolationFunction RegrowthEffect
                XYPairs: X=[0, 210, 260]; Y=[0, 0, 1]
                VariableReference XValue: VariableName=[Phenology].ThermalTimeAfterCutting
              Constant DailyStorDemandRate: FixedValue=0.025
            Memo
              The logic here is:

              - Assumes a mimimum of 20% **StructuralFraction** biomass in taproot - so a **PotentialStorage** of 80% DM
              - Compares current Storage with PotentialStorage (**StorageGap**)
              - Allows a **MaxDailyStorageRate** as a fraction of the StorageGap (g DM/m2 per day)
              - MaxDailyDemand is a first try to ensure we do not have exess demands per day - needs check FIXME

              FIXME: Parameters require references (parameterised empirically as per Yang X PhD Thesis)
          Constant Metabolic: FixedValue=0; Units=g DM m2/day
          Constant QStructuralPriority: FixedValue=1
          Constant QMetabolicPriority: FixedValue=1
          Constant QStoragePriority: FixedValue=1
        NutrientDemandFunctions NDemands
          MultiplyFunction Structural
            VariableReference MinNconc: VariableName=[TapRoot].minimumNconc
            VariableReference PotentialDMAllocation: VariableName=[TapRoot].potentialDMAllocation.Structural
          MultiplyFunction Metabolic
            SubtractFunction MetabolicNconc
              VariableReference CritNconc: VariableName=[TapRoot].criticalNConc
              VariableReference MinNconc: VariableName=[TapRoot].minimumNconc
            VariableReference PotentialDMAllocation: VariableName=[TapRoot].potentialDMAllocation.Structural
          MultiplyFunction Storage
            LessThanFunction AnnualEffect
              VariableReference DeltaPhotoperiod: VariableName=[Phenology].DeltaPhotoperiod
              Constant Zero: FixedValue=-0.02
              MultiplyFunction Decreasing
                StorageNDemandFunction Decreasing
                  VariableReference NitrogenDemandSwitch: VariableName=[TapRoot].nitrogenDemandSwitch
                  VariableReference MaxNconc: VariableName=[TapRoot].maximumNconc
                Constant DailyStorDemandRate: FixedValue=0.05
              MultiplyFunction Increasing
                StorageNDemandFunction Increasing
                  VariableReference NitrogenDemandSwitch: VariableName=[TapRoot].nitrogenDemandSwitch
                  VariableReference MaxNconc: VariableName=[TapRoot].maximumNconc
                Constant DailyStorDemandRate: FixedValue=0.01
            LinearInterpolationFunction RegrowthEffect
              XYPairs: X=[0, 210, 260]; Y=[0, 0, 1]
              VariableReference XValue: VariableName=[Phenology].ThermalTimeAfterCutting
          Constant QStructuralPriority: FixedValue=1
          Constant QMetabolicPriority: FixedValue=1
          Constant QStoragePriority: FixedValue=1
        RetranslocateNonStructural RetranslocateNitrogen
        VariableReference initialNConcFunction: VariableName=[TapRoot].MinimumNConc
        Constant Photosynthesis: FixedValue=0
      GenericOrgan Shell: IsAboveGround=true
        Memo
          FIXME: Shell was not parameterised
        Constant NReallocationFactor: FixedValue=0
        Constant NRetranslocationFactor: FixedValue=0.1
        Constant DMRetranslocationFactor: FixedValue=0.1
        Constant MaximumNConc: FixedValue=0.03
        Constant MinimumNConc: FixedValue=0.01
        PhaseLookupValue NitrogenDemandSwitch: Start=Emergence; End=Maturity
          Constant: FixedValue=1
        Constant StructuralFraction: FixedValue=1
        BiomassRemoval BiomassRemovalDefaults: HarvestFractionLiveToRemove=0.5; HarvestFractionDeadToRemove=0; HarvestFractionLiveToResidue=0.1; HarvestFractionDeadToResidue=0
        Constant SenescenceRate: FixedValue=0; Units=/d
        Constant DetachmentRateFunction: FixedValue=0; Units=/d
        Constant MaintenanceRespirationFunction: FixedValue=0; Units=0-1
        Constant DMConversionEfficiency: FixedValue=1; Units=0-1
        PartitionFractionDemandFunction DMDemandFunction
          PhaseLookup PartitionFraction
            PhaseLookupValue: Start=StartPodfill; End=Maturity
              Constant: FixedValue=0.2
        Constant DMReallocationFactor: FixedValue=0
        VariableReference CriticalNConc: VariableName=[Shell].MinimumNConc
        Constant RemobilisationCost: FixedValue=0
        Constant CarbonConcentration: FixedValue=0.4
        NutrientDemandFunctions DMDemands
          PartitionFractionDemandFunction Structural: same as Replacements.Lucerne.Shell.DMDemandFunction
          Constant Storage: FixedValue=0
          Constant Metabolic: FixedValue=0
          Constant QStructuralPriority: FixedValue=1
          Constant QMetabolicPriority: FixedValue=1
          Constant QStoragePriority: FixedValue=1
        NutrientDemandFunctions NDemands
          MultiplyFunction Structural
            VariableReference MinNconc: VariableName=[Shell].minimumNconc
            VariableReference PotentialDMAllocation: VariableName=[Shell].potentialDMAllocation.Structural
          MultiplyFunction Metabolic
            SubtractFunction MetabolicNconc
              VariableReference CritNconc: VariableName=[Shell].criticalNConc
              VariableReference MinNconc: VariableName=[Shell].minimumNconc
            VariableReference PotentialDMAllocation: VariableName=[Shell].potentialDMAllocation.Structural
          StorageNDemandFunction Storage
            VariableReference NitrogenDemandSwitch: VariableName=[Shell].nitrogenDemandSwitch
            VariableReference MaxNconc: VariableName=[Shell].maximumNconc
          Constant QStructuralPriority: FixedValue=1
          Constant QMetabolicPriority: FixedValue=1
          Constant QStoragePriority: FixedValue=1
        RetranslocateNonStructural RetranslocateNitrogen
        NutrientPoolFunctions InitialWt: same as Replacements.Lucerne.TapRoot.InitialWt
        VariableReference initialNConcFunction: VariableName=[Shell].MinimumNConc
        Constant Photosynthesis: FixedValue=0
      GenericOrgan Grain: IsAboveGround=true
        Memo
          FIXME: Grain was not parameterised
        Constant NReallocationFactor: FixedValue=0
        Constant NRetranslocationFactor: FixedValue=0.1
        Constant DMRetranslocationFactor: FixedValue=0.1
        Constant MaximumNConc: FixedValue=0.03
        Constant MinimumNConc: FixedValue=0.01
        PhaseLookupValue NitrogenDemandSwitch: Start=Emergence; End=Maturity
          Constant: FixedValue=1
        Constant StructuralFraction: FixedValue=1
        BiomassRemoval BiomassRemovalDefaults: HarvestFractionLiveToRemove=0.5; HarvestFractionDeadToRemove=0; HarvestFractionLiveToResidue=0.1; HarvestFractionDeadToResidue=0
        Constant SenescenceRate: FixedValue=0; Units=/d
        Constant DetachmentRateFunction: FixedValue=0; Units=/d
        Constant MaintenanceRespirationFunction: FixedValue=0; Units=0-1
        Constant DMConversionEfficiency: FixedValue=1; Units=0-1
        PartitionFractionDemandFunction DMDemandFunction: same as Replacements.Lucerne.Shell.DMDemandFunction
        Constant DMReallocationFactor: FixedValue=0
        VariableReference CriticalNConc: VariableName=[Grain].MinimumNConc
        Constant RemobilisationCost: FixedValue=0
        Constant CarbonConcentration: FixedValue=0.4
        NutrientDemandFunctions DMDemands: same as Replacements.Lucerne.Shell.DMDemands
        NutrientDemandFunctions NDemands
          MultiplyFunction Structural
            VariableReference MinNconc: VariableName=[Grain].minimumNconc
            VariableReference PotentialDMAllocation: VariableName=[Grain].potentialDMAllocation.Structural
          MultiplyFunction Metabolic
            SubtractFunction MetabolicNconc
              VariableReference CritNconc: VariableName=[Grain].criticalNConc
              VariableReference MinNconc: VariableName=[Grain].minimumNconc
            VariableReference PotentialDMAllocation: VariableName=[Grain].potentialDMAllocation.Structural
          StorageNDemandFunction Storage
            VariableReference NitrogenDemandSwitch: VariableName=[Grain].nitrogenDemandSwitch
            VariableReference MaxNconc: VariableName=[Grain].maximumNconc
          Constant QStructuralPriority: FixedValue=1
          Constant QMetabolicPriority: FixedValue=1
          Constant QStoragePriority: FixedValue=1
        RetranslocateNonStructural RetranslocateNitrogen
        NutrientPoolFunctions InitialWt: same as Replacements.Lucerne.TapRoot.InitialWt
        VariableReference initialNConcFunction: VariableName=[Grain].MinimumNConc
        Constant Photosynthesis: FixedValue=0
      CompositeBiomass AboveGround: OrganNames=[Leaf, Stem, Grain, Shell]; IncludeLive=true; IncludeDead=true
      CompositeBiomass AboveGroundLive: OrganNames=[Leaf, Stem, Grain, Shell]; IncludeLive=true; IncludeDead=false
      CompositeBiomass AboveGroundDead: OrganNames=[Leaf, Stem, Grain, Shell]; IncludeLive=false; IncludeDead=true
      CompositeBiomass BelowGround: OrganNames=[Root, Nodule, TapRoot]; IncludeLive=true; IncludeDead=true
      CompositeBiomass Total: OrganNames=[Leaf, Stem, Grain, Shell, Root, Nodule, TapRoot]; IncludeLive=true; IncludeDead=true
      CompositeBiomass TotalLive: OrganNames=[Leaf, Stem, Grain, Shell, Root, Nodule, TapRoot]; IncludeLive=true; IncludeDead=false
      CompositeBiomass TotalDead: OrganNames=[Leaf, Stem, Grain, Shell, Root, Nodule, TapRoot]; IncludeLive=false; IncludeDead=true
      CompositeBiomass Pod: OrganNames=[Shell, Grain]; IncludeLive=true; IncludeDead=true
      Folder CultivarFolder
        Cultivar FD2
          Command:
            [Leaf].HeightFunction.Tallness.Height.DeltaHeight.Heightchron.Vegetative.Heightchron.Heightchron.A = 0.99
            [Leaf].HeightFunction.Tallness.Height.DeltaHeight.Heightchron.Vegetative.Heightchron.Heightchron.B = 117400
            [Leaf].HeightFunction.Tallness.Height.DeltaHeight.Heightchron.Vegetative.Heightchron.Heightchron.C = -1
            [TapRoot].DMRetranslocationFactor.Vegetative.MultiplyFunction.RegrowthEffect.XYPairs.X[2]= 200
            [TapRoot].NRetranslocationFactor.Vegetative.MultiplyFunction.RegrowthEffect.XYPairs.X[2] = 200
            [TapRoot].DMDemands.Storage.MultiplyFunction.RegrowthEffect.XYPairs.X[2] = 200
            [TapRoot].DMDemands.Storage.MultiplyFunction.RegrowthEffect.XYPairs.X[3] = 250
            [TapRoot].NDemands.Storage.RegrowthEffect.XYPairs.X[2] = 200
            [TapRoot].NDemands.Storage.RegrowthEffect.XYPairs.X[3] = 250
        Cultivar FD3
          Command:
            [Leaf].HeightFunction.Tallness.Height.DeltaHeight.Heightchron.Vegetative.Heightchron.Heightchron.A = 0.99
            [Leaf].HeightFunction.Tallness.Height.DeltaHeight.Heightchron.Vegetative.Heightchron.Heightchron.B = 117400
            [Leaf].HeightFunction.Tallness.Height.DeltaHeight.Heightchron.Vegetative.Heightchron.Heightchron.C = -1
            [TapRoot].DMRetranslocationFactor.Vegetative.MultiplyFunction.RegrowthEffect.XYPairs.X[2]= 205
            [TapRoot].NRetranslocationFactor.Vegetative.MultiplyFunction.RegrowthEffect.XYPairs.X[2] = 205
            [TapRoot].DMDemands.Storage.MultiplyFunction.RegrowthEffect.XYPairs.X[2] = 205
            [TapRoot].DMDemands.Storage.MultiplyFunction.RegrowthEffect.XYPairs.X[3] = 255
            [TapRoot].NDemands.Storage.RegrowthEffect.XYPairs.X[2] = 205
            [TapRoot].NDemands.Storage.RegrowthEffect.XYPairs.X[3] = 255
          Alias DuPuits
        Cultivar FD4
          Command:
            [Leaf].HeightFunction.Tallness.Height.DeltaHeight.Heightchron.Vegetative.Heightchron.Heightchron.A = 0.99
            [Leaf].HeightFunction.Tallness.Height.DeltaHeight.Heightchron.Vegetative.Heightchron.Heightchron.B = 117400
            [Leaf].HeightFunction.Tallness.Height.DeltaHeight.Heightchron.Vegetative.Heightchron.Heightchron.C = -1
            [TapRoot].DMRetranslocationFactor.Vegetative.MultiplyFunction.RegrowthEffect.XYPairs.X[2]= 208
            [TapRoot].NRetranslocationFactor.Vegetative.MultiplyFunction.RegrowthEffect.XYPairs.X[2] = 208
            [TapRoot].DMDemands.Storage.MultiplyFunction.RegrowthEffect.XYPairs.X[2] = 208
            [TapRoot].DMDemands.Storage.MultiplyFunction.RegrowthEffect.XYPairs.X[3] = 258
            [TapRoot].NDemands.Storage.RegrowthEffect.XYPairs.X[2] = 208
            [TapRoot].NDemands.Storage.RegrowthEffect.XYPairs.X[3] = 258
          Alias CRIOULA
        Cultivar FD5
          Alias HunterRiver
          Alias Kaituna
          Alias WL611
          Alias ESTANZUELACHANA
          Alias SuperMonarca
          Alias southern_special
        Cultivar FD6
          Command:
            [Leaf].HeightFunction.Tallness.Height.DeltaHeight.Heightchron.Vegetative.Heightchron.Heightchron.A = 0.99
            [Leaf].HeightFunction.Tallness.Height.DeltaHeight.Heightchron.Vegetative.Heightchron.Heightchron.B = 117400
            [Leaf].HeightFunction.Tallness.Height.DeltaHeight.Heightchron.Vegetative.Heightchron.Heightchron.C = -1
            [TapRoot].DMRetranslocationFactor.Vegetative.MultiplyFunction.RegrowthEffect.XYPairs.X[2]= 215
            [TapRoot].NRetranslocationFactor.Vegetative.MultiplyFunction.RegrowthEffect.XYPairs.X[2] = 215
            [TapRoot].DMDemands.Storage.MultiplyFunction.RegrowthEffect.XYPairs.X[2] = 215
            [TapRoot].DMDemands.Storage.MultiplyFunction.RegrowthEffect.XYPairs.X[3] = 265
            [TapRoot].NDemands.Storage.RegrowthEffect.XYPairs.X[2] = 215
            [TapRoot].NDemands.Storage.RegrowthEffect.XYPairs.X[3] = 265
        Cultivar FD7
          Command:
            [Leaf].HeightFunction.Tallness.Height.DeltaHeight.Heightchron.Vegetative.Heightchron.Heightchron.A = 0.99
            [Leaf].HeightFunction.Tallness.Height.DeltaHeight.Heightchron.Vegetative.Heightchron.Heightchron.B = 117400
            [Leaf].HeightFunction.Tallness.Height.DeltaHeight.Heightchron.Vegetative.Heightchron.Heightchron.C = -1
            [TapRoot].DMRetranslocationFactor.Vegetative.MultiplyFunction.RegrowthEffect.XYPairs.X[2]= 220
            [TapRoot].NRetranslocationFactor.Vegetative.MultiplyFunction.RegrowthEffect.XYPairs.X[2] = 220
            [TapRoot].DMDemands.Storage.MultiplyFunction.RegrowthEffect.XYPairs.X[2] = 220
            [TapRoot].DMDemands.Storage.MultiplyFunction.RegrowthEffect.XYPairs.X[3] = 270
            [TapRoot].NDemands.Storage.RegrowthEffect.XYPairs.X[2] = 220
            [TapRoot].NDemands.Storage.RegrowthEffect.XYPairs.X[3] = 270
          Alias Trifecta
          Alias southern_special
          Alias SARDI7
        Cultivar FD9
          Command:
            [Leaf].HeightFunction.Tallness.Height.DeltaHeight.Heightchron.Vegetative.Heightchron.Heightchron.A = 0.82
            [Leaf].HeightFunction.Tallness.Height.DeltaHeight.Heightchron.Vegetative.Heightchron.Heightchron.B = 25470
            [Leaf].HeightFunction.Tallness.Height.DeltaHeight.Heightchron.Vegetative.Heightchron.Heightchron.C = -1
            [TapRoot].DMRetranslocationFactor.Vegetative.MultiplyFunction.RegrowthEffect.XYPairs.X[2]= 225
            [TapRoot].NRetranslocationFactor.Vegetative.MultiplyFunction.RegrowthEffect.XYPairs.X[2] = 225
            [TapRoot].DMDemands.Storage.MultiplyFunction.RegrowthEffect.XYPairs.X[2] = 225
            [TapRoot].DMDemands.Storage.MultiplyFunction.RegrowthEffect.XYPairs.X[3] = 275
            [TapRoot].NDemands.Storage.RegrowthEffect.XYPairs.X[2] = 225
            [TapRoot].NDemands.Storage.RegrowthEffect.XYPairs.X[3] = 275
          Alias Sceptre
        Cultivar FD10
          Command:
            [Leaf].HeightFunction.Tallness.Height.DeltaHeight.Heightchron.Vegetative.Heightchron.Heightchron.A = 0.82
            [Leaf].HeightFunction.Tallness.Height.DeltaHeight.Heightchron.Vegetative.Heightchron.Heightchron.B = 25470
            [Leaf].HeightFunction.Tallness.Height.DeltaHeight.Heightchron.Vegetative.Heightchron.Heightchron.C = -1
            [TapRoot].DMRetranslocationFactor.Vegetative.MultiplyFunction.RegrowthEffect.XYPairs.X[2]= 230
            [TapRoot].NRetranslocationFactor.Vegetative.MultiplyFunction.RegrowthEffect.XYPairs.X[2] = 230
            [TapRoot].DMDemands.Storage.MultiplyFunction.RegrowthEffect.XYPairs.X[2] = 230
            [TapRoot].DMDemands.Storage.MultiplyFunction.RegrowthEffect.XYPairs.X[3] = 280
            [TapRoot].NDemands.Storage.RegrowthEffect.XYPairs.X[2] = 230
            [TapRoot].NDemands.Storage.RegrowthEffect.XYPairs.X[3] = 280
          Alias SARDI10
      ProtectedDivideFunction LSR_act: NumeratorErrVal=0; DenominatorErrVal=0
        VariableReference Leaf: VariableName=[Leaf].Live.Wt
        VariableReference Stem: VariableName=[Stem].Live.Wt
      Constant SeedMortalityRate: FixedValue=0
  Folder Combined Results
    Memo Combined Results
      Simulation results for the combined datasets from the various countries are shown in the following graphs.  The model is able to adequately capture the influence of growing conditions (soil, climate) and management (defoliation regimes, nitrogen, irrigation, sowing date).
      Memo Combined Results
        Simulation results for the combined datasets from the various countries are shown in the following graphs.  The model is able to adequately capture the influence of growing conditions (soil, climate) and management (population, Nitrogen, irrigation, sowing date).
    Memo
      This graph may not be correct as root refers to "Fine-roots" while datasets often report "TapRoot" - needs checking
  Folder New Zealand
    Experiment Iversen_8: DisabledSimNames=[Iversen_8Waterdry]
      Memo
        This experiment was conducted under both irrigated and dryland conditions in Block 8 of Iversen field (I8), Lincoln University, Canterbury, New Zealand (43˚38’S and 172˚28’E). Data were collected from 1 November 1996 to 30 June 2002 over five growing seasons. Lucerne crops grew under a 42±8 day defoliation regime. Full details are provided in Brown (2004).
      Factors
        Factor WaterTreatment
          CompositeFactor dry: Specifications=[IrrigationEvents]
            Operations IrrigationEvents
              1998-09-11  [Irrigation].Apply(30)
              1998-09-12  [Irrigation].Apply(30)
              1998-09-14  [Irrigation].Apply(30)
              1998-09-16  [Irrigation].Apply(30)
              1998-09-18  [Irrigation].Apply(30)
              1999-09-11  [Irrigation].Apply(30)
              1999-09-12  [Irrigation].Apply(30)
              1999-09-14  [Irrigation].Apply(30)
              1999-09-13  [Irrigation].Apply(50)
              2000-09-11  [Irrigation].Apply(30)
              2000-09-12  [Irrigation].Apply(30)
              2000-09-14  [Irrigation].Apply(30)
              2000-09-13  [Irrigation].Apply(30)
          CompositeFactor irr: Specifications=[IrrigationEvents]
            Operations IrrigationEvents
              1997-10-31  [Irrigation].Apply(30);
              1997-12-01  [Irrigation].Apply(24);
              1997-12-06  [Irrigation].Apply(32);
              1997-12-16  [Irrigation].Apply(41);
              1997-12-22  [Irrigation].Apply(45);
              1998-01-07  [Irrigation].Apply(14);
              1998-01-15  [Irrigation].Apply(30);
              1998-01-23  [Irrigation].Apply(26);
              1998-01-31  [Irrigation].Apply(23);
              1998-02-18  [Irrigation].Apply(62);
              1998-03-06  [Irrigation].Apply(23);
              1998-03-30  [Irrigation].Apply(31);
              1998-09-09  [Irrigation].Apply(30);
              1998-09-10  [Irrigation].Apply(30);
              1998-09-11  [Irrigation].Apply(30);
              1998-09-13  [Irrigation].Apply(30);
              1998-09-14  [Irrigation].Apply(30);
              1998-11-12  [Irrigation].Apply(20);
              1998-11-13  [Irrigation].Apply(20);
              1998-11-14  [Irrigation].Apply(20);
              1998-12-23  [Irrigation].Apply(20);
              1998-12-24  [Irrigation].Apply(20);
              1998-12-25  [Irrigation].Apply(20);
              1998-12-26  [Irrigation].Apply(15);
              1998-12-27  [Irrigation].Apply(15);
              1999-01-20  [Irrigation].Apply(20);
              1999-01-21  [Irrigation].Apply(20);
              1999-01-22  [Irrigation].Apply(20);
              1999-01-23  [Irrigation].Apply(20);
              1999-01-24  [Irrigation].Apply(20);
              1999-01-25  [Irrigation].Apply(27);
              1999-02-25  [Irrigation].Apply(10);
              1999-02-26  [Irrigation].Apply(10);
              1999-02-27  [Irrigation].Apply(10);
              1999-02-28  [Irrigation].Apply(20);
              1999-03-01  [Irrigation].Apply(20);
              1999-12-12  [Irrigation].Apply(30);
              2000-01-22  [Irrigation].Apply(50);
              2000-12-27  [Irrigation].Apply(30);
              2000-12-28  [Irrigation].Apply(30);
              2000-12-29  [Irrigation].Apply(15);
              2001-02-01  [Irrigation].Apply(35);
              2001-02-02  [Irrigation].Apply(30);
              2001-02-03  [Irrigation].Apply(30);
              2001-03-20  [Irrigation].Apply(25);
              2001-03-21  [Irrigation].Apply(25);
              2001-03-22  [Irrigation].Apply(15);
              2001-04-26  [Irrigation].Apply(25);
              2001-04-27  [Irrigation].Apply(20);
              2001-12-21  [Irrigation].Apply(20);
              2001-12-22  [Irrigation].Apply(25);
              2001-12-23  [Irrigation].Apply(20);
      Simulation Iversen_8LL
        Clock: Start=1996-10-31; End=2002-04-20
        Summary summaryfile
        Weather: FileName=lincoln.met
        SoilArbitrator Soil Arbitrator
        MicroClimate: a_interception=0; b_interception=1; c_interception=0; d_interception=0; SoilHeatFluxFraction=0.4; MinimumHeightDiffForNewLayer=0; NightInterceptionFraction=0.5; ReferenceHeight=2
        Zone paddock: Area=1; Slope=0; AspectAngle=0; Altitude=50
          Irrigation
          Fertiliser
          SurfaceOrganicMatter surface organic matter: InitialResidueName=wheat; InitialResidueType=wheat; InitialResidueMass=0; InitialStandingFraction=0; InitialCPR=0; InitialCNR=80
          Report: EventNames=[Clock].DoReport
            VariableNames:
              [Clock].Today
              [DiagnosticsVariables].Script.AccumPlantN
              [DiagnosticsVariables].Script.AccumMineralisation
              [DiagnosticsVariables].Script.AccumDenit
              [DiagnosticsVariables].Script.AccumFert
              [DiagnosticsVariables].Script.AccumLeach
              [DiagnosticsVariables].Script.AccumDetach
              [DiagnosticsVariables].Script.DeltaSoilOMN
              [DiagnosticsVariables].Script.DeltaSurfaceOMN
              [DiagnosticsVariables].Script.DeltaSoilMineralN
              [Lucerne].Root.NSupply
              [Soil].SoilWater.Eo
              [Soil].SoilWater.Es
              [DiagnosticsVariables].Script.SWC
              [DiagnosticsVariables].Script.DUL
              [Soil].SoilWater.Drainage
              [Soil].SoilWater.Runoff
              [DiagnosticsVariables].Script.OutFlowLat
              [Soil].SoilWater.pond
              [DiagnosticsVariables].Script.AccumEO
              [DiagnosticsVariables].Script.AccumEP
              [DiagnosticsVariables].Script.AccumES
              [DiagnosticsVariables].Script.AccumDrainage
              [DiagnosticsVariables].Script.AccumRunoff
              [DiagnosticsVariables].Script.AccumRainfall
              [DiagnosticsVariables].Script.AccumIrrigation
              [DiagnosticsVariables].Script.AccumOutflowLat
              [DiagnosticsVariables].Script.SoilWaterDeficit
              [Lucerne].Grain.Live.Wt
              [Lucerne].Shell.Live.Wt
              [Lucerne].Stem.Live.Wt
              [Lucerne].Stem.Live.Wt
              [Lucerne].Grain.Live.N
              [Lucerne].Shell.Live.N
              [Lucerne].Leaf.Live.Wt
              [Lucerne].Root.Live.Wt
              [Lucerne].Leaf.Live.N
              [Lucerne].Root.Live.N
              [Lucerne].Leaf.Live.NConc
              [Lucerne].Root.Live.NConc
              [Lucerne].Root.WaterSupply
              [Lucerne].Root.WaterUptake
              [Lucerne].Leaf.Transpiration
              [Lucerne].Leaf.WaterDemand
              [Lucerne].Root.Depth
              [Lucerne].Leaf.CoverTotal
              [Lucerne].Leaf.CoverDead
              [Lucerne].Leaf.LAI as LAI
              [Lucerne].Leaf.Height
              [Soil].Water.MM
              [Soil].NO3.kgha
              [DiagnosticsVariables].Script.SoilNitrogenContent
              [Lucerne].Arbitrator.N.TotalPlantDemand
              [DiagnosticsVariables].Script.FomN
              [DiagnosticsVariables].Script.HumN
              [DiagnosticsVariables].Script.BiomN
              [DiagnosticsVariables].Script.DltNMinRes
              [DiagnosticsVariables].Script.DltNMinTot
              [Lucerne].Leaf.Fw
              [Lucerne].Leaf.Fn
              [Lucerne].Phenology.CurrentPhase.Name
              [Lucerne].Phenology.CurrentStageName
              [Lucerne].Phenology.Stage
              [Lucerne].Pod.Wt
              [Lucerne].Pod.N
              [Lucerne].AboveGround.Wt *10 as ShootWt
              [Lucerne].Shell.PodNumber
              [Lucerne].Leaf.LAIFunction
              [Lucerne].MainN
              [Mower].Script.BudsDays as BudsDays
              [Mower].Script.FloDays as FloDays
              [Mower].Script.HarvestFlag
              [Mower].Script.Rotation as Rotation
              [Mower].Script.Year as GrowthSeason
          Operations IrrigationEvents
          Operations Cutting
            1997-01-29  [Mower].Script.Cut();
            1997-03-02  [Mower].Script.Cut();
            1997-06-10  [Mower].Script.Cut();
            1997-10-13  [Mower].Script.Cut();
            1997-11-24  [Mower].Script.Cut();
            1997-12-30  [Mower].Script.Cut();
            1998-02-17  [Mower].Script.Cut();
            1998-03-15  [Mower].Script.Cut();
            1998-06-05  [Mower].Script.Cut();
            1998-10-09  [Mower].Script.Cut();
            1998-11-16  [Mower].Script.Cut();
            1998-12-22  [Mower].Script.Cut();
            1999-01-14  [Mower].Script.Cut();
            1999-02-24  [Mower].Script.Cut();
            1999-04-22  [Mower].Script.Cut();
            1999-06-27  [Mower].Script.Cut();
            1999-10-06  [Mower].Script.Cut();
            1999-11-17  [Mower].Script.Cut();
            1999-12-26  [Mower].Script.Cut();
            2000-01-27  [Mower].Script.Cut();
            2000-03-18  [Mower].Script.Cut();
            2000-05-29  [Mower].Script.Cut();
            2000-10-04  [Mower].Script.Cut();
            2000-11-16  [Mower].Script.Cut();
            2000-12-27  [Mower].Script.Cut();
            2001-01-27  [Mower].Script.Cut();
            2001-03-17  [Mower].Script.Cut();
            2001-05-06  [Mower].Script.Cut();
            2001-07-04  [Mower].Script.Cut();
            2001-10-10  [Mower].Script.Cut();
            2001-11-26  [Mower].Script.Cut();
            2001-12-30  [Mower].Script.Cut();
            2002-02-15  [Mower].Script.Cut();
            2002-04-17  [Mower].Script.Cut();
          Soil IVF96_99_irrigated: Latitude=0; Longitude=0
            Physical
              Thickness  ParticleSizeSand  ParticleSizeSilt  ParticleSizeClay  Rocks  BD    AirDry  LL15   DUL    SAT
              200        5                 65                30                0      1.13  0.1     0.139  0.353  0.549
              100        5                 65                30                0      1.28  0.1     0.139  0.325  0.496
              100        5                 65                30                0      1.46  0.1     0.137  0.29   0.432
              100        5                 65                30                0      1.58  0.1     0.127  0.27   0.389
              100        5                 65                30                0      1.49  0.086   0.094  0.28   0.42
              100        5                 65                30                0      1.4   0.07    0.072  0.28   0.451
              100        5                 65                30                0      1.37  0.06    0.064  0.28   0.464
              100        5                 65                30                0      1.41  0.07    0.073  0.304  0.448
              100        5                 65                30                0      1.38  0.1     0.105  0.31   0.462
              100        5                 65                30                0      1.43  0.1     0.134  0.295  0.455
              100        5                 65                30                0      1.43  0.1     0.139  0.28   0.455
              100        5                 65                30                0      1.43  0.1     0.135  0.29   0.455
              100        5                 65                30                0      1.39  0.1     0.142  0.3    0.456
              100        5                 65                30                0      1.39  0.1     0.15   0.33   0.455
              100        5                 65                30                0      1.39  0.1     0.184  0.34   0.455
              100        5                 65                30                0      1.39  0.1     0.235  0.34   0.455
              100        5                 65                30                0      1.39  0.1     0.229  0.33   0.455
              100        5                 65                30                0      1.39  0.1     0.232  0.34   0.455
              100        5                 65                30                0      1.39  0.1     0.231  0.32   0.455
              100        5                 65                30                0      1.39  0.1     0.184  0.3    0.455
              100        5                 65                30                0      1.39  0.1     0.149  0.335  0.455
              100        5                 65                30                0      1.39  0.1     0.17   0.34   0.455
              Rocks, ParticleSizeSand, ParticleSizeSilt, ParticleSizeClay source: Calculated
              SoilCrop LucerneSoil
                LL=[0.139, 0.139, 0.137, 0.127, 0.094, 0.072, 0.064, 0.073, 0.105, 0.134, 0.139, 0.135, 0.142, 0.15, 0.184, 0.235, 0.229, 0.232, 0.231, 0.184, 0.149, 0.17]
                KL=[0.12, 0.12, 0.11, 0.11, 0.11, 0.1, 0.09, 0.05, 0.03, 0.03, 0.04, 0.05, 0.05, 0.015, 0.015, 0.01, 0.01, 0.01, 0.01, 0.01, 0.01, 0.01]
                XF=[1, 1, 1, 1, 1, 1, 1, 1, 1, 1, 1, 1, 1, 1, 1, 1, 1, 1, 1, 1, 1, 1]
            WaterBalance SoilWater: SummerDate=1-Nov; SummerU=6; SummerCona=3.5; WinterDate=1-Apr; WinterU=6; WinterCona=3.5; DiffusConst=88; DiffusSlope=35.4; Salb=0.18; CN2Bare=68; CNRed=20; CNCov=0.8; DischargeWidth=5; CatchmentArea=10; PSIDul=-100
              Thickness=[200, 100, 100, 100, 100, 100, 100, 100, 100, 100, 100, 100, 100, 100, 100, 100, 100, 100, 100, 100, 100, 100]
              SWCON=[0.55, 0.55, 0.55, 0.55, 0.55, 0.55, 0.55, 0.55, 0.55, 0.55, 0.55, 0.55, 0.65, 0.65, 0.65, 0.65, 0.65, 0.65, 0.65, 0.65, 0.65, 0.65]
            Solute NO3: InitialValuesUnits=ppm; WaterTableConcentration=0; D0=0; DepthConstant=0; MaxDepthSoluteAccessible=0; RunoffEffectivenessAtMovingSolute=0; MaxEffectiveRunoff=0
              Thickness=[200, 100, 100, 100, 100, 100, 100, 100, 100, 100, 100, 100, 100, 100, 100, 100, 100, 100, 100, 100, 100, 100]
              InitialValues=[0.70989, 0.339965, 0.25998, 0.22997, 0.229983, 0.259969, 0.269967, 0.299957, 0.299956, 0.299955, 0.299953, 0.299951, 0.29995, 0.299948, 0.299945, 0.299943, 0.29994, 0.299937, 0.29997, 0.29997, 0.300001, 0.299971]
            Solute NH4: InitialValuesUnits=ppm; WaterTableConcentration=0; D0=0; DepthConstant=0; MaxDepthSoluteAccessible=0; RunoffEffectivenessAtMovingSolute=0; MaxEffectiveRunoff=0
              Thickness=[200, 100, 100, 100, 100, 100, 100, 100, 100, 100, 100, 100, 100, 100, 100, 100, 100, 100, 100, 100, 100, 100]
              InitialValues=[0.999992, 0.999897, 0.999858, 0.999903, 0.499972, 0.499983, 0.499982, 0.500014, 0.500004, 0.500023, 0.499996, 0.49997, 0.499945, 0.499951, 0.499957, 0.499962, 0.499968, 0.499974, 0.499979, 0.499984, 0.49999, 0.499995]
            Solute Urea: InitialValuesUnits=kg/ha; WaterTableConcentration=0; D0=0; DepthConstant=0; MaxDepthSoluteAccessible=0; RunoffEffectivenessAtMovingSolute=0; MaxEffectiveRunoff=0
              Thickness=[200, 100, 100, 100, 100, 100, 100, 100, 100, 100, 100, 100, 100, 100, 100, 100, 100, 100, 100, 100, 100, 100]
              InitialValues=[0, 0, 0, 0, 0, 0, 0, 0, 0, 0, 0, 0, 0, 0, 0, 0, 0, 0, 0, 0, 0, 0]
            Water: InitialPAWmm=378.2; RelativeTo=LL15; FilledFromTop=true
              Thickness=[200, 100, 100, 100, 100, 100, 100, 100, 100, 100, 100, 100, 100, 100, 100, 100, 100, 100, 100, 100, 100, 100]
              InitialValues=[0.353, 0.325, 0.29, 0.27, 0.28, 0.28, 0.28, 0.304, 0.31, 0.295, 0.28, 0.29, 0.3, 0.33, 0.34, 0.34, 0.33, 0.34, 0.32, 0.3, 0.335, 0.34]
            Organic: FOMCNRatio=50; CarbonUnits=Total
              Thickness  Carbon  SoilCNRatio  FBiom  FInert  FOM
              200        1.82    14.5         0.025  0.45    194.46
              100        1.47    14.5         0.025  0.6     170.68
              100        1.2     14.5         0.015  0.75    149.808
              100        1.03    14.5         0.01   0.9     131.489
              100        0.47    14.5         0.01   0.96    115.409
              100        0.47    14.5         0.01   0.96    101.296
              100        0.47    14.5         0.01   0.96    88.9093
              100        0.47    14.5         0.01   0.96    78.0369
              100        0.47    14.5         0.01   0.96    68.4941
              100        0.47    14.5         0.01   0.96    60.1182
              100        0.47    14.5         0.01   0.96    52.7666
              100        0.47    14.5         0.01   0.96    46.3139
              100        0.47    14.5         0.01   0.96    40.6504
              100        0.47    14.5         0.01   0.96    35.6794
              100        0.47    14.5         0.01   0.96    31.3163
              100        0.47    14.5         0.01   0.96    27.4867
              100        0.47    14.5         0.01   0.96    24.1255
              100        0.47    14.5         0.01   0.96    21.1753
              100        0.47    14.5         0.01   0.96    18.5858
              100        0.47    14.5         0.01   0.96    16.313
              100        0.47    14.5         0.01   0.96    14.3182
              100        0.47    14.5         0.01   0.96    12.5673
            Chemical: PHUnits=Water
              Thickness  PH   CEC
              200        6.6  12.44
              100        6.2  11.6525
              100        5.7  11.045
              100        5.5  10.6625
              100        5.5  9.4025
              100        5.5  9.4025
              100        5.5  9.4025
              100        5.5  9.4025
              100        5.5  9.4025
              100        5.5  9.4025
              100        5.5  9.4025
              100        5.5  9.4025
              100        5.5  9.4025
              100        5.5  9.4025
              100        5.5  9.4025
              100        5.5  9.4025
              100        5.5  9.4025
              100        5.5  9.4025
              100        5.5  9.4025
              100        5.5  9.4025
              100        5.5  9.4025
              100        5.5  9.4025
              CEC source: Calculated
            Nutrient
            SoilTemperature Temperature
          Plant Lucerne
          BiomassRemovalEvents CutLucerne: PlantToRemoveBiomassFrom=Lucerne; RemovalType=0; StageToSet=EndJuvenile
            BiomassRemovalFractions:
              PlantName  OrganName  TypeString  LiveToRemove  DeadToRemove  LiveToResidue  DeadToResidue
              Lucerne    Root       Cutting     0             0             0              0
              Lucerne    Nodule     Cutting     0             0             0              0
              Lucerne    Leaf       Cutting     0.9           0             0.05           1
              Lucerne    Stem       Cutting     0.9           0             0.05           1
              Lucerne    TapRoot    Cutting     0             0             0              0
              Lucerne    Shell      Cutting     1             1             0              0
              Lucerne    Grain      Cutting     1             1             0              0
          Manager LucerneSowingRule
            RowSpacing = 150
            SowingDepth = 20
            StemPopulation = 400
            CultivarName = FD5
            SowingDate = 11/02/1996 00:00:00
```csharp
using Models.Soils;
using System;
using Models.Core;
using Models.PMF;
using APSIM.Shared.Utilities;
        
namespace Models
{
    [Serializable] 
    [System.Xml.Serialization.XmlInclude(typeof(Model))]
    public class Script : Model
    {
        [Link] Plant Lucerne;
        [Link] Clock Clock;

        [Description("Spacing (mm) between rows")]
        public double RowSpacing { get; set; }
        [Description("Depth (mm) Grains are planted")]
        public double SowingDepth { get; set; }
        [Description("Number of Stems (/m2)")]
        public double StemPopulation { get; set; }
        [Description("Cultivar")]
        [Display(Type=DisplayType.CultivarName)]
        public string CultivarName { get; set; }
        [Description("Sowing Date")]
        public DateTime SowingDate { get; set; }

        [EventSubscribe("DoManagement")]
        private void OnDoManagement(object sender, EventArgs e)
        {
            if (Clock.Today.Date == SowingDate)
                Lucerne.Sow(population: StemPopulation, cultivar: CultivarName, depth: SowingDepth, rowSpacing: RowSpacing, budNumber: 1);
            //Lucerne.Sow(... Contains the following arguements:
            //Population  double  Required  Number of stems/m2. Model doesn't simulate branching, so population equals to stem number. 
            //Cultivar    string  Required  "NameOfCultivar"
            //Depth       double  Optional  Depth (mm) seed sown.   Default is 100mm 
            //MaxCover    double  Optional  Proportion (0-1) of the ground row crop will cover.   Default is 1.0
            //BudNumber   double  Optional  Number of mainstems per seed sown.  Default is 1.0
            //RowSpacing  double  Optional  Spaceing (mm) between drill rows when crop is sown.  Default is 150mm
            //CropClass   string  Optional  Crop class to instantiate when crop is sown.  Default is "Plant"
        }
    }
}
```
          Manager PopulationSet
            SetDate = 01/01/2000 00:00:00
            Pop = 300
```csharp
using Models.Soils;
using APSIM.Shared.Utilities;
using Models.PMF;
using Models.Core;
using System;
        
namespace Models
{
    [Serializable] 
    [System.Xml.Serialization.XmlInclude(typeof(Model))]
    public class Script : Model
    {
        [Link] Plant Lucerne;
        [Link] Clock Clock;
         [Link] Zone zone;

        [Description("PopulationSet Date")]
        public DateTime SetDate { get; set; }
        [Description("New Population")]
        public double Pop{ get; set; }
        [EventSubscribe("DoManagement")]
        private void OnDoManagement(object sender, EventArgs e)
        {
            if (Clock.Today.Date == SetDate)
            {
                object NewPop = Pop;
                zone.Set("Lucerne.Population",NewPop);
            }
        }
    }
}
```
          Manager Mower
            YearTransation = 1-Jun
```csharp
using Models.PMF.Interfaces;
using Newtonsoft.Json;
using APSIM.Shared.Utilities;
using System.Xml.Serialization;
using Models.PMF.Interfaces;
using Models.PMF;
using Models.Core;
using System.Collections.Generic;
using System;
using Models.PMF.Phen;
using Models.Soils;
using Models.Management;

namespace Models
{
    [Serializable] 
    [System.Xml.Serialization.XmlInclude(typeof(Model))]
    public class Script : Model
    {
        [Link(Type = LinkType.Scoped, ByName = true)] 
        private BiomassRemovalEvents CutLucerne;
        [Link] private Clock clock;
        [Link] private Zone zone;
        
		public double Year {get; set;}
		public double Rotation {get; set;}
		public double YearRotation {get; set;}
		bool YearPassed {get; set;}
		public bool HarvestFlag { get;set;}
		[Description("Change to the next growth year")]
		public string YearTransation { get;set;}
		public double BudsDays { get;set;}
		public double FloDays { get;set;}
        [EventSubscribe("StartOfSimulation")]
        private void OnSimulationCommencing(object sender, EventArgs e)
        {   Year = 1;
            Rotation =1;
            YearRotation= Year + Rotation;
            HarvestFlag=false;
            YearPassed= false;
        }
        [EventSubscribe("EndOfDay")]
        private void OnEndOfDay(object sender, EventArgs e)
        {
		    if (DateUtilities.WithinDates(YearTransation, clock.Today, YearTransation))
				 YearPassed= true;
				 HarvestFlag= false;
				 BudsDays= (double)zone.Get("Lucerne.Phenology.BudsVisableDaysAfterCutting.Value()");
				 FloDays= (double)zone.Get("Lucerne.Phenology.FloweringDaysAfterCutting.Value()");
		}
        public void Cut()
        {   
        	CutLucerne.Remove();
            Rotation+=1;
            HarvestFlag= true;
            if (YearPassed)
            {Year+=1;
            Rotation=1;
            YearPassed=false;}
        }
    }
}
```
    Experiment Iversen_9
      DisabledSimNames=[Iversen_9SowingDateSD7Waterirr, Iversen_9SowingDateSD6Waterirr, Iversen_9SowingDateSD7Waterdry, Iversen_9SowingDateSD6Waterdry, Iversen_9SowingDateSD4Waterdry, Iversen_9SowingDateSD3Waterdry, Iversen_9SowingDateSD2Waterdry, Iversen_9SowingDateSD1Waterdry]
      Memo
        This experiment was established in Block 9 of Iversen field (I9) on 24 October 2000 at Lincoln University (43˚38’S and 172˚28’E). Treatments included water (dryland and irrigated) and sowing date; defoliation intervals was 42±5 days. Field data were collected from 2000 to 2002. Full details are provided in Brown (2004).
      Factors
        Permutation
          Factor SowingDate
            CompositeFactor SD1
              Specifications:
                [LucerneSowingRule].Script.SowingDate = 2000-10-24
                [Clock].StartDate = 2000-10-24
                [Cutting]
              Operations Cutting
                2001-01-25  [Mower].Script.Cut();
                2001-03-08  [Mower].Script.Cut();
                2001-05-04  [Mower].Script.Cut();
                2001-07-05  [Mower].Script.Cut();
                2001-10-04  [Mower].Script.Cut();
                2001-11-19  [Mower].Script.Cut();
                2001-12-25  [Mower].Script.Cut();
                2002-02-05  [Mower].Script.Cut();
                2002-04-08  [Mower].Script.Cut();
                2002-06-14  [Mower].Script.Cut();
            CompositeFactor SD2
              Specifications:
                [LucerneSowingRule].Script.SowingDate = 2000-11-14
                [Clock].StartDate = 2000-11-14
                [Cutting]
              Operations Cutting
                2001-02-14  [Mower].Script.Cut();
                2001-05-01  [Mower].Script.Cut();
                2001-07-05  [Mower].Script.Cut();
                2001-10-04  [Mower].Script.Cut();
                2001-11-19  [Mower].Script.Cut();
                2001-12-25  [Mower].Script.Cut();
                2002-02-05  [Mower].Script.Cut();
                2002-04-08  [Mower].Script.Cut();
                2002-06-13  [Mower].Script.Cut();
            CompositeFactor SD3
              Specifications:
                [LucerneSowingRule].Script.SowingDate = 2000-12-05
                [Clock].StartDate = 2000-12-05
                [Cutting]
              Operations Cutting
                2001-03-08  [Mower].Script.Cut();
                2001-05-03  [Mower].Script.Cut();
                2001-07-05  [Mower].Script.Cut();
                2001-10-04  [Mower].Script.Cut();
                2001-11-19  [Mower].Script.Cut();
                2001-12-25  [Mower].Script.Cut();
                2002-02-05  [Mower].Script.Cut();
                2002-04-08  [Mower].Script.Cut();
                2002-06-14  [Mower].Script.Cut();
            CompositeFactor SD4
              Specifications:
                [LucerneSowingRule].Script.SowingDate = 2000-12-27
                [Clock].StartDate = 2000-12-27
                [Cutting]
              Operations Cutting
                2001-03-28  [Mower].Script.Cut();
                2001-05-02  [Mower].Script.Cut();
                2001-07-05  [Mower].Script.Cut();
                2001-10-04  [Mower].Script.Cut();
                2001-11-19  [Mower].Script.Cut();
                2001-12-25  [Mower].Script.Cut();
                2002-02-05  [Mower].Script.Cut();
                2002-04-05  [Mower].Script.Cut();
                2002-06-13  [Mower].Script.Cut();
            CompositeFactor SD6
              Specifications:
                [LucerneSowingRule].Script.SowingDate = 2001-07-31
                [Clock].StartDate = 2001-07-31
                [Cutting]
              Operations Cutting
                2001-12-30  [Mower].Script.Cut();
            CompositeFactor SD7
              Specifications:
                [LucerneSowingRule].Script.SowingDate = 2001-10-02
                [Clock].StartDate = 2001-10-02
                [Cutting]
              Operations Cutting
                2002-01-08  [Mower].Script.Cut();
          Factor WaterTreatment
            CompositeFactor dry
              Specifications:
                [IrrigationEvents]
                [ClimateControl]
              Operations IrrigationEvents
                2001-08-11  [Irrigation].Apply(70);
              Manager ClimateControl
                StartDate = 08/11/2001 00:00:00
                EndDate = 07/01/2002 00:00:00
```csharp
using Models.Soils;
using System.Xml.Serialization;
using Models;
using Models.PMF;
using System.Text;
using System.Collections.Generic;
using APSIM.Shared.Utilities;
using Models.Core;
using System;
using Models.Climate;

namespace Models
{
    [Serializable] 
    [System.Xml.Serialization.XmlInclude(typeof(Model))]
    public class Script : Model
    {
        [Link] Weather Met;
        [Link] Clock Clock;
    
        [Description("Start Date")]
        public DateTime StartDate { get; set; }
        
        [Description("End Date")]
        public DateTime EndDate { get; set; }
 
    
        [EventSubscribe("PreparingNewWeatherData")]
        private void OnPreparingNewWeatherData(object sender, EventArgs e)
        {
            if ((Clock.Today.Date >= StartDate) && (Clock.Today.Date <= EndDate))
                Met.Rain = 0;        
        }
    }
}
```
            CompositeFactor irr: Specifications=[IrrigationEvents]
              Operations IrrigationEvents
                2000-12-20  [Irrigation].Apply(25);
                2000-12-29  [Irrigation].Apply(30);
                2001-01-28  [Irrigation].Apply(36);
                2001-02-17  [Irrigation].Apply(45);
                2001-03-07  [Irrigation].Apply(55);
                2001-03-30  [Irrigation].Apply(80);
                2001-04-29  [Irrigation].Apply(52);
                2001-10-06  [Irrigation].Apply(70);
                2001-12-06  [Irrigation].Apply(70);
                2001-12-20  [Irrigation].Apply(80);
      Simulation Simulation0
        Clock: Start=2000-10-24; End=2002-07-01
        Summary summaryfile
        Weather: FileName=lincoln.met
        SoilArbitrator Soil Arbitrator
        MicroClimate: a_interception=0; b_interception=1; c_interception=0; d_interception=0; SoilHeatFluxFraction=0.4; MinimumHeightDiffForNewLayer=0; NightInterceptionFraction=0.5; ReferenceHeight=2
        Zone paddock: Area=1; Slope=0; AspectAngle=0; Altitude=50
          Irrigation
          Fertiliser
          SurfaceOrganicMatter surface organic matter: InitialResidueName=wheat; InitialResidueType=lucerne; InitialResidueMass=0; InitialStandingFraction=0; InitialCPR=0; InitialCNR=80
          Report: EventNames=[Clock].DoReport
            VariableNames:
              [Clock].Today
              [DiagnosticsVariables].Script.AccumPlantN
              [DiagnosticsVariables].Script.AccumMineralisation
              [DiagnosticsVariables].Script.AccumDenit
              [DiagnosticsVariables].Script.AccumFert
              [DiagnosticsVariables].Script.AccumLeach
              [DiagnosticsVariables].Script.AccumDetach
              [DiagnosticsVariables].Script.DeltaSoilOMN
              [DiagnosticsVariables].Script.DeltaSurfaceOMN
              [DiagnosticsVariables].Script.DeltaSoilMineralN
              [Lucerne].Root.NSupply
              [Soil].SoilWater.Eo
              [Soil].SoilWater.Es
              [DiagnosticsVariables].Script.SWC as SWC
              [DiagnosticsVariables].Script.DUL
              [Soil].SoilWater.Drainage
              [Soil].SoilWater.Runoff
              [DiagnosticsVariables].Script.OutFlowLat
              [Soil].SoilWater.pond
              [DiagnosticsVariables].Script.AccumEO
              [DiagnosticsVariables].Script.AccumEP
              [DiagnosticsVariables].Script.AccumES
              [DiagnosticsVariables].Script.AccumDrainage
              [DiagnosticsVariables].Script.AccumRunoff
              [DiagnosticsVariables].Script.AccumRainfall
              [DiagnosticsVariables].Script.AccumIrrigation
              [DiagnosticsVariables].Script.AccumOutflowLat
              [DiagnosticsVariables].Script.SoilWaterDeficit
              [Lucerne].Grain.Live.Wt
              [Lucerne].Shell.Live.Wt
              [Lucerne].Stem.Live.Wt
              [Lucerne].Stem.Live.Wt
              [Lucerne].Grain.Live.N
              [Lucerne].Shell.Live.N
              [Lucerne].Leaf.Live.Wt
              [Lucerne].Root.Live.Wt
              [Lucerne].Leaf.Live.N
              [Lucerne].Root.Live.N
              [Lucerne].Leaf.Live.NConc
              [Lucerne].Root.Live.NConc
              [Lucerne].Root.WaterSupply
              [Lucerne].Root.WaterUptake
              [Lucerne].Leaf.Transpiration
              [Lucerne].Leaf.WaterDemand
              [Lucerne].Root.Depth
              [Lucerne].Leaf.CoverTotal
              [Lucerne].Leaf.CoverDead
              [Lucerne].Leaf.LAI
              [Lucerne].Leaf.Height
              [Soil].Water.MM
              [Soil].NO3.kgha
              [DiagnosticsVariables].Script.SoilNitrogenContent
              [Lucerne].Arbitrator.N.TotalPlantDemand
              [DiagnosticsVariables].Script.FomN
              [DiagnosticsVariables].Script.HumN
              [DiagnosticsVariables].Script.BiomN
              [DiagnosticsVariables].Script.DltNMinRes
              [DiagnosticsVariables].Script.DltNMinTot
              [Lucerne].Leaf.Fw
              [Lucerne].Leaf.Fn
              [Lucerne].Phenology.CurrentPhase.Name
              [Lucerne].Phenology.CurrentStageName
              [Lucerne].Phenology.Stage
              [Lucerne].Pod.Wt
              [Lucerne].Pod.N
              [Lucerne].AboveGround.Wt *10 as ShootWt
              [Lucerne].Shell.PodNumber
              [Lucerne].Leaf.LAIFunction
              [Mower].Script.BudsDays as BudsDays
              [Mower].Script.FloDays as FloDays
              [Mower].Script.HarvestFlag
              [Mower].Script.Rotation as Rotation
              [Mower].Script.Year as GrowthSeason
          Operations IrrigationEvents
          Operations Cutting
          Soil Iversen 7 Wakanui silt loam: SoilType=Sedementary; Region=Generic soil types; State=Canterbury; Latitude=999999; Longitude=999999; DataSource=From soil measurements made in field
            Chemical: PHUnits=Water
              Thickness  PH   CEC
              200        5.8  14.42
              100        5.8  10.595
              100        5.8  9.3575
              100        5.8  9.02
              100        5.8  8.795
              100        5.8  8.795
              100        5.8  8.795
              100        5.8  8.795
              100        5.8  8.795
              100        5.8  8.795
              100        5.8  8.795
              100        5.8  8.795
              100        5.8  8.795
              100        5.8  8.795
              100        5.8  8.795
              100        5.8  8.795
              100        5.8  8.795
              100        5.8  8.795
              100        5.8  8.795
              100        5.8  8.795
              100        5.8  8.795
              100        5.8  8.795
              CEC source: Calculated
            Physical
              Thickness  ParticleSizeSand  ParticleSizeSilt  ParticleSizeClay  Rocks  BD     AirDry  LL15   DUL    SAT   KS
              200        5                 65                30                0      1.334  0.05    0.1    0.343  0.47  58.99
              100        5                 65                30                0      1.334  0.05    0.1    0.333  0.47  58.99
              100        5                 65                30                0      1.526  0.1     0.1    0.279  0.4   6.41
              100        5                 65                30                0      1.526  0.1     0.1    0.272  0.4   6.41
              100        5                 65                30                0      1.566  0.086   0.086  0.292  0.38  6.23
              100        5                 65                30                0      1.566  0.06    0.06   0.288  0.38  6.23
              100        5                 65                30                0      1.441  0.03    0.03   0.272  0.43  9.49
              100        5                 65                30                0      1.441  0.03    0.03   0.284  0.43  9.49
              100        5                 65                30                0      1.372  0.06    0.06   0.3    0.45  33.26
              100        5                 65                30                0      1.372  0.1     0.1    0.32   0.45  33.26
              100        5                 65                30                0      1.372  0.1     0.1    0.316  0.45  33.26
              100        5                 65                30                0      1.372  0.1     0.1    0.341  0.45  33.26
              100        5                 65                30                0      1.372  0.1     0.1    0.348  0.45  33.26
              100        5                 65                30                0      1.372  0.1     0.1    0.343  0.45  33.26
              100        5                 65                30                0      1.372  0.1     0.1    0.345  0.45  33.26
              100        5                 65                30                0      1.372  0.1     0.1    0.333  0.45  33.26
              100        5                 65                30                0      1.372  0.1     0.1    0.326  0.45  33.26
              100        5                 65                30                0      1.372  0.1     0.1    0.341  0.45  33.26
              100        5                 65                30                0      1.372  0.1     0.1    0.343  0.45  33.26
              100        5                 65                30                0      1.372  0.1     0.1    0.345  0.45  33.26
              100        5                 65                30                0      1.372  0.1     0.1    0.357  0.45  33.26
              100        5                 65                30                0      1.372  0.1     0.1    0.358  0.45  33.26
              ParticleSizeSand, ParticleSizeSilt, ParticleSizeClay source: Calculated
              SoilCrop LucerneSoil
                LL=[0.1, 0.1, 0.1, 0.1, 0.086, 0.06, 0.03, 0.03, 0.06, 0.1, 0.1, 0.1, 0.1, 0.1, 0.1, 0.1, 0.1, 0.1, 0.1, 0.1, 0.1, 0.1]
                KL=[0.038, 0.038, 0.034, 0.034, 0.019, 0.019, 0.015, 0.015, 0.03, 0.03, 0.03, 0.03, 0.03, 0.03, 0.03, 0.03, 0.03, 0.03, 0.03, 0.03, 0.03, 0.03]
                XF=[1, 1, 1, 1, 1, 1, 1, 1, 1, 1, 1, 1, 1, 1, 1, 1, 1, 1, 1, 1, 1, 1]
            WaterBalance SoilWater: SummerDate=1-Nov; SummerU=9; SummerCona=4.4; WinterDate=1-Apr; WinterU=6; WinterCona=3; DiffusConst=88; DiffusSlope=35; Salb=0.13; CN2Bare=73; CNRed=20; CNCov=0.8; PSIDul=-100
              Thickness=[200, 100, 100, 100, 100, 100, 100, 100, 100, 100, 100, 100, 100, 100, 100, 100, 100, 100, 100, 100, 100, 100]
              SWCON=[0.49, 0.49, 0.34, 0.34, 0.37, 0.37, 0.1, 0.1, 0.39, 0.39, 0.39, 0.39, 0.39, 0.39, 0.39, 0.39, 0.39, 0.39, 0.39, 0.39, 0.39, 0.39]
            Solute NO3: InitialValuesUnits=ppm; WaterTableConcentration=0; D0=0; DepthConstant=0; MaxDepthSoluteAccessible=0; RunoffEffectivenessAtMovingSolute=0; MaxEffectiveRunoff=0
              Thickness=[200, 100, 100, 100, 100, 100, 100, 100, 100, 100, 100, 100, 100, 100, 100, 100, 100, 100, 100, 100, 100, 100]
              InitialValues=[15.4914, 15.4914, 15.4914, 15.4914, 15.4914, 15.4914, 15.4914, 15.4914, 15.4914, 15.4914, 15.4914, 15.4914, 15.4914, 15.4914, 15.4914, 15.4914, 15.4914, 15.4914, 15.4914, 15.4914, 15.4914, 15.4914]
            Solute NH4: InitialValuesUnits=ppm; WaterTableConcentration=0; D0=0; DepthConstant=0; MaxDepthSoluteAccessible=0; RunoffEffectivenessAtMovingSolute=0; MaxEffectiveRunoff=0
              Thickness=[200, 100, 100, 100, 100, 100, 100, 100, 100, 100, 100, 100, 100, 100, 100, 100, 100, 100, 100, 100, 100, 100]
              InitialValues=[0.0929483, 0.0929483, 0.0929483, 0.0929483, 0.0929483, 0.0929483, 0.0929483, 0.0929483, 0.0929483, 0.0929483, 0.0929483, 0.0929483, 0.0929483, 0.0929483, 0.0929483, 0.0929483, 0.0929483, 0.0929483, 0.0929483, 0.0929483, 0.0929483, 0.0929483]
            Solute Urea: same as New Zealand.Iversen_8.Iversen_8LL.paddock.IVF96_99_irrigated.Urea
            Water: InitialPAWmm=535.6; RelativeTo=LL15; FilledFromTop=true
              Thickness=[200, 100, 100, 100, 100, 100, 100, 100, 100, 100, 100, 100, 100, 100, 100, 100, 100, 100, 100, 100, 100, 100]
              InitialValues=[0.343, 0.333, 0.279, 0.272, 0.292, 0.288, 0.272, 0.284, 0.3, 0.32, 0.316, 0.341, 0.348, 0.343, 0.345, 0.333, 0.326, 0.341, 0.343, 0.345, 0.357, 0.358]
            Organic: FOMCNRatio=40; CarbonUnits=Total
              Thickness  Carbon  SoilCNRatio  FBiom  FInert  FOM
              200        2.7     11           0.03   0.4     129.64
              100        1       11           0.02   0.6     113.787
              100        0.45    11           0.01   0.7     99.8722
              100        0.3     11           0.01   0.8     87.6592
              100        0.2     11           0.01   0.9     76.9397
              100        0.2     11           0.01   0.9     67.531
              100        0.2     11           0.01   0.9     59.2729
              100        0.2     11           0.01   0.9     52.0246
              100        0.2     11           0.01   1       45.6627
              100        0.2     11           0.01   1       40.0788
              100        0.2     11           0.01   1       35.1777
              100        0.2     11           0.01   1       30.876
              100        0.2     11           0.01   1       27.1003
              100        0.2     11           0.01   1       23.7863
              100        0.2     11           0.01   0.9     20.8775
              100        0.2     11           0.01   1       18.3245
              100        0.2     11           0.01   1       16.0837
              100        0.2     11           0.01   1       14.1169
              100        0.2     11           0.01   1       12.3906
              100        0.2     11           0.01   1       10.8754
              100        0.2     11           0.01   1       9.54545
              100        0.2     11           0.01   1       8.37818
            Nutrient
            SoilTemperature Temperature
          Plant Lucerne
          BiomassRemovalEvents CutLucerne: same as New Zealand.Iversen_8.Iversen_8LL.paddock.CutLucerne
          Manager ClimateControl
            StartDate = 08/11/2001 00:00:00
            EndDate = 07/01/2002 00:00:00
```csharp
using Models.Soils;
using System.Xml.Serialization;
using Models;
using Models.PMF;
using System.Text;
using System.Collections.Generic;
using APSIM.Shared.Utilities;
using Models.Core;
using System;
using Models.Climate;

namespace Models
{
    [Serializable] 
    [System.Xml.Serialization.XmlInclude(typeof(Model))]
    public class Script : Model
    {
        [Link] Weather Met;
        [Link] Clock Clock;
    
        [Description("Start Date")]
        public DateTime StartDate { get; set; }
        
        [Description("End Date")]
        public DateTime EndDate { get; set; }
 
    
        
    }
}
```
          Manager LucerneSowingRule
            RowSpacing = 150
            SowingDepth = 8
            StemPopulation = 400
            CultivarName = FD5
            SowingDate = 10/24/2000 00:00:00
            script: same as in New Zealand.Iversen_8.Iversen_8LL.paddock.LucerneSowingRule
          Manager Mower: same as New Zealand.Iversen_8.Iversen_8LL.paddock.Mower
    Experiment Iversen_91
      Memo
        This experiment was established in Block 9 of Iversen field (I9) on 24 October 2000 at Lincoln University (43˚38’S and 172˚28’E). The irrigated treatments were continued with four defoliation regimes. These included a consistent 42±2 day cutting regime (LL), a 42±2 day (spring) but 28±4 day (autumn) cycle (LS) and it reverse (SL), and a consistent 28±4 day cutting regime (SS) to examine dry matter partitioning. Field data were collected from 2002 to 2004. Full details are provided in Teixeira (2006).
      Factors
        Factor Defoliation
          CompositeFactor LL: Specifications=[Cutting]
            Operations Cutting
              2002-10-06  [Mower].Script.Cut();
              2002-11-17  [Mower].Script.Cut();
              2002-12-29  [Mower].Script.Cut();
              2003-02-11  [Mower].Script.Cut();
              2003-03-23  [Mower].Script.Cut();
              2003-05-05  [Mower].Script.Cut();
              2003-06-13  [Mower].Script.Cut();
              2003-10-06  [Mower].Script.Cut();
              2003-11-13  [Mower].Script.Cut();
              2003-12-29  [Mower].Script.Cut();
              2004-02-08  [Mower].Script.Cut();
              2004-03-20  [Mower].Script.Cut();
              2004-05-03  [Mower].Script.Cut();
              2004-06-12  [Mower].Script.Cut();
              2004-10-04  [Mower].Script.Cut();
          CompositeFactor SL
            Specifications:
              [Cutting]
              [PopulationSet]
            Operations Cutting
              2002-09-20  [Mower].Script.Cut();
              2002-10-18  [Mower].Script.Cut();
              2002-11-14  [Mower].Script.Cut();
              2002-12-12  [Mower].Script.Cut();
              2003-01-09  [Mower].Script.Cut();
              2003-02-11  [Mower].Script.Cut();
              2003-03-23  [Mower].Script.Cut();
              2003-05-05  [Mower].Script.Cut();
              2003-06-13  [Mower].Script.Cut();
              2003-09-18  [Mower].Script.Cut();
              2003-10-19  [Mower].Script.Cut();
              2003-11-13  [Mower].Script.Cut();
              2003-12-13  [Mower].Script.Cut();
              2004-01-08  [Mower].Script.Cut();
              2004-02-08  [Mower].Script.Cut();
              2004-03-20  [Mower].Script.Cut();
              2004-05-03  [Mower].Script.Cut();
              2004-06-12  [Mower].Script.Cut();
              2004-10-06  [Mower].Script.Cut();
            Manager PopulationSet
              SetDate = 01/01/2004 00:00:00
              Pop = 300
              script: same as in New Zealand.Iversen_8.Iversen_8LL.paddock.PopulationSet
          CompositeFactor SS
            Specifications:
              [Cutting]
              [PopulationSet]
            Operations Cutting
              2002-09-20  [Mower].Script.Cut();
              2002-10-15  [Mower].Script.Cut();
              2002-11-09  [Mower].Script.Cut();
              2002-12-07  [Mower].Script.Cut();
              2003-01-07  [Mower].Script.Cut();
              2003-02-11  [Mower].Script.Cut();
              2003-03-03  [Mower].Script.Cut();
              2003-04-02  [Mower].Script.Cut();
              2003-05-02  [Mower].Script.Cut();
              2003-06-13  [Mower].Script.Cut();
              2003-09-14  [Mower].Script.Cut();
              2003-10-16  [Mower].Script.Cut();
              2003-11-12  [Mower].Script.Cut();
              2003-12-12  [Mower].Script.Cut();
              2004-01-05  [Mower].Script.Cut();
              2004-02-08  [Mower].Script.Cut();
              2004-03-04  [Mower].Script.Cut();
              2004-03-31  [Mower].Script.Cut();
              2004-04-28  [Mower].Script.Cut();
              2004-06-09  [Mower].Script.Cut();
              2004-10-06  [Mower].Script.Cut();
            Manager PopulationSet: same as New Zealand.Iversen_91.Factors.Defoliation.SL.PopulationSet
          CompositeFactor LS
            Specifications:
              [Cutting]
              [PopulationSet]
            Operations Cutting
              2002-10-06  [Mower].Script.Cut();
              2002-11-17  [Mower].Script.Cut();
              2002-12-29  [Mower].Script.Cut();
              2003-02-11  [Mower].Script.Cut();
              2003-03-08  [Mower].Script.Cut();
              2003-04-05  [Mower].Script.Cut();
              2003-05-05  [Mower].Script.Cut();
              2003-06-13  [Mower].Script.Cut();
              2003-10-06  [Mower].Script.Cut();
              2003-11-13  [Mower].Script.Cut();
              2003-12-29  [Mower].Script.Cut();
              2004-02-08  [Mower].Script.Cut();
              2004-03-07  [Mower].Script.Cut();
              2004-04-04  [Mower].Script.Cut();
              2004-05-03  [Mower].Script.Cut();
              2004-06-12  [Mower].Script.Cut();
              2004-10-06  [Mower].Script.Cut();
            Manager PopulationSet: same as New Zealand.Iversen_91.Factors.Defoliation.SL.PopulationSet
      Simulation Iversen_91
        Clock: Start=2000-10-24; End=2004-10-31
        Summary summaryfile
        Weather: FileName=lincoln.met
        SoilArbitrator Soil Arbitrator
        MicroClimate: a_interception=0; b_interception=1; c_interception=0; d_interception=0; SoilHeatFluxFraction=0.4; MinimumHeightDiffForNewLayer=0; NightInterceptionFraction=0.5; ReferenceHeight=2
        Zone paddock: Area=1; Slope=0; AspectAngle=0; Altitude=50
          Irrigation
          Fertiliser
          SurfaceOrganicMatter surface organic matter: InitialResidueName=pasture; InitialResidueType=pasture; InitialResidueMass=2500; InitialStandingFraction=0; InitialCPR=0; InitialCNR=40
          Report: EventNames=[Clock].DoReport
            VariableNames:
              [Clock].Today
              [DiagnosticsVariables].Script.AccumPlantN
              [DiagnosticsVariables].Script.AccumMineralisation
              [DiagnosticsVariables].Script.AccumDenit
              [DiagnosticsVariables].Script.AccumFert
              [DiagnosticsVariables].Script.AccumLeach
              [DiagnosticsVariables].Script.AccumDetach
              [DiagnosticsVariables].Script.DeltaSoilOMN
              [DiagnosticsVariables].Script.DeltaSurfaceOMN
              [DiagnosticsVariables].Script.DeltaSoilMineralN
              [Lucerne].Root.NSupply
              [Soil].SoilWater.Eo
              [Soil].SoilWater.Es
              [DiagnosticsVariables].Script.SWC as SWC
              [DiagnosticsVariables].Script.DUL
              [Soil].SoilWater.Drainage
              [Soil].SoilWater.Runoff
              [DiagnosticsVariables].Script.OutFlowLat
              [Soil].SoilWater.pond
              [DiagnosticsVariables].Script.AccumEO
              [DiagnosticsVariables].Script.AccumEP
              [DiagnosticsVariables].Script.AccumES
              [DiagnosticsVariables].Script.AccumDrainage
              [DiagnosticsVariables].Script.AccumRunoff
              [DiagnosticsVariables].Script.AccumRainfall
              [DiagnosticsVariables].Script.AccumIrrigation
              [DiagnosticsVariables].Script.AccumOutflowLat
              [DiagnosticsVariables].Script.SoilWaterDeficit
              [Lucerne].Grain.Live.Wt
              [Lucerne].Shell.Live.Wt
              [Lucerne].Stem.Live.Wt as StemWt
              [Lucerne].Stem.Live.Wt
              [Lucerne].Grain.Live.N
              [Lucerne].Shell.Live.N
              [Lucerne].Leaf.Live.Wt as LeafWt
              [Lucerne].Root.Live.Wt as RootWt
              [Lucerne].Leaf.Live.N
              [Lucerne].Root.Live.N
              [Lucerne].Leaf.Live.NConc
              [Lucerne].Root.Live.NConc
              [Lucerne].Root.WaterSupply
              [Lucerne].Root.WaterUptake
              [Lucerne].Leaf.Transpiration
              [Lucerne].Leaf.WaterDemand
              [Lucerne].Root.Depth
              [Lucerne].Leaf.CoverTotal
              [Lucerne].Leaf.CoverDead
              [Lucerne].Leaf.LAI
              [Lucerne].Leaf.Height
              [Soil].Water.MM
              [Soil].NO3.kgha
              [DiagnosticsVariables].Script.SoilNitrogenContent
              [Lucerne].Arbitrator.N.TotalPlantDemand
              [DiagnosticsVariables].Script.FomN
              [DiagnosticsVariables].Script.HumN
              [DiagnosticsVariables].Script.BiomN
              [DiagnosticsVariables].Script.DltNMinRes
              [DiagnosticsVariables].Script.DltNMinTot
              [Lucerne].Leaf.Fw
              [Lucerne].Leaf.Fn
              [Lucerne].Phenology.CurrentPhase.Name
              [Lucerne].Phenology.CurrentStageName
              [Lucerne].Phenology.Stage
              [Lucerne].Pod.Wt
              [Lucerne].Pod.N
              [Lucerne].AboveGround.Wt *10 as ShootWt
              [Lucerne].Shell.PodNumber
              [Lucerne].Leaf.LAIFunction
              [Mower].Script.BudsDays as BudsDays
              [Mower].Script.FloDays as FloDays
              [Mower].Script.HarvestFlag
              [Mower].Script.Rotation as Rotation
              [Mower].Script.Year as GrowthSeason
          Operations IrrigationEvents
            2000-12-20  [Irrigation].Apply(25);
            2000-12-29  [Irrigation].Apply(30);
            2001-01-28  [Irrigation].Apply(36);
            2001-02-17  [Irrigation].Apply(45);
            2001-03-07  [Irrigation].Apply(55);
            2001-03-30  [Irrigation].Apply(80);
            2001-04-29  [Irrigation].Apply(52);
            2001-10-06  [Irrigation].Apply(70);
            2001-12-06  [Irrigation].Apply(70);
            2001-12-20  [Irrigation].Apply(80);
            2002-09-12  [Irrigation].Apply(42);
            2002-10-11  [Irrigation].Apply(40);
            2002-12-31  [Irrigation].Apply(47);
            2003-01-19  [Irrigation].Apply(40);
            2003-02-12  [Irrigation].Apply(45);
            2003-02-28  [Irrigation].Apply(45);
            2003-03-14  [Irrigation].Apply(50);
            2003-03-27  [Irrigation].Apply(40);
            2003-11-27  [Irrigation].Apply(35);
            2004-01-02  [Irrigation].Apply(40);
            2004-01-14  [Irrigation].Apply(40);
            2004-02-15  [Irrigation].Apply(40);
          Plant Lucerne
          Operations Cutting
          Operations CommonCutting: same as New Zealand.Iversen_9.Factors.Permutation.SowingDate.SD1.Cutting
          Operations UncertainIrrigation
            2001-12-20  [Irrigation].Apply(50);
            2002-01-29  [Irrigation].Apply(50);
            2002-02-28  [Irrigation].Apply(50);
            2002-03-17  [Irrigation].Apply(30);
            2002-04-07  [Irrigation].Apply(30);
          BiomassRemovalEvents CutLucerne: same as New Zealand.Iversen_8.Iversen_8LL.paddock.CutLucerne
          Manager Mower: same as New Zealand.Iversen_8.Iversen_8LL.paddock.Mower
          Manager LucerneSowingRule
            RowSpacing = 150
            SowingDepth = 20
            StemPopulation = 400
            CultivarName = FD5
            SowingDate = 10/24/2000 00:00:00
            script: same as in New Zealand.Iversen_8.Iversen_8LL.paddock.LucerneSowingRule
          Manager PopulationSet
            SetDate = 07/01/2003 00:00:00
            Pop = 400
            script: same as in New Zealand.Iversen_8.Iversen_8LL.paddock.PopulationSet
          Soil Iversen 7 Wakanui silt loam: same as New Zealand.Iversen_9.Simulation0.paddock.Iversen 7 Wakanui silt loam
    Experiment Iversen_121
      Memo
        This experiment was established in 2014 in Block 12 of Iversen Field (I12), at Lincoln University (43˚38’S and 172˚27’E). Treatments were a factorial combination of three cultivars of different fall dormancy (FD): a dormant cultivar (FD2), a semi-dormant cultivar (FD5), and a non-dormant cultivar (FD10), and three defoliation frequencies: 28±3, 42±5, and 84±4 day. The initial experiment was measured over two growing seasons, from September 2014 to January 2017 and reported by Ta et al. (2020). Further data collection was continued from February 2017 to April 2019.
      Factors
        Permutation
          Factor Defoliation
            CompositeFactor SS
              Specifications:
                [Cutting]
                [PopulationSet]
              Operations Cutting
                2015-01-30  [Mower].Script.Cut();
                2015-03-01  [Mower].Script.Cut();
                2015-03-28  [Mower].Script.Cut();
                2015-04-25  [Mower].Script.Cut();
                2015-05-22  [Mower].Script.Cut();
                2015-09-03  [Mower].Script.Cut();
                2015-10-06  [Mower].Script.Cut();
                2015-11-11  [Mower].Script.Cut();
                2015-12-01  [Mower].Script.Cut();
                2015-12-29  [Mower].Script.Cut();
                2016-01-27  [Mower].Script.Cut();
                2016-02-25  [Mower].Script.Cut();
                2016-03-26  [Mower].Script.Cut();
                2016-04-22  [Mower].Script.Cut();
                2016-05-19  [Mower].Script.Cut();
                2016-08-10  [Mower].Script.Cut();
                2016-09-11  [Mower].Script.Cut();
                2016-10-09  [Mower].Script.Cut();
                2016-11-09  [Mower].Script.Cut();
                2016-12-17  [Mower].Script.Cut();
                2017-01-12  [Mower].Script.Cut();
                2017-01-26  [Mower].Script.Cut();
                2017-02-27  [Mower].Script.Cut();
                2017-03-24  [Mower].Script.Cut();
                2017-05-10  [Mower].Script.Cut();
                2017-07-16  [Mower].Script.Cut();
                2017-08-21  [Mower].Script.Cut();
                2017-09-20  [Mower].Script.Cut();
                2017-10-19  [Mower].Script.Cut();
                2017-11-27  [Mower].Script.Cut();
                2017-12-23  [Mower].Script.Cut();
                2018-01-18  [Mower].Script.Cut();
                2018-02-19  [Mower].Script.Cut();
                2018-03-20  [Mower].Script.Cut();
                2018-04-20  [Mower].Script.Cut();
                2018-07-11  [Mower].Script.Cut();
                2018-08-15  [Mower].Script.Cut();
                2018-09-13  [Mower].Script.Cut();
                2018-10-16  [Mower].Script.Cut();
                2018-11-15  [Mower].Script.Cut();
                2018-12-14  [Mower].Script.Cut();
                2019-01-11  [Mower].Script.Cut();
                2019-02-11  [Mower].Script.Cut();
                2019-03-11  [Mower].Script.Cut();
                2019-04-10  [Mower].Script.Cut();
              Manager PopulationSet
                SetDate = 07/01/2017 00:00:00
                Pop = 300
                script: same as in New Zealand.Iversen_8.Iversen_8LL.paddock.PopulationSet
            CompositeFactor LL: Specifications=[Cutting]
              Operations Cutting
                2015-01-29  [Mower].Script.Cut();
                2015-03-18  [Mower].Script.Cut();
                2015-04-26  [Mower].Script.Cut();
                2015-06-11  [Mower].Script.Cut();
                2015-09-04  [Mower].Script.Cut();
                2015-10-21  [Mower].Script.Cut();
                2015-12-08  [Mower].Script.Cut();
                2016-01-13  [Mower].Script.Cut();
                2016-02-25  [Mower].Script.Cut();
                2016-04-07  [Mower].Script.Cut();
                2016-05-20  [Mower].Script.Cut();
                2016-08-26  [Mower].Script.Cut();
                2016-10-08  [Mower].Script.Cut();
                2016-11-24  [Mower].Script.Cut();
                2017-01-25  [Mower].Script.Cut();
                2017-03-12  [Mower].Script.Cut();
                2017-05-09  [Mower].Script.Cut();
                2017-07-16  [Mower].Script.Cut();
                2017-09-03  [Mower].Script.Cut();
                2017-10-18  [Mower].Script.Cut();
                2017-12-02  [Mower].Script.Cut();
                2018-01-18  [Mower].Script.Cut();
                2018-03-09  [Mower].Script.Cut();
                2018-04-21  [Mower].Script.Cut();
                2018-07-11  [Mower].Script.Cut();
                2018-08-23  [Mower].Script.Cut();
                2018-10-16  [Mower].Script.Cut();
                2018-11-30  [Mower].Script.Cut();
                2019-01-11  [Mower].Script.Cut();
                2019-02-24  [Mower].Script.Cut();
                2019-04-10  [Mower].Script.Cut();
            CompositeFactor HH: Specifications=[Cutting]
              Operations Cutting
                2015-01-30  [Mower].Script.Cut();
                2015-04-25  [Mower].Script.Cut();
                2015-09-04  [Mower].Script.Cut();
                2015-12-03  [Mower].Script.Cut();
                2016-02-26  [Mower].Script.Cut();
                2016-05-16  [Mower].Script.Cut();
                2016-07-12  [Mower].Script.Cut();
                2016-10-15  [Mower].Script.Cut();
                2017-01-26  [Mower].Script.Cut();
                2017-04-21  [Mower].Script.Cut();
                2017-07-17  [Mower].Script.Cut();
                2017-10-19  [Mower].Script.Cut();
                2018-01-16  [Mower].Script.Cut();
                2018-04-21  [Mower].Script.Cut();
                2018-07-11  [Mower].Script.Cut();
                2018-10-16  [Mower].Script.Cut();
                2019-01-11  [Mower].Script.Cut();
                2019-05-09  [Mower].Script.Cut();
          Factor FD
            CompositeFactor FD2: Specifications=[LucerneSowingRule].Script.CultivarName = FD2
            CompositeFactor FD5: Specifications=[LucerneSowingRule].Script.CultivarName = FD5
            CompositeFactor FD10
              Specifications:
                [LucerneSowingRule].Script.CultivarName = FD10
                [PopulationSet]
              Manager PopulationSet: same as New Zealand.Iversen_121.Factors.Permutation.Defoliation.SS.PopulationSet
      Simulation Simulation5
        Clock: Start=2014-10-08; End=2019-04-09
        Summary summaryfile
        Weather: FileName=lincoln.met
        SoilArbitrator Soil Arbitrator
        MicroClimate: a_interception=0; b_interception=1; c_interception=0; d_interception=0; SoilHeatFluxFraction=0.4; MinimumHeightDiffForNewLayer=0; NightInterceptionFraction=0.5; ReferenceHeight=2
        Zone paddock: Area=1; Slope=0; AspectAngle=0; Altitude=50
          Irrigation
          Fertiliser
          SurfaceOrganicMatter surface organic matter: InitialResidueName=wheat; InitialResidueType=wheat; InitialResidueMass=0; InitialStandingFraction=0; InitialCPR=0; InitialCNR=80
          Report: EventNames=[Clock].DoReport
            VariableNames:
              [Clock].Today
              [DiagnosticsVariables].Script.AccumPlantN
              [DiagnosticsVariables].Script.AccumMineralisation
              [DiagnosticsVariables].Script.AccumDenit
              [DiagnosticsVariables].Script.AccumFert
              [DiagnosticsVariables].Script.AccumLeach
              [DiagnosticsVariables].Script.AccumDetach
              [DiagnosticsVariables].Script.DeltaSoilOMN
              [DiagnosticsVariables].Script.DeltaSurfaceOMN
              [DiagnosticsVariables].Script.DeltaSoilMineralN
              [Lucerne].Root.NSupply
              [Soil].SoilWater.Eo
              [Soil].SoilWater.Es
              [DiagnosticsVariables].Script.SWC
              [DiagnosticsVariables].Script.DUL
              [Soil].SoilWater.Drainage
              [Soil].SoilWater.Runoff
              [DiagnosticsVariables].Script.OutFlowLat
              [Soil].SoilWater.pond
              [DiagnosticsVariables].Script.AccumEO
              [DiagnosticsVariables].Script.AccumEP
              [DiagnosticsVariables].Script.AccumES
              [DiagnosticsVariables].Script.AccumDrainage
              [DiagnosticsVariables].Script.AccumRunoff
              [DiagnosticsVariables].Script.AccumRainfall
              [DiagnosticsVariables].Script.AccumIrrigation
              [DiagnosticsVariables].Script.AccumOutflowLat
              [DiagnosticsVariables].Script.SoilWaterDeficit
              [Lucerne].Grain.Live.Wt
              [Lucerne].Shell.Live.Wt
              [Lucerne].Stem.Live.Wt
              [Lucerne].Stem.Live.Wt
              [Lucerne].Grain.Live.N
              [Lucerne].Shell.Live.N
              [Lucerne].Leaf.Live.Wt
              [Lucerne].Root.Live.Wt
              [Lucerne].Leaf.Live.N
              [Lucerne].Root.Live.N
              [Lucerne].Leaf.Live.NConc
              [Lucerne].Root.Live.NConc
              [Lucerne].Root.WaterSupply
              [Lucerne].Root.WaterUptake
              [Lucerne].Leaf.Transpiration
              [Lucerne].Leaf.WaterDemand
              [Lucerne].Root.Depth
              [Lucerne].Leaf.CoverTotal
              [Lucerne].Leaf.CoverDead
              [Lucerne].Leaf.LAI
              [Lucerne].Leaf.Height
              [Soil].Water.MM
              [Soil].NO3.kgha
              [DiagnosticsVariables].Script.SoilNitrogenContent
              [Lucerne].Arbitrator.N.TotalPlantDemand
              [DiagnosticsVariables].Script.FomN
              [DiagnosticsVariables].Script.HumN
              [DiagnosticsVariables].Script.BiomN
              [DiagnosticsVariables].Script.DltNMinRes
              [DiagnosticsVariables].Script.DltNMinTot
              [Lucerne].Leaf.Fw
              [Lucerne].Leaf.Fn
              [Lucerne].Phenology.CurrentPhase.Name
              [Lucerne].Phenology.CurrentStageName
              [Lucerne].Phenology.Stage
              [Lucerne].Pod.Wt
              [Lucerne].Pod.N
              [Lucerne].AboveGround.Wt *10 as ShootWt
              [Lucerne].Shell.PodNumber
              [Lucerne].Leaf.LAIFunction
              [Mower].Script.BudsDays as BudsDays
              [Mower].Script.FloDays as FloDays
              [Mower].Script.HarvestFlag
              [Mower].Script.Rotation as Rotation
              [Mower].Script.Year as GrowthSeason
          Operations IrrigationEvents
            2015-01-13  [Irrigation].Apply(37);
            2015-01-14  [Irrigation].Apply(37);
            2015-02-05  [Irrigation].Apply(40);
            2015-02-10  [Irrigation].Apply(40);
            2015-03-25  [Irrigation].Apply(18);
            2015-11-02  [Irrigation].Apply(30);
            2015-11-03  [Irrigation].Apply(30);
            2015-11-29  [Irrigation].Apply(25);
            2015-11-30  [Irrigation].Apply(25);
            2015-12-26  [Irrigation].Apply(25);
            2015-12-27  [Irrigation].Apply(25);
            2016-01-12  [Irrigation].Apply(25);
            2016-01-13  [Irrigation].Apply(25);
            2016-02-11  [Irrigation].Apply(30);
            2016-02-12  [Irrigation].Apply(30);
            2016-03-23  [Irrigation].Apply(45);
            2016-04-11  [Irrigation].Apply(45);
            2016-04-26  [Irrigation].Apply(45);
            2016-05-15  [Irrigation].Apply(45);
            2016-12-07  [Irrigation].Apply(30);
            2016-12-08  [Irrigation].Apply(30);
            2017-01-09  [Irrigation].Apply(30);
            2017-01-10  [Irrigation].Apply(30);
            2017-02-22  [Irrigation].Apply(30);
            2017-02-23  [Irrigation].Apply(30);
            2017-03-05  [Irrigation].Apply(30);
            2017-03-06  [Irrigation].Apply(30);
            2017-11-13  [Irrigation].Apply(40);
            2017-11-21  [Irrigation].Apply(40);
            2017-11-30  [Irrigation].Apply(30);
            2017-12-14  [Irrigation].Apply(30);
            2018-01-03  [Irrigation].Apply(20);
            2018-02-14  [Irrigation].Apply(30);
            2018-02-20  [Irrigation].Apply(30);
            2018-10-10  [Irrigation].Apply(30);
            2019-01-07  [Irrigation].Apply(30);
            2019-01-28  [Irrigation].Apply(45);
            2019-01-29  [Irrigation].Apply(45);
            2019-02-07  [Irrigation].Apply(30);
            2019-02-18  [Irrigation].Apply(45);
            2019-02-19  [Irrigation].Apply(45);
            2019-02-21  [Irrigation].Apply(30);
            2019-03-07  [Irrigation].Apply(30);
            2019-03-08  [Irrigation].Apply(30);
          Plant Lucerne
          Operations Cutting
          Soil: Latitude=0; Longitude=0
            Chemical: PHUnits=Water
              Thickness  PH  CEC
              200        6   15.5
              100        6   11.475
              100        6   11.8345
              100        6   11.497
              100        6   11.272
              100        6   7.81
              100        6   7.81
              100        6   9.475
              100        6   8.475
              100        6   8.795
              100        6   8.795
              100        6   8.795
              100        6   8.795
              100        6   8.795
              100        6   8.795
              100        6   8.795
              100        6   8.795
              100        6   8.795
              100        6   8.795
              100        6   8.795
              100        6   8.795
              100        6   8.795
              CEC source: Calculated
            Water: InitialPAWmm=562.823; RelativeTo=LL15; FilledFromTop=false
              Thickness=[100, 100, 100, 100, 100, 100, 100, 100, 100, 100, 100, 100, 100, 100, 100, 100, 100, 100, 100, 100, 100, 100, 100]
              InitialValues=[0.349572, 0.349577, 0.319611, 0.289658, 0.269689, 0.309626, 0.329595, 0.349564, 0.33958, 0.33958, 0.33958, 0.33958, 0.339595, 0.329611, 0.329611, 0.319642, 0.299673, 0.299673, 0.299673, 0.309642, 0.309658, 0.319642, 0.349595]
            Physical
              Thickness  ParticleSizeSand  ParticleSizeSilt  ParticleSizeClay  Rocks     BD    AirDry  LL15   DUL   SAT
              100        5                 65                30                0.22101   1.26  0.05    0.075  0.35  0.38
              100        5                 65                30                0.22101   1.26  0.06    0.078  0.35  0.38
              100        5                 65                30                0.200511  1.26  0.07    0.07   0.32  0.39
              100        5                 65                30                0.246423  1.44  0.07    0.07   0.29  0.32
              100        5                 65                30                0.293522  1.44  0.069   0.07   0.27  0.3
              100        5                 65                30                0.246423  1.44  0.07    0.07   0.31  0.32
              100        5                 65                30                0.102947  1.57  0.07    0.07   0.33  0.34
              100        5                 65                30                0         1.57  0.07    0.07   0.35  0.35
              100        5                 65                30                0         1.57  0.07    0.07   0.34  0.35
              100        5                 65                30                0         1.58  0.07    0.07   0.34  0.35
              100        5                 65                30                0         1.58  0.07    0.07   0.34  0.35
              100        5                 65                30                0         1.58  0.07    0.07   0.34  0.35
              100        5                 65                30                0         1.58  0.08    0.08   0.34  0.35
              100        5                 65                30                0         1.59  0.078   0.08   0.33  0.35
              100        5                 65                30                0         1.59  0.08    0.08   0.33  0.35
              100        5                 65                30                0         1.59  0.087   0.09   0.32  0.34
              100        5                 65                30                0.112903  1.59  0.09    0.09   0.3   0.33
              100        5                 65                30                0.112903  1.59  0.09    0.09   0.3   0.33
              100        5                 65                30                0.112903  1.59  0.09    0.09   0.3   0.33
              100        5                 65                30                0.112903  1.59  0.08    0.08   0.31  0.33
              100        5                 65                30                0.112903  1.59  0.09    0.09   0.31  0.33
              100        5                 65                30                0         1.59  0.09    0.09   0.32  0.34
              100        5                 65                30                0         1.59  0.09    0.09   0.35  0.38
              Rocks, ParticleSizeSand, ParticleSizeSilt, ParticleSizeClay source: Calculated
              SoilCrop LucerneSoil
                LL=[0.1, 0.13, 0.12, 0.12, 0.11, 0.08, 0.08, 0.08, 0.09, 0.11, 0.12, 0.15, 0.15, 0.15, 0.16, 0.2, 0.25, 0.25, 0.25, 0.25, 0.23, 0.15, 0.15]
                KL=[0.06, 0.06, 0.03, 0.03, 0.03, 0.03, 0.03, 0.03, 0.03, 0.03, 0.03, 0.03, 0.03, 0.03, 0.03, 0.03, 0.03, 0.03, 0.03, 0.03, 0.03, 0.03, 0.03]
                XF=[1, 1, 1, 1, 1, 1, 1, 1, 1, 1, 1, 1, 1, 1, 1, 1, 1, 1, 1, 1, 1, 1, 1]
            Nutrient
            WaterBalance SoilWater: SummerDate=1-Oct; SummerU=6; SummerCona=3; WinterDate=1-Mar; WinterU=5; WinterCona=2.5; DiffusConst=189; DiffusSlope=21; Salb=0.13; CN2Bare=0; CNRed=0; CNCov=0.8; PSIDul=-100
              Thickness=[200, 100, 100, 100, 100, 100, 100, 100, 100, 100, 100, 100, 100, 100, 100, 100, 100, 100, 100, 100, 100, 100]
              SWCON=[0.99, 0.99, 0.99, 0.99, 0.99, 0.99, 0.99, 0.99, 0.99, 0.99, 0.99, 0.99, 0.99, 0.99, 0.99, 0.99, 0.99, 0.99, 0.99, 0.99, 0.99, 0.99]
              RunoffModel: TillageCnCumWater=0; TillageCnRed=0; CumWaterSinceTillage=0
                CNReductionForCover
                  LinearInterpolationFunction EffectiveCoverMultiplier
                    XYPairs: X=[0, 600, 1800, 30000]; Y=[1, 1, 0, 0]
                    Constant XValue: FixedValue=0
                CNReductionForTillage: tillageCnCumWater=0; tillageCnRed=0
              EvaporationModel: t=0
              LateralFlowModel
              SaturatedFlowModel
              UnsaturatedFlowModel
              WaterTableModel
            Organic: FOMCNRatio=30; CarbonUnits=Total
              Thickness  Carbon  SoilCNRatio  FBiom  FInert  FOM
              100        1.82    11.5         0.025  0.3     1243.93
              200        1.47    11.5         0.025  0.4     833.832
              300        1.2     11.5         0.015  0.75    457.617
              300        1.03    11.5         0.01   0.9     251.145
              300        0.47    11.5         0.01   0.96    137.831
              300        0.47    11.5         0.01   0.96    75.6435
            Solute NO3: Thickness=[100, 200, 300, 300, 300, 300]; InitialValues=[172.222, 11.9048, 1.15741, 1.06157, 0, 0]; InitialValuesUnits=ppm; WaterTableConcentration=0; D0=0; DepthConstant=0; MaxDepthSoluteAccessible=0; RunoffEffectivenessAtMovingSolute=0; MaxEffectiveRunoff=0
            Solute NH4: Thickness=[100, 200, 300, 300, 300, 300]; InitialValues=[0, 0, 0, 0, 0, 0]; InitialValuesUnits=ppm; WaterTableConcentration=0; D0=0; DepthConstant=0; MaxDepthSoluteAccessible=0; RunoffEffectivenessAtMovingSolute=0; MaxEffectiveRunoff=0
            Solute Urea: Thickness=[100, 200, 300, 300, 300, 300]; InitialValues=[0, 0, 0, 0, 0, 0]; InitialValuesUnits=kg/ha; WaterTableConcentration=0; D0=0; DepthConstant=0; MaxDepthSoluteAccessible=0; RunoffEffectivenessAtMovingSolute=0; MaxEffectiveRunoff=0
            SoilTemperature Temperature
          BiomassRemovalEvents CutLucerne: same as New Zealand.Iversen_8.Iversen_8LL.paddock.CutLucerne
          Manager Mower: same as New Zealand.Iversen_8.Iversen_8LL.paddock.Mower
          Manager PopulationSet
            SetDate = 01/01/2018 00:00:00
            Pop = 400
            script: same as in New Zealand.Iversen_8.Iversen_8LL.paddock.PopulationSet
          Manager LucerneSowingRule
            RowSpacing = 150
            SowingDepth = 20
            StemPopulation = 400
            CultivarName = FD2
            SowingDate = 10/08/2014 00:00:00
            script: same as in New Zealand.Iversen_8.Iversen_8LL.paddock.LucerneSowingRule
    Experiment Iversen_12
      DisabledSimNames=[Iversen_12SowingDateSD10, Iversen_12SowingDateSD9, Iversen_12SowingDateSD8, Iversen_12SowingDateSD7, Iversen_12SowingDateSD6, Iversen_12SowingDateSD5, Iversen_12SowingDateSD4, Iversen_12SowingDateSD3, Iversen_12SowingDateSD2]
      Memo
        This experiment was established in Block 12 of Iversen Field (I12), at Lincoln University (43˚38’S and 172˚27’E). In the first growing season (2010/2011), lucerne was sown at monthly intervals on five dates from October to February, and this was repeated in the second year(10 sowing dates). No irrigation applied except establishment phase. Crop in the first year being defoliated 1–4 times depending on sowing date and 5–7 times in the second year.
      Factors
        Factor Sowing
          CompositeFactor SD1
            Specifications:
              [LucerneSowingRule].Script.SowingDate = 2010-10-04
              [Cutting]
              [Clock].StartDate = 2010-10-04
            Operations Cutting
              2010-12-29  [Mower].Script.Cut();
              2011-02-09  [Mower].Script.Cut();
              2011-04-21  [Mower].Script.Cut();
              2011-06-20  [Mower].Script.Cut();
              2011-10-12  [Mower].Script.Cut();
              2011-11-18  [Mower].Script.Cut();
              2011-12-21  [Mower].Script.Cut();
              2012-01-27  [Mower].Script.Cut();
              2012-03-16  [Mower].Script.Cut();
              2012-05-02  [Mower].Script.Cut();
              2012-07-12  [Mower].Script.Cut();
          CompositeFactor SD2
            Specifications:
              [LucerneSowingRule].Script.SowingDate = 2010-11-04
              [Cutting]
              [Clock].StartDate = 2010-11-04
            Operations Cutting
              2011-01-18  [Mower].Script.Cut();
              2011-03-11  [Mower].Script.Cut();
              2011-05-14  [Mower].Script.Cut();
              2011-06-20  [Mower].Script.Cut();
              2011-10-12  [Mower].Script.Cut();
              2011-11-18  [Mower].Script.Cut();
              2011-12-21  [Mower].Script.Cut();
              2012-01-27  [Mower].Script.Cut();
              2012-03-16  [Mower].Script.Cut();
              2012-05-02  [Mower].Script.Cut();
          CompositeFactor SD3
            Specifications:
              [LucerneSowingRule].Script.SowingDate = 2010-12-02
              [Cutting]
              [Clock].StartDate = 2010-12-02
            Operations Cutting
              2011-02-16  [Mower].Script.Cut();
              2011-04-21  [Mower].Script.Cut();
              2011-06-20  [Mower].Script.Cut();
              2011-10-12  [Mower].Script.Cut();
              2011-11-18  [Mower].Script.Cut();
              2011-12-21  [Mower].Script.Cut();
              2012-01-27  [Mower].Script.Cut();
              2012-03-16  [Mower].Script.Cut();
              2012-05-02  [Mower].Script.Cut();
          CompositeFactor SD4
            Specifications:
              [LucerneSowingRule].Script.SowingDate = 2011-01-10
              [Cutting]
              [Clock].StartDate = 2011-01-10
            Operations Cutting
              2011-05-06  [Mower].Script.Cut();
              2011-06-20  [Mower].Script.Cut();
              2011-10-12  [Mower].Script.Cut();
              2011-11-18  [Mower].Script.Cut();
              2011-12-21  [Mower].Script.Cut();
              2012-01-27  [Mower].Script.Cut();
              2012-03-16  [Mower].Script.Cut();
              2012-05-02  [Mower].Script.Cut();
          CompositeFactor SD5
            Specifications:
              [LucerneSowingRule].Script.SowingDate = 2011-02-07
              [Cutting]
              [Clock].StartDate = 2011-02-7
            Operations Cutting
              2011-05-18  [Mower].Script.Cut();
              2011-06-20  [Mower].Script.Cut();
              2011-10-12  [Mower].Script.Cut();
              2011-11-18  [Mower].Script.Cut();
              2011-12-21  [Mower].Script.Cut();
              2012-01-27  [Mower].Script.Cut();
              2012-03-16  [Mower].Script.Cut();
              2012-05-02  [Mower].Script.Cut();
          CompositeFactor SD6
            Specifications:
              [LucerneSowingRule].Script.SowingDate = 2011-10-10
              [Cutting]
              [Clock].StartDate = 2011-10-10
            Operations Cutting
              2012-01-05  [Mower].Script.Cut();
              2012-02-22  [Mower].Script.Cut();
              2012-04-05  [Mower].Script.Cut();
              2012-06-21  [Mower].Script.Cut();
          CompositeFactor SD7
            Specifications:
              [LucerneSowingRule].Script.SowingDate = 2011-11-07
              [Cutting]
              [Clock].StartDate = 2011-11-07
            Operations Cutting
              2012-01-26  [Mower].Script.Cut();
              2012-03-13  [Mower].Script.Cut();
              2012-05-03  [Mower].Script.Cut();
          CompositeFactor SD8
            Specifications:
              [LucerneSowingRule].Script.SowingDate = 2011-12-09
              [Cutting]
              [Clock].StartDate = 2011-12-09
            Operations Cutting
              2012-02-28  [Mower].Script.Cut();
              2012-04-12  [Mower].Script.Cut();
          CompositeFactor SD9
            Specifications:
              [LucerneSowingRule].Script.SowingDate = 2012-01-10
              [Cutting]
              [Clock].StartDate = 2012-01-10
            Operations Cutting
              2012-04-26  [Mower].Script.Cut();
          CompositeFactor SD10
            Specifications:
              [LucerneSowingRule].Script.SowingDate = 2012-02-17
              [Cutting]
              [Clock].StartDate = 2012-02-17
            Operations Cutting
      Simulation Simulation3
        Clock: Start=2010-09-27; End=2012-07-12
        Summary summaryfile
        Weather: FileName=lincoln.met
        SoilArbitrator Soil Arbitrator
        MicroClimate: a_interception=0; b_interception=1; c_interception=0; d_interception=0; SoilHeatFluxFraction=0.4; MinimumHeightDiffForNewLayer=0; NightInterceptionFraction=0.5; ReferenceHeight=2
        Zone paddock: Area=1; Slope=0; AspectAngle=0; Altitude=50
          Irrigation
          Fertiliser
          SurfaceOrganicMatter surface organic matter: InitialResidueName=wheat; InitialResidueType=wheat; InitialResidueMass=0; InitialStandingFraction=0; InitialCPR=0; InitialCNR=80
          Report: same as New Zealand.Iversen_121.Simulation5.paddock.Report
          Operations IrrigationEvents
          Operations Cutting
          Soil Wakanui silt loam_Iversen 12: SoilType=Aquic Haplustept (US), Mottled Inmature Pallic (NZ); Site=Lincoln University: Iversen Field Paddock 12; NearestTown=Lincoln; State=Canterbury; Country=New Zealand; Latitude=999999; Longitude=999999; DataSource=Soil water characterised from NNM (2 years).
            Chemical: same as New Zealand.Iversen_121.Simulation5.paddock.Soil.Chemical
            Physical
              Thickness  ParticleSizeSand  ParticleSizeSilt  ParticleSizeClay  Rocks  BD     AirDry  LL15   DUL     SAT
              200        53                25                22                0      1.26   0.075   0.075  0.3475  0.382
              100        54                25                21                0      1.26   0.078   0.078  0.3518  0.387
              100        34                34                32                0      1.26   0.072   0.072  0.2925  0.322
              100        34                34                32                0      1.441  0.072   0.072  0.2738  0.301
              100        34                34                32                0      1.441  0.069   0.069  0.2701  0.297
              100        70                20                10                0      1.566  0.068   0.068  0.2924  0.322
              100        70                20                10                0      1.566  0.069   0.069  0.3043  0.335
              100        55                25                20                0      1.566  0.068   0.068  0.3153  0.347
              100        60                25                15                0      1.61   0.068   0.068  0.3213  0.353
              100        5                 65                30                0      1.61   0.067   0.067  0.3193  0.351
              100        5                 65                30                0      1.61   0.068   0.068  0.3073  0.338
              100        5                 65                30                0      1.61   0.076   0.076  0.2838  0.312
              100        5                 65                30                0      1.61   0.078   0.078  0.2965  0.326
              100        5                 65                30                0      1.61   0.082   0.082  0.3368  0.37
              100        5                 65                30                0      1.61   0.087   0.087  0.3408  0.375
              100        5                 65                30                0      1.61   0.09    0.09   0.3515  0.387
              100        5                 65                30                0      1.61   0.089   0.089  0.367   0.392
              100        5                 65                30                0      1.61   0.089   0.089  0.3723  0.392
              100        5                 65                30                0      1.61   0.091   0.091  0.3658  0.392
              100        5                 65                30                0      1.61   0.1     0.1    0.3685  0.392
              100        5                 65                30                0      1.61   0.102   0.102  0.3653  0.392
              100        5                 65                30                0      1.61   0.107   0.107  0.363   0.392
              ParticleSizeSand, ParticleSizeSilt, ParticleSizeClay source: Calculated (layer 10, 11, 12, 13, 14, 15, 16, 17, 18, 19, 20, 21, 22)
              SoilCrop LucerneSoil
                LL=[0.098, 0.142, 0.134, 0.111, 0.095, 0.093, 0.097, 0.116, 0.14, 0.135, 0.117, 0.098, 0.108, 0.117, 0.17, 0.226, 0.242, 0.267, 0.278, 0.287, 0.293, 0.299]
                KL=[0.06, 0.03, 0.03, 0.03, 0.03, 0.03, 0.027, 0.03, 0.03, 0.029, 0.03, 0.029, 0.03, 0.027, 0.03, 0.03, 0.03, 0.03, 0.03, 0.025, 0.03, 0.03]
                XF=[1, 1, 1, 1, 1, 1, 1, 1, 1, 1, 1, 1, 1, 1, 1, 1, 1, 1, 1, 1, 1, 1]
            WaterBalance SoilWater: same as New Zealand.Iversen_121.Simulation5.paddock.Soil.SoilWater
            Water: InitialPAWmm=542.868; RelativeTo=LL15; FilledFromTop=false
              Thickness=[200, 100, 100, 100, 100, 100, 100, 100, 100, 100, 100, 100, 100, 100, 100, 100, 100, 100, 100, 100, 100, 100]
              InitialValues=[0.333875, 0.33811, 0.281475, 0.26371, 0.260045, 0.28118, 0.292535, 0.302935, 0.308635, 0.306685, 0.295335, 0.27341, 0.285575, 0.32406, 0.32811, 0.338425, 0.3531, 0.358135, 0.35206, 0.355075, 0.352135, 0.3502]
            Nutrient
            Organic: FOMCNRatio=40; CarbonUnits=Total
              Thickness  Carbon  SoilCNRatio  FBiom  FInert  FOM
              200        2.7     11           0.03   0.4     117.451
              100        1       11           0.02   0.6     104.652
              100        0.45    11           0.01   0.7     93.2472
              100        0.3     11           0.01   0.8     83.0854
              100        0.2     11           0.01   0.9     74.031
              100        0.2     11           0.01   0.9     65.9634
              100        0.2     11           0.01   0.9     58.7749
              100        0.2     11           0.01   0.9     52.3698
              100        0.2     11           0.01   1       46.6627
              100        0.2     11           0.01   1       41.5776
              100        0.2     11           0.01   1       37.0466
              100        0.2     11           0.01   1       33.0094
              100        0.2     11           0.01   1       29.4121
              100        0.2     11           0.01   1       26.2069
              100        0.2     11           0.01   0.9     23.351
              100        0.2     11           0.01   1       20.8063
              100        0.2     11           0.01   1       18.5389
              100        0.2     11           0.01   1       16.5186
              100        0.2     11           0.01   1       14.7184
              100        0.2     11           0.01   1       13.1145
              100        0.2     11           0.01   1       11.6853
              100        0.2     11           0.01   1       10.4119
              300        0.2     11           0.01   1       7.36539
            Solute NO3: same as New Zealand.Iversen_9.Simulation0.paddock.Iversen 7 Wakanui silt loam.NO3
            Solute NH4: same as New Zealand.Iversen_9.Simulation0.paddock.Iversen 7 Wakanui silt loam.NH4
            Solute Urea: same as New Zealand.Iversen_8.Iversen_8LL.paddock.IVF96_99_irrigated.Urea
            SoilTemperature Temperature
          Plant Lucerne
          BiomassRemovalEvents CutLucerne: same as New Zealand.Iversen_8.Iversen_8LL.paddock.CutLucerne
          Manager Mower: same as New Zealand.Iversen_8.Iversen_8LL.paddock.Mower
          Manager LucerneSowingRule
            RowSpacing = 150
            SowingDepth = 5
            StemPopulation = 400
            CultivarName = FD5
            SowingDate = 10/24/2000 00:00:00
            script: same as in New Zealand.Iversen_8.Iversen_8LL.paddock.LucerneSowingRule
    Experiment AshleyDene
      DisabledSimNames=[AshleyDeneSowingSD6, AshleyDeneSowingDateSD10, AshleyDeneSowingDateSD9, AshleyDeneSowingDateSD8, AshleyDeneSowingDateSD7, AshleyDeneSowingDateSD6, AshleyDeneSowingDateSD5, AshleyDeneSowingDateSD4, AshleyDeneSowingDateSD3, AshleyDeneSowingDateSD2, AshleyDeneSowingDateSD1]
      Memo
        This experiment was established in Ashley Dene Research Farm, at Lincoln University (43˚38’S and 172˚27’E). In the first growing season (2010/2011), lucerne was sown at monthly intervals on five dates from October to February, and this was repeated in the second year(10 sowing dates). No irrigation applied except establishment phase. Crop in the first year being defoliated 1–4 times depending on sowing date and 5–7 times in the second year.
      Factors
        Factor Sowing
          CompositeFactor SD1
            Specifications:
              [LucerneSowingRule].Script.SowingDate = 2010-10-21
              [Cutting]
              [Clock].StartDate = 2010-10-21
            Operations Cutting
              2011-01-25  [Mower].Script.Cut();
              2011-04-08  [Mower].Script.Cut();
              2011-06-20  [Mower].Script.Cut();
              2011-11-03  [Mower].Script.Cut();
              2011-12-23  [Mower].Script.Cut();
              2012-03-07  [Mower].Script.Cut();
              2012-04-25  [Mower].Script.Cut();
          CompositeFactor SD2
            Specifications:
              [LucerneSowingRule].Script.SowingDate = 2010-11-09
              [Cutting]
              [Clock].StartDate = 2010-11-09
            Operations Cutting
              2011-02-19  [Mower].Script.Cut();
              2011-05-04  [Mower].Script.Cut();
              2011-06-20  [Mower].Script.Cut();
              2011-11-04  [Mower].Script.Cut();
              2011-12-23  [Mower].Script.Cut();
              2012-03-07  [Mower].Script.Cut();
              2012-04-25  [Mower].Script.Cut();
          CompositeFactor SD3
            Specifications:
              [LucerneSowingRule].Script.SowingDate = 2010-12-08
              [Cutting]
              [Clock].StartDate = 2010-12-08
            Operations Cutting
              2011-04-02  [Mower].Script.Cut();
              2011-06-20  [Mower].Script.Cut();
              2011-11-04  [Mower].Script.Cut();
              2011-12-23  [Mower].Script.Cut();
              2012-03-07  [Mower].Script.Cut();
              2012-04-25  [Mower].Script.Cut();
          CompositeFactor SD4
            Specifications:
              [LucerneSowingRule].Script.SowingDate = 2011-01-13
              [Cutting]
              [Clock].StartDate = 2011-01-13
            Operations Cutting
              2011-05-05  [Mower].Script.Cut();
              2011-06-20  [Mower].Script.Cut();
              2011-11-03  [Mower].Script.Cut();
              2011-12-23  [Mower].Script.Cut();
              2012-03-07  [Mower].Script.Cut();
              2012-04-25  [Mower].Script.Cut();
          CompositeFactor SD5
            Specifications:
              [LucerneSowingRule].Script.SowingDate = 2011-02-03
              [Cutting]
              [Clock].StartDate = 2011-02-03
            Operations Cutting
              2011-06-20  [Mower].Script.Cut();
              2011-11-03  [Mower].Script.Cut();
              2011-12-23  [Mower].Script.Cut();
              2012-03-07  [Mower].Script.Cut();
              2012-04-25  [Mower].Script.Cut();
          CompositeFactor SD6
            Specifications:
              [LucerneSowingRule].Script.SowingDate = 2011-10-10
              [Cutting]
              [Clock].StartDate = 2011-10-10
            Operations Cutting
              2012-01-23  [Mower].Script.Cut();
              2012-03-07  [Mower].Script.Cut();
              2012-04-25  [Mower].Script.Cut();
          CompositeFactor SD7
            Specifications:
              [LucerneSowingRule].Script.SowingDate = 2011-11-07
              [Cutting]
              [Clock].StartDate = 2011-11-07
            Operations Cutting
              2012-02-08  [Mower].Script.Cut();
              2012-04-25  [Mower].Script.Cut();
          CompositeFactor SD8
            Specifications:
              [LucerneSowingRule].Script.SowingDate = 2011-12-09
              [Cutting]
              [Clock].StartDate = 2011-12-09
            Operations Cutting
              2012-03-27  [Mower].Script.Cut();
          CompositeFactor SD9: same as New Zealand.Iversen_12.Factors.Sowing.SD9
          CompositeFactor SD10
            Specifications:
              [LucerneSowingRule].Script.SowingDate = 2012-02-17
              [Cutting]
              [Clock].StartDate = 2012-02-17
            Operations Cutting
      Simulation AshleyDene
        Clock: Start=2010-10-03; End=2012-06-13
        Summary summaryfile
        Weather: FileName=Weather_AshleyDene.met
        SoilArbitrator Soil Arbitrator
        MicroClimate: a_interception=0; b_interception=1; c_interception=0; d_interception=0; SoilHeatFluxFraction=0.4; MinimumHeightDiffForNewLayer=0; NightInterceptionFraction=0.5; ReferenceHeight=2
        Zone paddock: Area=1; Slope=0; AspectAngle=0; Altitude=50
          Irrigation
          Fertiliser
          SurfaceOrganicMatter surface organic matter: InitialResidueName=wheat; InitialResidueType=wheat; InitialResidueMass=0; InitialStandingFraction=0; InitialCPR=0; InitialCNR=80
          Report: same as New Zealand.Iversen_121.Simulation5.paddock.Report
          Operations IrrigationEvents
          Operations Cutting
          Plant Lucerne
          Soil AshleyDene Lismore very stony silt Loam: SoilType=Udic Haplustept (US), Pallic orthic brown soil (NZ); Site=Ashley Dene: Lincoln University Research Farm; NearestTown=Lincoln; Country=New Zealand; Latitude=999999; Longitude=999999
            Comments=Soil water characterised from NNM (2 years). Stone content and BD  from Di and Cameron 2002. Soil saturation from Cichota 2013.
            Chemical: PHUnits=Water
              Thickness=[200, 100, 100, 100, 100, 100, 100, 100, 100, 100, 100, 100, 100, 100, 100, 100, 100, 100, 100, 100, 100, 100]
              PH=[6, 6, 6, 6, 6, 6, 6, 6, 6, 6, 6, 6, 6, 6, 6, 6, 6, 6, 6, 6, 6, 6, -]
              CEC=[16.3775, 11.6525, 11.045, 10.6625, 9.4025, 9.4025, 9.4025, 9.4025, 9.4025, 9.4025, 9.4025, 9.4025, 9.4025, 9.4025, 9.4025, 9.4025, 9.4025, 9.4025, 9.4025, 9.4025, 9.4025, 9.4025]
              CEC source: Calculated
            Physical
              Thickness  ParticleSizeSand  ParticleSizeSilt  ParticleSizeClay  Rocks     BD    AirDry  LL15    DUL     SAT
              200        5                 65                30                0.496025  1.15  0.075   0.075   0.2653  0.2653
              100        5                 65                30                0.637738  1.15  0.0829  0.0829  0.1907  0.1907
              100        5                 65                30                0.671887  1.31  0.0778  0.0778  0.1543  0.1543
              100        5                 65                30                0.72441   1.31  0.0766  0.0766  0.1296  0.1296
              100        5                 65                30                0.529839  1.95  0.0723  0.0723  0.1155  0.1155
              100        5                 65                30                0.559147  1.95  0.0726  0.0726  0.1083  0.1083
              100        5                 65                30                0.559962  1.95  0.0718  0.0718  0.1081  0.1081
              100        5                 65                30                0.538794  1.95  0.0733  0.0733  0.1133  0.1133
              100        5                 65                30                0.550599  1.95  0.0722  0.0722  0.1104  0.1104
              100        5                 65                30                0.566882  1.95  0.0728  0.0728  0.1064  0.1064
              100        5                 65                30                0.573395  1.95  0.0759  0.0759  0.1048  0.1048
              100        5                 65                30                0.540015  1.95  0.0858  0.0858  0.113   0.113
              100        5                 65                30                0.536352  1.95  0.0868  0.0868  0.1139  0.1139
              100        5                 65                30                0.505415  1.95  0.091   0.091   0.1215  0.1215
              100        5                 65                30                0.469593  1.95  0.1     0.1     0.1303  0.1303
              100        5                 65                30                0.485876  1.95  0.1023  0.1023  0.1263  0.1263
              100        5                 65                30                0.501751  1.95  0.0983  0.0983  0.1224  0.1224
              100        5                 65                30                0.527803  1.95  0.0978  0.0978  0.116   0.116
              100        5                 65                30                0.539201  1.95  0.0972  0.0972  0.1132  0.1132
              100        5                 65                30                0.55467   1.95  0.0999  0.0999  0.1094  0.1094
              100        5                 65                30                0.511521  1.95  0.1018  0.1018  0.12    0.12
              100        5                 65                30                0.552634  1.95  0.1069  0.1069  0.1099  0.1099
              Rocks, ParticleSizeSand, ParticleSizeSilt, ParticleSizeClay source: Calculated
              SoilCrop LucerneSoil
                LL=[0.075, 0.083, 0.078, 0.077, 0.072, 0.073, 0.072, 0.073, 0.072, 0.073, 0.076, 0.086, 0.087, 0.091, 0.1, 0.102, 0.098, 0.098, 0.097, 0.1, 0.102, 0.107]
                KL=[0.06, 0.06, 0.049, 0.048, 0.055, 0.05, 0.048, 0.059, 0.076, 0.051, 0.094, 0.069, 0.033, 0.03, 0.043, 0.043, 0.056, 0.061, 0.03, 0.03, 0.03, 0.03]
                XF=[1, 1, 1, 1, 1, 1, 1, 1, 1, 1, 1, 1, 1, 1, 1, 1, 1, 1, 1, 1, 1, 1]
            WaterBalance SoilWater: SummerDate=1-Oct; SummerU=5; SummerCona=4.4; WinterDate=1-Mar; WinterU=5; WinterCona=2.5; DiffusConst=88; DiffusSlope=35.4; Salb=0.18; CN2Bare=68; CNRed=20; CNCov=0.8; PSIDul=-100
              Thickness=[200, 100, 100, 100, 100, 100, 100, 100, 100, 100, 100, 100, 100, 100, 100, 100, 100, 100, 100, 100, 100, 100]
              SWCON=[0.99, 0.99, 0.99, 0.99, 0.99, 0.99, 0.99, 0.99, 0.99, 0.99, 0.99, 0.99, 0.99, 0.99, 0.99, 0.99, 0.99, 0.99, 0.99, 0.99, 0.99, 0.99]
            Nutrient
            Organic: FOMCNRatio=50; CarbonUnits=Total
              Thickness  Carbon  SoilCNRatio  FBiom  FInert  FOM
              200        3.57    14.5         0.025  0.45    194.46
              100        1.47    14.5         0.025  0.6     170.68
              100        1.2     14.5         0.015  0.75    149.808
              100        1.03    14.5         0.01   0.9     131.489
              100        0.47    14.5         0.01   0.96    115.409
              100        0.47    14.5         0.01   0.96    101.296
              100        0.47    14.5         0.01   0.96    88.9093
              100        0.47    14.5         0.01   0.96    78.0369
              100        0.47    14.5         0.01   0.96    68.4941
              100        0.47    14.5         0.01   0.96    60.1182
              100        0.47    14.5         0.01   0.96    52.7666
              100        0.47    14.5         0.01   0.96    46.3139
              100        0.47    14.5         0.01   0.96    40.6504
              100        0.47    14.5         0.01   0.96    35.6794
              100        0.47    14.5         0.01   0.96    31.3163
              100        0.47    14.5         0.01   0.96    27.4867
              100        0.47    14.5         0.01   0.96    24.1255
              100        0.47    14.5         0.01   0.96    21.1753
              100        0.47    14.5         0.01   0.96    18.5858
              100        0.47    14.5         0.01   0.96    16.313
              100        0.47    14.5         0.01   0.96    14.3182
              100        0.47    14.5         0.01   0.96    12.5673
            Water: InitialPAWmm=80.4387; RelativeTo=LL15; FilledFromTop=true
              Thickness=[200, 100, 100, 100, 100, 100, 100, 100, 100, 100, 100, 100, 100, 100, 100, 100, 100, 100, 100, 100, 100, 100]
              InitialValues=[0.2653, 0.1907, 0.1543, 0.1296, 0.1155, 0.1083, 0.1081, 0.1133, 0.103487, 0.0728, 0.0759, 0.0858, 0.0868, 0.091, 0.1, 0.1023, 0.0983, 0.0978, 0.0972, 0.0999, 0.1018, 0.1069]
            Solute NO3: InitialValuesUnits=ppm; WaterTableConcentration=0; D0=0; DepthConstant=0; MaxDepthSoluteAccessible=0; RunoffEffectivenessAtMovingSolute=0; MaxEffectiveRunoff=0
              Thickness=[200, 100, 100, 100, 100, 100, 100, 100, 100, 100, 100, 100, 100, 100, 100, 100, 100, 100, 100, 100, 100, 100]
              InitialValues=[31, 1.5, 1, 1, 1, 0.7, 0.5, 0.5, 0.5, 0.5, 0.5, 0.5, 0.5, 0.5, 0.5, 0.5, 0.5, 0.05, 0.05, 0.05, 0.05, 0]
            Solute NH4: InitialValuesUnits=ppm; WaterTableConcentration=0; D0=0; DepthConstant=0; MaxDepthSoluteAccessible=0; RunoffEffectivenessAtMovingSolute=0; MaxEffectiveRunoff=0
              Thickness=[200, 100, 100, 100, 100, 100, 100, 100, 100, 100, 100, 100, 100, 100, 100, 100, 100, 100, 100, 100, 100, 100]
              InitialValues=[8, 0.05, 0.03, 0.01, 0.01, 0.01, 0.01, 0.01, 0.01, 0.01, 0.01, 0.01, 0.01, 0.01, 0.01, 0.01, 0.01, 0.01, 0.01, 0.01, 0.01, 0]
            Solute Urea: same as New Zealand.Iversen_8.Iversen_8LL.paddock.IVF96_99_irrigated.Urea
            SoilTemperature Temperature
          BiomassRemovalEvents CutLucerne: same as New Zealand.Iversen_8.Iversen_8LL.paddock.CutLucerne
          Manager Mower: same as New Zealand.Iversen_8.Iversen_8LL.paddock.Mower
          Manager LucerneSowingRule
            RowSpacing = 150
            SowingDepth = 35
            StemPopulation = 250
            CultivarName = Kaituna
            SowingDate = 10/24/2000 00:00:00
            script: same as in New Zealand.Iversen_8.Iversen_8LL.paddock.LucerneSowingRule
  Folder Australia
    Experiment Hudson
      Factors
        Factor Def: Specification=[Cutting]
          Operations Cutting
            1995-12-01  [Mower].Script.Cut();
            1996-01-19  [Mower].Script.Cut();
            1996-02-29  [Mower].Script.Cut();
            1996-08-29  [Mower].Script.Cut();
            1996-11-27  [Mower].Script.Cut();
            1997-01-15  [Mower].Script.Cut();
            1997-03-05  [Mower].Script.Cut();
            1997-05-07  [Mower].Script.Cut();
            1997-08-22  [Mower].Script.Cut();
            1997-11-18  [Mower].Script.Cut();
            1997-12-17  [Mower].Script.Cut();
            1998-03-04  [Mower].Script.Cut();
            1998-09-11  [Mower].Script.Cut();
            1998-12-18  [Mower].Script.Cut();
            1999-02-17  [Mower].Script.Cut();
            1999-06-03  [Mower].Script.Cut();
            1999-09-30  [Mower].Script.Cut();
            1999-11-12  [Mower].Script.Cut();
            1999-12-24  [Mower].Script.Cut();
      Simulation P1 Base Simulation
        Clock: Start=1994-08-05; End=2000-01-23
        Summary summaryfile
        Weather: FileName=Hudson.met
        SoilArbitrator Soil Arbitrator
        MicroClimate: a_interception=0; b_interception=1; c_interception=0; d_interception=0; SoilHeatFluxFraction=0.4; MinimumHeightDiffForNewLayer=0; NightInterceptionFraction=0.5; ReferenceHeight=2
        Zone paddock: Area=1; Slope=0; AspectAngle=0; Altitude=50
          Irrigation
          Fertiliser
          SurfaceOrganicMatter surface organic matter: InitialResidueName=wheat; InitialResidueType=wheat; InitialResidueMass=0; InitialStandingFraction=0; InitialCPR=0; InitialCNR=80
          Report: EventNames=[Clock].DoReport
            VariableNames:
              [Clock].Today
              [DiagnosticsVariables].Script.AccumPlantN
              [DiagnosticsVariables].Script.AccumMineralisation
              [DiagnosticsVariables].Script.AccumDenit
              [DiagnosticsVariables].Script.AccumFert
              [DiagnosticsVariables].Script.AccumLeach
              [DiagnosticsVariables].Script.AccumDetach
              [DiagnosticsVariables].Script.DeltaSoilOMN
              [DiagnosticsVariables].Script.DeltaSurfaceOMN
              [DiagnosticsVariables].Script.DeltaSoilMineralN
              [Lucerne].Root.NSupply
              [Soil].SoilWater.Eo
              [Soil].SoilWater.Es
              [DiagnosticsVariables].Script.SWC as SWC
              [DiagnosticsVariables].Script.DUL
              [Soil].SoilWater.Drainage
              [Soil].SoilWater.Runoff
              Sum of [Soil].SoilWater.Runoff from 15-Feb to 01-Jan as AcmRunoff
              [DiagnosticsVariables].Script.OutFlowLat
              [Soil].
              [Soil].SoilWater.pond
              [DiagnosticsVariables].Script.AccumEO
              [DiagnosticsVariables].Script.AccumEP
              [DiagnosticsVariables].Script.AccumES
              [DiagnosticsVariables].Script.AccumDrainage
              [DiagnosticsVariables].Script.AccumRunoff
              [DiagnosticsVariables].Script.AccumRainfall
              [DiagnosticsVariables].Script.AccumIrrigation
              [DiagnosticsVariables].Script.AccumOutflowLat
              [DiagnosticsVariables].Script.SoilWaterDeficit
              [Lucerne].Grain.Live.Wt
              [Lucerne].Shell.Live.Wt
              [Lucerne].Stem.Live.Wt as StemWt
              [Lucerne].Stem.Live.Wt
              [Lucerne].Grain.Live.N
              [Lucerne].Shell.Live.N
              [Lucerne].Leaf.Live.Wt as LeafWt
              [Lucerne].Root.Live.Wt as RootWt
              [Lucerne].Leaf.Live.N
              [Lucerne].Root.Live.N
              [Lucerne].Leaf.Live.NConc
              [Lucerne].Root.Live.NConc
              [Lucerne].Root.WaterSupply
              [Lucerne].Root.WaterUptake
              [Lucerne].Leaf.Transpiration
              [Lucerne].Leaf.WaterDemand
              [Lucerne].Root.Depth
              [Lucerne].Leaf.CoverTotal
              [Lucerne].Leaf.CoverDead
              [Lucerne].Leaf.LAI
              [Lucerne].Leaf.Height
              [Soil].Water.MM
              [Soil].NO3.kgha
              [DiagnosticsVariables].Script.SoilNitrogenContent
              [Lucerne].Arbitrator.N.TotalPlantDemand
              [DiagnosticsVariables].Script.FomN
              [DiagnosticsVariables].Script.HumN
              [DiagnosticsVariables].Script.BiomN
              [DiagnosticsVariables].Script.DltNMinRes
              [DiagnosticsVariables].Script.DltNMinTot
              [Lucerne].Leaf.Fw
              [Lucerne].Leaf.Fn
              [Lucerne].Phenology.CurrentPhase.Name
              [Lucerne].Phenology.CurrentStageName
              [Lucerne].Phenology.Stage
              [Lucerne].Pod.Wt
              [Lucerne].Pod.N
              [Lucerne].AboveGround.Wt *10 as ShootWt
              [Lucerne].Shell.PodNumber
              [Lucerne].Leaf.LAIFunction
          Operations IrrigationEvents
          Plant Lucerne
          Operations Cutting
          Soil: Latitude=0; Longitude=0
            Physical
              Thickness  ParticleSizeSand  ParticleSizeSilt  ParticleSizeClay  Rocks  BD   AirDry  LL15  DUL   SAT   KS
              100        5                 65                30                0      1    0.1     0.24  0.47  0.53  24
              400        5                 65                30                0      1.1  0.1     0.28  0.49  0.54  24
              400        5                 65                30                0      1.1  0.1     0.28  0.52  0.56  24
              400        5                 65                30                0      1.1  0.1     0.29  0.5   0.53  24
              400        5                 65                30                0      1.1  0.1     0.29  0.48  0.51  24
              400        5                 65                30                0      1.2  0.1     0.29  0.48  0.51  24
              400        5                 65                30                0      1.2  0.1     0.29  0.46  0.5   24
              600        5                 65                30                0      1.2  0.1     0.33  0.45  0.48  24
              Rocks, ParticleSizeSand, ParticleSizeSilt, ParticleSizeClay source: Calculated
              SoilCrop LucerneSoil: LL=[0.25, 0.28, 0.29, 0.29, 0.33, 0.35, 0.36, 0.37]; KL=[0.08, 0.08, 0.06, 0.03, 0.03, 0.025, 0.02, 0.02]; XF=[1, 1, 1, 1, 1, 1, 1, 1]
            WaterBalance SoilWater: SummerDate=1-Nov; SummerU=9; SummerCona=5; WinterDate=1-Apr; WinterU=9; WinterCona=5; DiffusConst=40; DiffusSlope=16; Salb=0.13; CN2Bare=72; CNRed=20; CNCov=0.8; PSIDul=-100; Thickness=[100, 400, 400, 400, 400, 400, 400, 600]; SWCON=[0.4, 0.4, 0.4, 0.4, 0.4, 0.4, 0.4, 0.4]
              RunoffModel: same as New Zealand.Iversen_121.Simulation5.paddock.Soil.SoilWater.RunoffModel
              EvaporationModel: t=0
              LateralFlowModel
              SaturatedFlowModel
              UnsaturatedFlowModel
              WaterTableModel
            Nutrient
            Organic: FOMCNRatio=40; CarbonUnits=Total
              Thickness  Carbon  SoilCNRatio  FBiom  FInert  FOM
              100        1.4     14.5         0.03   0.45    1.843
              400        1.4     14.5         0.03   0.45    1.519
              400        1.4     14.5         0.02   0.6     1.251
              400        1.35    14.5         0.015  0.7     1.031
              400        0.95    14.5         0.01   0.85    0.85
              400        1       14.5         0.01   0.9     0.7
              400        0.8     14.5         0.01   0.99    0.577
              600        0.45    14.5         0.01   0.99    0.475
            Chemical: PHUnits=Water
              Thickness  PH   CEC
              100        6    11.495
              400        6.4  11.495
              400        6.8  11.495
              400        7.2  11.3825
              400        7.6  10.4825
              400        8    10.595
              400        8    10.145
              600        8    9.3575
              CEC source: Calculated
            Water: Thickness=[100, 400, 400, 400, 400, 400, 400, 600]; InitialValues=[0.46, 0.5, 0.495, 0.45, 0.45, 0.43, 0.42, 0.43]; InitialPAWmm=492; RelativeTo=LL15; FilledFromTop=false
            Solute NO3: Thickness=[100, 400, 400, 400, 400, 400, 400, 600]; InitialValues=[10.7, 9.99, 7.87, 6.2, 4.85, 3.56, 2.72, 2.34]; InitialValuesUnits=ppm; WaterTableConcentration=0; D0=0; DepthConstant=0; MaxDepthSoluteAccessible=0; RunoffEffectivenessAtMovingSolute=0; MaxEffectiveRunoff=0
            Solute NH4: Thickness=[100, 400, 400, 400, 400, 400, 400, 600]; InitialValues=[0.3, 0.3, 0.3, 0.3, 0.3, 0.3, 0.3, 0.3]; InitialValuesUnits=ppm; WaterTableConcentration=0; D0=0; DepthConstant=0; MaxDepthSoluteAccessible=0; RunoffEffectivenessAtMovingSolute=0; MaxEffectiveRunoff=0
            Solute Urea: Thickness=[100, 400, 400, 400, 400, 400, 400, 600]; InitialValues=[0, 0, 0, 0, 0, 0, 0, 0]; InitialValuesUnits=kg/ha; WaterTableConcentration=0; D0=0; DepthConstant=0; MaxDepthSoluteAccessible=0; RunoffEffectivenessAtMovingSolute=0; MaxEffectiveRunoff=0
            SoilTemperature Temperature
          BiomassRemovalEvents CutLucerne: same as New Zealand.Iversen_8.Iversen_8LL.paddock.CutLucerne
          Manager Mower: same as New Zealand.Iversen_8.Iversen_8LL.paddock.Mower
          Manager LucerneSowingRule
            RowSpacing = 150
            SowingDepth = 5
            StemPopulation = 400
            CultivarName = HunterRiver
            SowingDate = 06/01/1995 00:00:00
            script: same as in New Zealand.Iversen_8.Iversen_8LL.paddock.LucerneSowingRule
          Manager PopulationSet
            SetDate = 01/01/1998 00:00:00
            Pop = 400
            script: same as in New Zealand.Iversen_8.Iversen_8LL.paddock.PopulationSet
    Experiment Nekia: DisabledSimNames=[NekiaDefoliationCutting]
      Factors
        Factor Def: Specification=[Cutting]
          Operations Cutting
            1999-03-22  [Mower].Script.Cut();// this is estimates to simulate cutting, not real
            1999-05-02  [Mower].Script.Cut();// this is estimates to simulate cutting, not real
            1999-06-03  [Mower].Script.Cut(); //this is estimates to simulate cutting, not real
            1999-08-03  [Mower].Script.Cut(); //this is estimates to simulate cutting, not real
            1999-09-15  [Mower].Script.Cut(); //this is estimates to simulate cutting, not real
            1999-10-22  [Mower].Script.Cut();
            1999-12-03  [Mower].Script.Cut();
            2000-01-13  [Mower].Script.Cut();
            2000-04-19  [Mower].Script.Cut();
            2000-07-02  [Mower].Script.Cut();
            2000-08-06  [Mower].Script.Cut();
            2000-10-04  [Mower].Script.Cut();
            2000-11-15  [Mower].Script.Cut();
            2000-12-26  [Mower].Script.Cut();
            2001-02-09  [Mower].Script.Cut();
            2001-04-20  [Mower].Script.Cut();
            2001-06-01  [Mower].Script.Cut();
            2001-11-01  [Mower].Script.Cut();
            2001-12-14  [Mower].Script.Cut();
            2002-01-25  [Mower].Script.Cut();
            2002-03-28  [Mower].Script.Cut();
      Simulation NekiaBaseSimulation
        Clock: Start=1999-01-01; End=2002-06-15
        Summary summaryfile
        Weather: FileName=Nekia.met
        SoilArbitrator Soil Arbitrator
        MicroClimate: a_interception=0; b_interception=1; c_interception=0; d_interception=0; SoilHeatFluxFraction=0.4; MinimumHeightDiffForNewLayer=0; NightInterceptionFraction=0.5; ReferenceHeight=2
        Zone paddock: Area=1; Slope=0; AspectAngle=0; Altitude=50
          Irrigation
          Fertiliser
          SurfaceOrganicMatter surface organic matter: InitialResidueName=wheat; InitialResidueType=wheat; InitialResidueMass=0; InitialStandingFraction=0; InitialCPR=0; InitialCNR=80
          Report: EventNames=[Clock].DoReport
            VariableNames:
              [Clock].Today
              [DiagnosticsVariables].Script.AccumPlantN
              [DiagnosticsVariables].Script.AccumMineralisation
              [DiagnosticsVariables].Script.AccumDenit
              [DiagnosticsVariables].Script.AccumFert
              [DiagnosticsVariables].Script.AccumLeach
              [DiagnosticsVariables].Script.AccumDetach
              [DiagnosticsVariables].Script.DeltaSoilOMN
              [DiagnosticsVariables].Script.DeltaSurfaceOMN
              [DiagnosticsVariables].Script.DeltaSoilMineralN
              [Lucerne].Root.NSupply
              [Soil].SoilWater.Eo
              [Soil].SoilWater.Es
              [DiagnosticsVariables].Script.SWC as SWC
              [DiagnosticsVariables].Script.DUL
              [Soil].SoilWater.Drainage
              [Soil].SoilWater.Runoff
              [DiagnosticsVariables].Script.OutFlowLat
              [Soil].
              [Soil].SoilWater.pond
              [DiagnosticsVariables].Script.AccumEO
              [DiagnosticsVariables].Script.AccumEP
              [DiagnosticsVariables].Script.AccumES
              [DiagnosticsVariables].Script.AccumDrainage
              [DiagnosticsVariables].Script.AccumRunoff
              [DiagnosticsVariables].Script.AccumRainfall
              [DiagnosticsVariables].Script.AccumIrrigation
              [DiagnosticsVariables].Script.AccumOutflowLat
              [DiagnosticsVariables].Script.SoilWaterDeficit
              [Lucerne].Grain.Live.Wt
              [Lucerne].Shell.Live.Wt
              [Lucerne].Stem.Live.Wt as StemWt
              [Lucerne].Stem.Live.Wt
              [Lucerne].Grain.Live.N
              [Lucerne].Shell.Live.N
              [Lucerne].Leaf.Live.Wt as LeafWt
              [Lucerne].Root.Live.Wt as RootWt
              [Lucerne].Leaf.Live.N
              [Lucerne].Root.Live.N
              [Lucerne].Leaf.Live.NConc
              [Lucerne].Root.Live.NConc
              [Lucerne].Root.WaterSupply
              [Lucerne].Root.WaterUptake
              [Lucerne].Leaf.Transpiration
              [Lucerne].Leaf.WaterDemand
              [Lucerne].Root.Depth
              [Lucerne].Leaf.CoverTotal
              [Lucerne].Leaf.CoverDead
              [Lucerne].Leaf.LAI
              [Lucerne].Leaf.Height
              [Soil].Water.MM
              [Soil].NO3.kgha
              [DiagnosticsVariables].Script.SoilNitrogenContent
              [Lucerne].Arbitrator.N.TotalPlantDemand
              [DiagnosticsVariables].Script.FomN
              [DiagnosticsVariables].Script.HumN
              [DiagnosticsVariables].Script.BiomN
              [DiagnosticsVariables].Script.DltNMinRes
              [DiagnosticsVariables].Script.DltNMinTot
              [Lucerne].Leaf.Fw
              [Lucerne].Leaf.Fn
              [Lucerne].Phenology.CurrentPhase.Name
              [Lucerne].Phenology.CurrentStageName
              [Lucerne].Phenology.Stage
              [Lucerne].Pod.Wt
              [Lucerne].Pod.N
              [Lucerne].AboveGround.Wt *10 as ShootWt
              [Lucerne].Shell.PodNumber
              [Lucerne].Leaf.LAIFunction
          Operations IrrigationEvents
          Operations Cutting
          Plant Lucerne
          Soil: Latitude=0; Longitude=0
            Physical
              Thickness  ParticleSizeSand  ParticleSizeSilt  ParticleSizeClay  Rocks     BD   AirDry  LL15  DUL    SAT    KS
              100        5                 65                30                0.222874  1    0.16    0.2   0.35   0.45   1.5
              200        5                 65                30                0.172737  1.1  0.1     0.2   0.4    0.45   1.5
              200        5                 65                30                0.117586  1.1  0.1     0.22  0.43   0.48   1.5
              200        5                 65                30                0.117586  1.1  0.1     0.22  0.43   0.48   1.5
              200        5                 65                30                0.172737  1.1  0.1     0.23  0.4    0.45   1.5
              200        5                 65                30                0.115684  1.2  0.1     0.27  0.4    0.45   1.5
              200        5                 65                30                0.115684  1.2  0.1     0.28  0.4    0.45   1.5
              200        5                 65                30                0.115684  1.2  0.1     0.3   0.4    0.45   1.5
              200        5                 65                30                0.115684  1.2  0.1     0.31  0.4    0.45   1.5
              200        5                 65                30                0.19429   1.2  0.1     0.32  0.36   0.41   1.5
              200        5                 65                30                0.213941  1.2  0.1     0.32  0.35   0.4    1.5
              200        5                 65                30                0.213941  1.2  0.1     0.31  0.35   0.4    1.5
              200        5                 65                30                0.176822  1.3  0.1     0.29  0.34   0.39   1.5
              200        5                 65                30                0.219036  1.3  0.1     0.27  0.32   0.37   1.5
              200        5                 65                30                0.219036  1.3  0.1     0.27  0.32   0.37   1.5
              200        5                 65                30                0.240143  1.3  0.1     0.27  0.31   0.36   1.5
              200        5                 65                30                0.240143  1.3  0.1     0.28  0.32   0.37   1.5
              200        5                 65                30                0.240143  1.3  0.1     0.29  0.325  0.375  1.5
              200        5                 65                30                0.155715  1.3  0.1     0.32  0.35   0.4    1.5
              200        5                 65                30                0.113501  1.3  0.1     0.33  0.37   0.42   1.5
              200        5                 65                30                0.134608  1.3  0.1     0.36  0.4    0.45   1.5
              200        5                 65                30                0.155715  1.3  0.1     0.3   0.36   0.41   1.5
              200        5                 65                30                0.155715  1.3  0.1     0.21  0.36   0.41   1.5
              Rocks, ParticleSizeSand, ParticleSizeSilt, ParticleSizeClay source: Calculated
              SoilCrop LucerneSoil
                LL=[0.2, 0.2, 0.21, 0.23, 0.25, 0.27, 0.28, 0.3, 0.31, 0.33, 0.32, 0.31, 0.29, 0.27, 0.27, 0.27, 0.28, 0.29, 0.32, 0.33, 0.36, 0.3, 0.21]
                KL=[0, 0.06, 0.06, 0.04, 0.04, 0.02, 0.02, 0.02, 0.02, 0.02, 0.01, 0.01, 0.01, 0.01, 0.01, 0.01, 0.01, 0.01, 0.01, 0.01, 0.01, 0.01, 0.01]
                XF=[1, 1, 1, 1, 1, 1, 1, 1, 1, 1, 1, 1, 1, 1, 1, 1, 1, 1, 1, 1, 1, 1, 1]
                XF source: Calculated (layer 23)
            WaterBalance SoilWater: SummerDate=1-Nov; SummerU=6; SummerCona=3.5; WinterDate=1-Apr; WinterU=2; WinterCona=2; DiffusConst=40; DiffusSlope=16; Salb=0.13; CN2Bare=80; CNRed=20; CNCov=0.8; PSIDul=-100
              Thickness=[100, 200, 200, 200, 200, 200, 200, 200, 200, 200, 200, 200, 200, 200, 200, 200, 200, 200, 200, 200, 200, 200, 200]
              SWCON=[0.4, 0.4, 0.4, 0.4, 0.4, 0.4, 0.4, 0.4, 0.4, 0.4, 0.4, 0.4, 0.4, 0.4, 0.4, 0.4, 0.4, 0.4, 0.4, 0.4, 0.4, 0.4, 0.4]
              RunoffModel: same as New Zealand.Iversen_121.Simulation5.paddock.Soil.SoilWater.RunoffModel
              EvaporationModel: t=0
              LateralFlowModel
              SaturatedFlowModel
              UnsaturatedFlowModel
              WaterTableModel
            Nutrient
            Organic: FOMCNRatio=40; CarbonUnits=Total
              Thickness  Carbon  SoilCNRatio  FBiom  FInert  FOM
              100        1.83    14.5         0.03   0.45    1.843
              200        1.35    14.5         0.03   0.45    1.519
              200        1.19    14.5         0.02   0.6     1.251
              200        1.11    14.5         0.015  0.7     1.031
              200        0.97    14.5         0.01   0.85    0.85
              200        0.8     14.5         0.01   0.9     0.7
              200        0.64    14.5         0.01   0.99    0.577
              200        0.5     14.5         0.01   0.99    0.475
              200        0.38    14.5         0.01   0.99    0.392
              200        0.27    14.5         0.01   0.99    0.323
              200        0.27    14.5         0.01   0.99    0.266
              200        0.27    14.5         0.01   0.99    0.219
              200        0.27    14.5         0.01   0.99    0.181
              200        0.27    14.5         0.01   0.99    0.149
              200        0.27    14.5         0.01   0.99    0.123
              200        0.27    14.5         0.01   0.99    0.101
            Chemical: PHUnits=Water
              Thickness  PH   CEC
              100        6    12.463
              200        6.4  11.383
              200        6.8  11.023
              200        7.2  10.843
              200        7.6  10.527
              200        8    10.145
              200        8    9.785
              200        8    9.47
              200        8    9.2
              200        8    8.953
              200        8    8.953
              200        8    8.953
              200        8    8.953
              200        8    8.953
              200        8    8.953
              200        8    8.953
              200        8    8.953
              200        8    8.953
              200        8    8.953
              200        8    8.953
              200        8    8.953
              200        8    8.953
              CEC source: Calculated (layer 1, 2, 3, 4, 5, 6, 7, 8, 9, 10, 11, 12, 13, 14, 15)
            Water: InitialPAWmm=200; RelativeTo=LL15; FilledFromTop=false
              Thickness=[100, 200, 200, 200, 200, 200, 200, 200, 200, 200, 200, 200, 200, 200, 200, 200, 200, 200, 200, 200, 200, 200, 200]
              InitialValues=[0.275, 0.3, 0.325, 0.325, 0.315, 0.335, 0.34, 0.35, 0.355, 0.34, 0.335, 0.33, 0.315, 0.295, 0.295, 0.29, 0.3, 0.3075, 0.335, 0.35, 0.38, 0.33, 0.285]
            OutputLayers
              Thickness=[100, 200, 200, 200, 200, 200, 200, 200, 200, 200, 200, 200, 200, 200, 200, 200, 200, 200, 200, 200, 200, 200, 200]
            Solute NO3: InitialValuesUnits=ppm; WaterTableConcentration=0; D0=0; DepthConstant=0; MaxDepthSoluteAccessible=0; RunoffEffectivenessAtMovingSolute=0; MaxEffectiveRunoff=0
              Thickness=[100, 200, 200, 200, 200, 200, 200, 200, 200, 200, 200, 200, 200, 200, 200, 200, 200, 200, 200, 200, 200, 200]
              InitialValues=[10, 10, 10, 10, 10, 5, 5, 5, 5, 5, 5, 5, 5, 5, 5, 5, 5, 5, 5, 5, 5, 5]
            Solute NH4: InitialValuesUnits=ppm; WaterTableConcentration=0; D0=0; DepthConstant=0; MaxDepthSoluteAccessible=0; RunoffEffectivenessAtMovingSolute=0; MaxEffectiveRunoff=0
              Thickness=[100, 200, 200, 200, 200, 200, 200, 200, 200, 200, 200, 200, 200, 200, 200, 200, 200, 200, 200, 200, 200, 200]
              InitialValues=[0.3, 0.3, 0.3, 0.3, 0.3, 0.3, 0.3, 0.3, 0.3, 0.3, 0.3, 0.3, 0.3, 0.3, 0.3, 0.3, 0.3, 0.3, 0.3, 0.3, 0.3, 0.3]
            Solute Urea: InitialValuesUnits=kg/ha; WaterTableConcentration=0; D0=0; DepthConstant=0; MaxDepthSoluteAccessible=0; RunoffEffectivenessAtMovingSolute=0; MaxEffectiveRunoff=0
              Thickness=[100, 200, 200, 200, 200, 200, 200, 200, 200, 200, 200, 200, 200, 200, 200, 200, 200, 200, 200, 200, 200, 200]
              InitialValues=[0, 0, 0, 0, 0, 0, 0, 0, 0, 0, 0, 0, 0, 0, 0, 0, 0, 0, 0, 0, 0, 0]
            SoilTemperature Temperature
          BiomassRemovalEvents CutLucerne: same as New Zealand.Iversen_8.Iversen_8LL.paddock.CutLucerne
          Manager Mower: same as New Zealand.Iversen_8.Iversen_8LL.paddock.Mower
          Manager LucerneSowingRule
            RowSpacing = 300
            SowingDepth = 10
            StemPopulation = 350
            CultivarName = Trifecta
            SowingDate = 01/01/1999 00:00:00
            script: same as in New Zealand.Iversen_8.Iversen_8LL.paddock.LucerneSowingRule
    Experiment Tamworth: DisabledSimNames=[TamworthDefoliationCutting]
      Factors
        Factor Def: Specification=[Cutting]
          Operations Cutting
            1979-10-27  [Mower].Script.Cut();
            1979-12-03  [Mower].Script.Cut();
            1980-01-21  [Mower].Script.Cut();
            1980-02-25  [Mower].Script.Cut();
            1980-05-18  [Mower].Script.Cut();
            1980-09-08  [Mower].Script.Cut();
            1980-10-19  [Mower].Script.Cut();
            1980-11-23  [Mower].Script.Cut();
            1980-12-23  [Mower].Script.Cut();
            1981-01-19  [Mower].Script.Cut();
            1981-03-03  [Mower].Script.Cut();
            1980-10-19  [Mower].Script.Cut();
            1981-04-21  [Mower].Script.Cut();
            1981-09-08  [Mower].Script.Cut();
            1981-10-23  [Mower].Script.Cut();
            1981-11-27  [Mower].Script.Cut();
            1981-12-30  [Mower].Script.Cut();
            1982-01-29  [Mower].Script.Cut();
            1982-03-08  [Mower].Script.Cut();
            1982-04-08  [Mower].Script.Cut();
            1982-05-28  [Mower].Script.Cut();
            1982-10-27  [Mower].Script.Cut();
            1982-12-21  [Mower].Script.Cut();
            1983-02-01  [Mower].Script.Cut();
            1983-03-14  [Mower].Script.Cut();
      Simulation 1979_83 Hunter River
        Clock: Start=1979-01-01; End=1983-07-09
        Summary summaryfile
        Weather: FileName=tamworth.met
        SoilArbitrator Soil Arbitrator
        MicroClimate: a_interception=0; b_interception=1; c_interception=0; d_interception=0; SoilHeatFluxFraction=0.4; MinimumHeightDiffForNewLayer=0; NightInterceptionFraction=0.5; ReferenceHeight=2
        Zone paddock: Area=1; Slope=0; AspectAngle=0; Altitude=50
          Irrigation
          Fertiliser
          SurfaceOrganicMatter surface organic matter: InitialResidueName=wheat; InitialResidueType=wheat; InitialResidueMass=0; InitialStandingFraction=0; InitialCPR=0; InitialCNR=80
          Report: EventNames=[Clock].DoReport
          Operations IrrigationEvents
          Operations Cutting
          Plant Lucerne
          Soil Tamworth_Holford: Latitude=0; Longitude=0
            Physical
              Thickness  ParticleSizeSand  ParticleSizeSilt  ParticleSizeClay  Rocks  BD    AirDry  LL15   DUL    SAT
              150        5                 65                30                0      1.2   0.1     0.292  0.46   0.51
              150        5                 65                30                0      1.3   0.273   0.293  0.455  0.505
              200        5                 65                30                0      1.3   0.273   0.293  0.455  0.505
              300        5                 65                30                0      1.3   0.273   0.3    0.455  0.505
              300        5                 65                30                0      1.32  0.273   0.3    0.45   0.5
              300        5                 65                30                0      1.32  0.273   0.3    0.435  0.485
              300        5                 65                30                0      1.36  0.273   0.3    0.43   0.48
              300        5                 65                30                0      1.45  0.273   0.32   0.406  0.45
              300        5                 65                30                0      1.45  0.273   0.34   0.406  0.45
              300        5                 65                30                0      1.45  0.273   0.36   0.406  0.45
              300        5                 65                30                0      1.45  0.273   0.38   0.406  0.45
              Rocks, ParticleSizeSand, ParticleSizeSilt, ParticleSizeClay source: Calculated
              SoilCrop LucerneSoil
                LL=[0.292, 0.293, 0.293, 0.3, 0.3, 0.3, 0.3, 0.32, 0.34, 0.36, 0.38]
                KL=[0.08, 0.08, 0.08, 0.06, 0.04, 0.03, 0.03, 0.03, 0.02, 0.01, 0.01]
                XF=[1, 1, 1, 1, 1, 1, 1, 1, 0, 1, 1]
            WaterBalance SoilWater: SummerDate=1-Nov; SummerU=6; SummerCona=3.5; WinterDate=1-Apr; WinterU=6; WinterCona=3.5; DiffusConst=40; DiffusSlope=16; Salb=0.13; CN2Bare=72; CNRed=20; CNCov=0.8; DischargeWidth=5; CatchmentArea=10; PSIDul=-100; Thickness=[150, 150, 200, 300, 300, 300, 300, 300, 300, 300, 300]; SWCON=[0.3, 0.3, 0.3, 0.3, 0.3, 0.3, 0.3, 0.3, 0.3, 0.3, 0.3]
            Nutrient
            Organic: FOMCNRatio=50; CarbonUnits=Total
              Thickness  Carbon  SoilCNRatio  FBiom  FInert  FOM
              150        1.469   11           0.045  0.25    464.468
              150        1.04    11           0.025  0.4     397.709
              200        0.65    11           0.015  0.6     323.379
              300        0.39    11           0.01   0.8     237.099
              300        0.39    11           0.01   0.96    173.84
              300        0.26    11           0.01   0.96    127.458
              300        0.26    11           0.01   0.96    93.4517
              300        0.13    11           0.01   0.96    68.5182
              300        0.1     11           0.01   0.96    50.2372
              300        0.1     11           0.01   0.96    36.8336
              300        0.1     11           0.01   0.96    27.0062
            Chemical: PHUnits=Water
              Thickness  PH   CEC
              150        5.5  11.65025
              150        6.7  10.685
              200        6.7  9.8075
              300        7    9.2225
              300        7.2  9.2225
              300        7.7  8.93
              300        7.7  8.93
              300        7.7  8.6375
              300        7.7  8.57
              300        7.7  8.57
              300        7.7  8.57
              CEC source: Calculated
            Water: Thickness=[150, 150, 200, 300, 300, 300, 300, 300, 300, 300, 300]; InitialPAWmm=320.1; RelativeTo=LL15; FilledFromTop=false
              InitialValues=[0.46, 0.455, 0.455, 0.455, 0.45, 0.435, 0.43, 0.406, 0.406, 0.406, 0.406]
            Solute NO3: Thickness=[150, 150, 200, 300, 300, 300, 300, 300, 300, 300, 300]; InitialValues=[2, 1.5, 1, 1, 1, 1, 0.7, 0.5, 0.5, 0.5, 0.5]; InitialValuesUnits=ppm; WaterTableConcentration=0; D0=0; DepthConstant=0; MaxDepthSoluteAccessible=0; RunoffEffectivenessAtMovingSolute=0; MaxEffectiveRunoff=0
            Solute NH4: Thickness=[150, 150, 200, 300, 300, 300, 300, 300, 300, 300, 300]; InitialValuesUnits=ppm; WaterTableConcentration=0; D0=0; DepthConstant=0; MaxDepthSoluteAccessible=0; RunoffEffectivenessAtMovingSolute=0; MaxEffectiveRunoff=0
              InitialValues=[0.0500343, 0.0500343, 0.0500343, 0.0300206, 0.0100069, 0.0100069, 0.0100069, 0.0100069, 0.0100069, 0.0100069, 0.0100069]
            Solute Urea: Thickness=[150, 150, 200, 300, 300, 300, 300, 300, 300, 300, 300]; InitialValues=[0, 0, 0, 0, 0, 0, 0, 0, 0, 0, 0]; InitialValuesUnits=kg/ha; WaterTableConcentration=0; D0=0; DepthConstant=0; MaxDepthSoluteAccessible=0; RunoffEffectivenessAtMovingSolute=0; MaxEffectiveRunoff=0
            SoilTemperature Temperature
          BiomassRemovalEvents CutLucerne: same as New Zealand.Iversen_8.Iversen_8LL.paddock.CutLucerne
          Manager Mower: same as New Zealand.Iversen_8.Iversen_8LL.paddock.Mower
          Manager LucerneSowingRule
            RowSpacing = 300
            SowingDepth = 10
            StemPopulation = 200
            CultivarName = HunterRiver
            SowingDate = 04/30/1979 00:00:00
            script: same as in New Zealand.Iversen_8.Iversen_8LL.paddock.LucerneSowingRule
    Experiment Gatton: DisabledSimNames=[GattonDefoliationCutting]
      Factors
        Factor Def: Specification=[Cutting]
          Operations Cutting
            1994-09-14  [Mower].Script.Cut();
            1994-10-18  [Mower].Script.Cut();
            1994-11-17  [Mower].Script.Cut();
            1994-12-15  [Mower].Script.Cut();
            1995-01-10  [Mower].Script.Cut();
            1995-02-22  [Mower].Script.Cut();
            1995-03-29  [Mower].Script.Cut();
            1995-05-24  [Mower].Script.Cut();
            1995-07-14  [Mower].Script.Cut();
            1995-09-02  [Mower].Script.Cut();
            1995-10-11  [Mower].Script.Cut();
            1995-11-10  [Mower].Script.Cut();
      Simulation 1994_95 Hunter River
        Clock: Start=1994-05-05; End=1995-11-09
        Summary summaryfile
        Weather: FileName=gat9495i.met
        SoilArbitrator Soil Arbitrator
        MicroClimate: a_interception=0; b_interception=1; c_interception=0; d_interception=0; SoilHeatFluxFraction=0.4; MinimumHeightDiffForNewLayer=0; NightInterceptionFraction=0.5; ReferenceHeight=2
        Zone paddock: Area=1; Slope=0; AspectAngle=0; Altitude=50
          Irrigation
          Fertiliser
          SurfaceOrganicMatter surface organic matter: InitialResidueName=wheat; InitialResidueType=wheat; InitialResidueMass=0; InitialStandingFraction=0; InitialCPR=0; InitialCNR=80
          Report: EventNames=[Clock].DoReport
          Operations IrrigationEvents
          Operations Cutting
          Plant Lucerne
          Soil: Latitude=0; Longitude=0
            Physical
              Thickness  ParticleSizeSand  ParticleSizeSilt  ParticleSizeClay  Rocks  BD    AirDry  LL15   DUL    SAT
              150        5                 65                30                0      1.38  0.1     0.143  0.38   0.43
              150        5                 65                30                0      1.34  0.1     0.201  0.38   0.43
              300        5                 65                30                0      1.35  0.1     0.237  0.4    0.43
              300        5                 65                30                0      1.47  0.1     0.237  0.4    0.43
              300        5                 65                30                0      1.49  0.1     0.192  0.39   0.42
              300        5                 65                30                0      1.5   0.1     0.176  0.38   0.4
              300        5                 65                30                0      1.54  0.1     0.2    0.38   0.4
              300        5                 65                30                0      1.55  0.1     0.23   0.38   0.4
              300        5                 65                30                0      1.55  0.1     0.25   0.359  0.41
              300        5                 65                30                0      1.57  0.1     0.26   0.356  0.408
              300        5                 65                30                0      1.58  0.1     0.27   0.356  0.404
              600        5                 65                30                0      1.6   0.1     0.28   0.35   0.396
              Rocks, ParticleSizeSand, ParticleSizeSilt, ParticleSizeClay source: Calculated
              SoilCrop LucerneSoil
                LL=[0.143, 0.201, 0.237, 0.237, 0.192, 0.176, 0.2, 0.23, 0.25, 0.25, 0.25, 0.25]
                KL=[0.12, 0.12, 0.1, 0.1, 0.1, 0.08, 0.08, 0.05, 0.05, 0.03, 0.03, 0.03]
                XF=[1, 1, 1, 1, 1, 1, 1, 1, 1, 1, 1, 1]
            Nutrient
            WaterBalance SoilWater: SummerDate=1-Nov; SummerU=6; SummerCona=3.5; WinterDate=1-Apr; WinterU=6; WinterCona=3.5; DiffusConst=250; DiffusSlope=22; Salb=0.13; CN2Bare=68; CNRed=20; CNCov=0.8; DischargeWidth=5; CatchmentArea=10; PSIDul=-100
              Thickness=[150, 150, 300, 300, 300, 300, 300, 300, 300, 300, 300, 600]
              SWCON=[0.3, 0.3, 0.3, 0.3, 0.3, 0.3, 0.3, 0.3, 0.3, 0.3, 0.3, 0.3]
            Organic: FOMCNRatio=50; CarbonUnits=Total
              Thickness  Carbon  SoilCNRatio  FBiom  FInert  FOM
              150        1.82    14.5         0.025  0.45    317.895
              150        1.47    14.5         0.025  0.6     280.542
              300        1.2     14.5         0.015  0.75    218.486
              300        1.03    14.5         0.01   0.9     170.157
              300        0.47    14.5         0.01   0.96    132.519
              300        0.47    14.5         0.01   0.96    103.206
              300        0.47    14.5         0.01   0.96    80.377
              300        0.47    14.5         0.01   0.96    62.597
              300        0.47    14.5         0.01   0.96    48.751
              300        0.47    14.5         0.01   0.96    37.967
              300        0.47    14.5         0.01   0.96    29.569
              600        0.47    14.5         0.01   0.96    17.934
            Chemical: PHUnits=Water
              Thickness  PH   CEC
              150        7.5  12.44
              150        8    11.6525
              300        8    11.045
              300        8    10.6625
              300        8    9.4025
              300        8    9.4025
              300        8    9.4025
              300        8    9.4025
              300        8    9.4025
              300        8    9.4025
              300        8    9.4025
              600        8    9.4025
              CEC source: Calculated
            Water: InitialPAWmm=509.1; RelativeTo=LL15; FilledFromTop=false
              Thickness=[150, 150, 300, 300, 300, 300, 300, 300, 300, 300, 300, 600]
              InitialValues=[0.38, 0.38, 0.4, 0.4, 0.39, 0.38, 0.38, 0.38, 0.359, 0.356, 0.356, 0.35]
            Solute NO3: InitialValuesUnits=ppm; WaterTableConcentration=0; D0=0; DepthConstant=0; MaxDepthSoluteAccessible=0; RunoffEffectivenessAtMovingSolute=0; MaxEffectiveRunoff=0
              Thickness=[150, 150, 300, 300, 300, 300, 300, 300, 300, 300, 300, 600]
              InitialValues=[0.709935, 0.339966, 0.259977, 0.22998, 0.229982, 0.259982, 0.269982, 0.299986, 0.299987, 0.299989, 0.299994, 0.299994]
            Solute NH4: InitialValuesUnits=ppm; WaterTableConcentration=0; D0=0; DepthConstant=0; MaxDepthSoluteAccessible=0; RunoffEffectivenessAtMovingSolute=0; MaxEffectiveRunoff=0
              Thickness=[150, 150, 300, 300, 300, 300, 300, 300, 300, 300, 300, 600]
              InitialValues=[1.00004, 0.999854, 0.999957, 1.00001, 0.500003, 0.500013, 0.500013, 0.500008, 0.500019, 0.500009, 0.500007, 0.5]
            Solute Urea: InitialValues=[0, 0, 0, 0, 0, 0, 0, 0, 0, 0, 0, 0]; InitialValuesUnits=kg/ha; WaterTableConcentration=0; D0=0; DepthConstant=0; MaxDepthSoluteAccessible=0; RunoffEffectivenessAtMovingSolute=0; MaxEffectiveRunoff=0
              Thickness=[150, 150, 300, 300, 300, 300, 300, 300, 300, 300, 300, 600]
            SoilTemperature Temperature
          BiomassRemovalEvents CutLucerne: same as New Zealand.Iversen_8.Iversen_8LL.paddock.CutLucerne
          Manager Mower: same as New Zealand.Iversen_8.Iversen_8LL.paddock.Mower
          Manager LucerneSowingRule
            RowSpacing = 300
            SowingDepth = 5
            StemPopulation = 300
            CultivarName = HunterRiver
            SowingDate = 05/05/1994 00:00:00
            script: same as in New Zealand.Iversen_8.Iversen_8LL.paddock.LucerneSowingRule
          Manager PopulationSet
            SetDate = 05/30/1995 00:00:00
            Pop = 300
            script: same as in New Zealand.Iversen_8.Iversen_8LL.paddock.PopulationSet
    Experiment Roseworthy: DisabledSimNames=[RoseworthyWaterirr, RoseworthyWaterdry]
      Factors
        Factor WaterTreatment
          CompositeFactor dry: Specifications=[IrrigationEvents]
            Operations IrrigationEvents
          CompositeFactor irr: Specifications=[IrrigationEvents]
            Operations IrrigationEvents
              1999-12-20  [Irrigation].Apply(16.5);
              1999-12-23  [Irrigation].Apply(16.75);
              1999-12-24  [Irrigation].Apply(16.5);
              1999-12-25  [Irrigation].Apply(16.75);
              1999-12-29  [Irrigation].Apply(16.75);
              2000-01-02  [Irrigation].Apply(16.75);
              2000-01-06  [Irrigation].Apply(16.5);
              2000-01-09  [Irrigation].Apply(16.5);
              2000-01-12  [Irrigation].Apply(16.75);
              2000-01-15  [Irrigation].Apply(16.5);
              2000-01-18  [Irrigation].Apply(16.5);
              2000-01-25  [Irrigation].Apply(20.5);
              2000-01-27  [Irrigation].Apply(20.5);
              2000-01-31  [Irrigation].Apply(20.5);
              2000-02-02  [Irrigation].Apply(23.5);
              2000-02-05  [Irrigation].Apply(23.5);
              2000-02-07  [Irrigation].Apply(23.5);
              2000-02-09  [Irrigation].Apply(11.5);
              2000-02-10  [Irrigation].Apply(9);
              2000-02-11  [Irrigation].Apply(8.5);
              2000-02-12  [Irrigation].Apply(9.25);
              2000-02-13  [Irrigation].Apply(9);
              2000-02-14  [Irrigation].Apply(9.5);
              2000-02-15  [Irrigation].Apply(11.5);
              2000-02-16  [Irrigation].Apply(9);
              2000-02-17  [Irrigation].Apply(9.25);
              2000-02-18  [Irrigation].Apply(9.75);
              2000-02-19  [Irrigation].Apply(9);
              2000-02-20  [Irrigation].Apply(9.75);
              2000-02-21  [Irrigation].Apply(9.75);
              2000-03-03  [Irrigation].Apply(23.5);
              2000-03-04  [Irrigation].Apply(11.5);
              2000-03-05  [Irrigation].Apply(9);
              2000-03-06  [Irrigation].Apply(9);
              2000-03-07  [Irrigation].Apply(23.5);
              2000-03-08  [Irrigation].Apply(9);
              2000-03-09  [Irrigation].Apply(23.5);
              2000-03-10  [Irrigation].Apply(11.5);
              2000-03-11  [Irrigation].Apply(23.5);
              2000-03-12  [Irrigation].Apply(5);
              2001-01-16  [Irrigation].Apply(20);
              2001-01-17  [Irrigation].Apply(20);
              2001-01-18  [Irrigation].Apply(20);
              2001-02-12  [Irrigation].Apply(20);
              2001-02-13  [Irrigation].Apply(20);
              2001-02-14  [Irrigation].Apply(20);
              2001-03-12  [Irrigation].Apply(20);
              2001-03-13  [Irrigation].Apply(20);
              2001-03-14  [Irrigation].Apply(20);
              2001-09-19  // lucerne end_crop
      Simulation 1998_2001 Sceptre
        Clock: Start=1998-06-04; End=2001-09-20
        Summary summaryfile
        Weather: FileName=rose01.met
        SoilArbitrator Soil Arbitrator
        MicroClimate: a_interception=0; b_interception=1; c_interception=0; d_interception=0; SoilHeatFluxFraction=0.4; MinimumHeightDiffForNewLayer=0; NightInterceptionFraction=0.5; ReferenceHeight=2
        Zone paddock: Area=1; Slope=0; AspectAngle=0; Altitude=50
          Irrigation
          Fertiliser
          SurfaceOrganicMatter surface organic matter: InitialResidueName=wheat; InitialResidueType=wheat; InitialResidueMass=0; InitialStandingFraction=0; InitialCPR=0; InitialCNR=80
          Report: EventNames=[Clock].DoReport
            VariableNames:
              [Clock].Today
              [DiagnosticsVariables].Script.AccumPlantN
              [DiagnosticsVariables].Script.AccumMineralisation
              [DiagnosticsVariables].Script.AccumDenit
              [DiagnosticsVariables].Script.AccumFert
              [DiagnosticsVariables].Script.AccumLeach
              [DiagnosticsVariables].Script.AccumDetach
              [DiagnosticsVariables].Script.DeltaSoilOMN
              [DiagnosticsVariables].Script.DeltaSurfaceOMN
              [DiagnosticsVariables].Script.DeltaSoilMineralN
              [Lucerne].Root.NSupply
              [Soil].SoilWater.Eo
              [Soil].SoilWater.Es
              [DiagnosticsVariables].Script.SWC
              [DiagnosticsVariables].Script.DUL
              [Soil].SoilWater.Drainage
              [Soil].SoilWater.Runoff
              [DiagnosticsVariables].Script.OutFlowLat
              [Soil].SoilWater.pond
              [DiagnosticsVariables].Script.AccumEO
              [DiagnosticsVariables].Script.AccumEP
              [DiagnosticsVariables].Script.AccumES
              [DiagnosticsVariables].Script.AccumDrainage
              [DiagnosticsVariables].Script.AccumRunoff
              [DiagnosticsVariables].Script.AccumRainfall
              [DiagnosticsVariables].Script.AccumIrrigation
              [DiagnosticsVariables].Script.AccumOutflowLat
              [DiagnosticsVariables].Script.SoilWaterDeficit
              [Lucerne].Grain.Live.Wt
              [Lucerne].Shell.Live.Wt
              [Lucerne].Stem.Live.Wt
              [Lucerne].Stem.Live.Wt
              [Lucerne].Grain.Live.N
              [Lucerne].Shell.Live.N
              [Lucerne].Leaf.Live.Wt
              [Lucerne].Root.Live.Wt
              [Lucerne].Leaf.Live.N
              [Lucerne].Root.Live.N
              [Lucerne].Leaf.Live.NConc
              [Lucerne].Root.Live.NConc
              [Lucerne].Root.WaterSupply
              [Lucerne].Root.WaterUptake
              [Lucerne].Leaf.Transpiration
              [Lucerne].Leaf.WaterDemand
              [Lucerne].Root.Depth
              [Lucerne].Leaf.CoverTotal
              [Lucerne].Leaf.CoverDead
              [Lucerne].Leaf.LAI as LAI
              [Lucerne].Leaf.Height
              [Soil].Water.MM
              [Soil].NO3.kgha
              [DiagnosticsVariables].Script.SoilNitrogenContent
              [Lucerne].Arbitrator.N.TotalPlantDemand
              [DiagnosticsVariables].Script.FomN
              [DiagnosticsVariables].Script.HumN
              [DiagnosticsVariables].Script.BiomN
              [DiagnosticsVariables].Script.DltNMinRes
              [DiagnosticsVariables].Script.DltNMinTot
              [Lucerne].Leaf.Fw
              [Lucerne].Leaf.Fn
              [Lucerne].Phenology.CurrentPhase.Name
              [Lucerne].Phenology.CurrentStageName
              [Lucerne].Phenology.Stage
              [Lucerne].Pod.Wt
              [Lucerne].Pod.N
              [Lucerne].AboveGround.Wt *10 as ShootWt
              [Lucerne].Shell.PodNumber
              [Lucerne].Leaf.LAIFunction
              [Lucerne].MainN
          Operations IrrigationEvents
          Operations Cutting
            1998-12-15  [Mower].Script.Cut();
            1999-04-10  [Mower].Script.Cut();
            1999-06-14  [Mower].Script.Cut();
            1999-09-14  [Mower].Script.Cut();
            1999-11-06  [Mower].Script.Cut();
            2000-01-19  [Mower].Script.Cut();
            2000-02-15  [Mower].Script.Cut();
            2000-03-23  [Mower].Script.Cut();
            2000-05-22  [Mower].Script.Cut();
            2000-07-11  [Mower].Script.Cut();
            2000-09-11  [Mower].Script.Cut();
            2000-11-12  [Mower].Script.Cut();
            2001-02-05  [Mower].Script.Cut();
            2001-04-01  [Mower].Script.Cut();
            2001-06-28  [Mower].Script.Cut();
            2001-09-06  [Mower].Script.Cut();
          Plant Lucerne
          Soil Roseworthy: Latitude=0; Longitude=0
            Physical
              Thickness  ParticleSizeSand  ParticleSizeSilt  ParticleSizeClay  Rocks     BD    AirDry  LL15  DUL   SAT
              200        5                 65                30                0         1.3   0.09    0.11  0.25  0.49
              200        5                 65                30                0         1.23  0.09    0.11  0.25  0.48
              200        5                 65                30                0         1.24  0.1     0.13  0.25  0.47
              200        5                 65                30                0.139011  1.26  0.1     0.15  0.26  0.42
              200        5                 65                30                0         1.41  0.1     0.18  0.27  0.43
              200        5                 65                30                0         1.42  0.1     0.2   0.28  0.44
              400        5                 65                30                0         1.41  0.1     0.25  0.3   0.44
              400        5                 65                30                0         1.41  0.1     0.31  0.33  0.44
              400        5                 65                30                0         1.41  0.1     0.37  0.39  0.44
              400        5                 65                30                0         1.41  0.1     0.38  0.39  0.44
              Rocks, ParticleSizeSand, ParticleSizeSilt, ParticleSizeClay source: Calculated
              SoilCrop LucerneSoil
                LL=[0.11, 0.11, 0.13, 0.15, 0.18, 0.2, 0.25, 0.31, 0.37, 0.38]
                KL=[0.08, 0.08, 0.08, 0.08, 0.05, 0.03, 0.01, 0.01, 0.01, 0.01]
                XF=[1, 0.8, 0.7, 0.5, 0.1, 0.1, 0.1, 0.1, 0.1, 0.1]
            WaterBalance SoilWater: SummerDate=1-Nov; SummerU=4.2; SummerCona=2; WinterDate=1-Apr; WinterU=4.2; WinterCona=2; DiffusConst=44; DiffusSlope=16; Salb=0.14; CN2Bare=76; CNRed=20; CNCov=0.8; DischargeWidth=5; CatchmentArea=10; PSIDul=-100; Thickness=[200, 200, 200, 200, 200, 200, 400, 400, 400, 400]; SWCON=[0.5, 0.4, 0.3, 0.3, 0.2, 0.2, 0.1, 0.1, 0.1, 0.1]
            Nutrient
            Organic: FOMCNRatio=45; CarbonUnits=Total
              Thickness  Carbon  SoilCNRatio  FBiom  FInert  FOM
              200        1.48    14.2         0.05   0.1     93.5432
              200        0.9     14.2         0.05   0.1     75.5004
              200        0.47    14.2         0.02   0.4     60.9377
              200        0.32    14.2         0.015  0.9     49.1839
              200        0.22    14.2         0.01   0.95    39.6972
              200        0.15    14.2         0.01   0.97    32.0403
              400        0.1     14.2         0.01   0.98    20.8723
              400        0.07    14.2         0.01   0.98    13.597
              400        0.05    14.2         0.01   0.99    8.85764
              400        0.03    14.2         0.01   0.99    5.77022
            Chemical: PHUnits=Water
              Thickness  PH    CEC
              200        7.86  11.675
              200        8.23  10.37
              200        8.6   9.4025
              200        9     9.065
              200        9     8.84
              200        9     8.6825
              400        9     8.57
              400        9     8.5025
              400        9     8.4575
              400        9     8.4125
              CEC source: Calculated
            Water: Thickness=[200, 200, 200, 200, 200, 200, 400, 400, 400, 400]; InitialValues=[0.25, 0.25, 0.25, 0.26, 0.27, 0.28, 0.3, 0.33, 0.39, 0.39]; InitialPAWmm=176; RelativeTo=LL15; FilledFromTop=false
            Solute NO3: Thickness=[200, 200, 200, 200, 200, 200, 400, 400, 400, 400]; InitialValuesUnits=ppm; WaterTableConcentration=0; D0=0; DepthConstant=0; MaxDepthSoluteAccessible=0; RunoffEffectivenessAtMovingSolute=0; MaxEffectiveRunoff=0
              InitialValues=[6.84003, 3.52001, 1.54001, 1.12, 1.1, 0.680003, 0.650003, 0.310001, 0.310001, 0.300001]
            Solute NH4: Thickness=[200, 200, 200, 200, 200, 200, 400, 400, 400, 400]; InitialValues=[0.5, 0.5, 0.5, 0.4, 0.1, 0.1, 0.05, 0.05, 0.05, 0.05]; InitialValuesUnits=ppm; WaterTableConcentration=0; D0=0; DepthConstant=0; MaxDepthSoluteAccessible=0; RunoffEffectivenessAtMovingSolute=0; MaxEffectiveRunoff=0
            Solute Urea: Thickness=[200, 200, 200, 200, 200, 200, 400, 400, 400, 400]; InitialValues=[0, 0, 0, 0, 0, 0, 0, 0, 0, 0]; InitialValuesUnits=kg/ha; WaterTableConcentration=0; D0=0; DepthConstant=0; MaxDepthSoluteAccessible=0; RunoffEffectivenessAtMovingSolute=0; MaxEffectiveRunoff=0
            SoilTemperature Temperature
          BiomassRemovalEvents CutLucerne: same as New Zealand.Iversen_8.Iversen_8LL.paddock.CutLucerne
          Manager Mower: same as New Zealand.Iversen_8.Iversen_8LL.paddock.Mower
          Manager LucerneSowingRule
            RowSpacing = 150
            SowingDepth = 40
            StemPopulation = 350
            CultivarName = Sceptre
            SowingDate = 08/17/1998 00:00:00
            script: same as in New Zealand.Iversen_8.Iversen_8LL.paddock.LucerneSowingRule
    Experiment Rutherglen: DisabledSimNames=[RutherglenDefoliationCutting]
      Factors
        Factor Def: Specification=[Cutting]
          Operations Cutting
            1998-11-11  [Mower].Script.Cut();
            1994-01-22  [Mower].Script.Cut();
            1994-03-26  [Mower].Script.Cut();
            1994-03-28  // 'Surface Organic Matter' tillage type = graze
            1994-10-19  [Mower].Script.Cut();
            1995-01-06  [Mower].Script.Cut();
            1995-01-08  // 'Surface Organic Matter' tillage type = graze
            1995-02-11  [Mower].Script.Cut();
            1995-02-13  // 'Surface Organic Matter' tillage type = graze
            1995-08-23  [Mower].Script.Cut();
            1995-10-14  [Mower].Script.Cut();
            1995-12-01  [Mower].Script.Cut();
            1996-01-18  [Mower].Script.Cut();
            1996-01-20  // 'Surface Organic Matter' tillage type = graze
            1996-03-14  [Mower].Script.Cut();
            1996-03-16  // 'Surface Organic Matter' tillage type = graze
            1996-08-17  [Mower].Script.Cut();
            1996-10-24  [Mower].Script.Cut();
            1996-12-11  [Mower].Script.Cut();
            1996-12-13  // 'Surface Organic Matter' tillage type = graze
            1997-05-30  [Mower].Script.Cut();
            1997-09-12  [Mower].Script.Cut();
            1997-11-19  [Mower].Script.Cut();
            1998-05-06  [Mower].Script.Cut();
            1998-08-08  [Mower].Script.Cut();
            1998-10-14  [Mower].Script.Cut();
            1998-12-05  [Mower].Script.Cut();
            1999-03-06  [Mower].Script.Cut();
            1999-03-08  // 'Surface Organic Matter' tillage type = graze
            1999-04-22  [Mower].Script.Cut();
            1999-04-24  // 'Surface Organic Matter' tillage type = graze
            1999-08-06  [Mower].Script.Cut();
            1999-10-14  [Mower].Script.Cut();
            1999-12-10  [Mower].Script.Cut();
            1999-12-12  // 'Surface Organic Matter' tillage type = graze
      Simulation RutherglenCL_Swim3
        Clock: Start=1993-01-01; End=1999-12-31
        Summary summaryfile
        Weather: FileName=082039.met
        SoilArbitrator Soil Arbitrator
        MicroClimate: a_interception=0; b_interception=1; c_interception=0; d_interception=0; SoilHeatFluxFraction=0.4; MinimumHeightDiffForNewLayer=0; NightInterceptionFraction=0.5; ReferenceHeight=2
        Zone paddock: Area=1; Slope=0; AspectAngle=0; Altitude=50
          SurfaceOrganicMatter Surface Organic Matter: InitialResidueName=initial_grass; InitialResidueType=grass; InitialResidueMass=1000; InitialStandingFraction=0; InitialCPR=0; InitialCNR=25
          Irrigation
          Fertiliser
          Report: same as Australia.Nekia.NekiaBaseSimulation.paddock.Report
          Operations IrrigationEvents
          Plant Lucerne
          Operations Cutting
          Soil Brown Chromosol Ridley: SoilType=sand; Site=Rutherglen; NearestTown=Rutherglen; Region=North East; State=Victoria; Country=Australia; ApsoilNumber=822; Latitude=-36.1; Longitude=146.5; DataSource=Kirsten Verburg, CSIRO Land and Water, Canberra
            Comments=LL15 was defined as lowest observed water contents under continuous lucerne
            Physical
              Thickness  ParticleSizeSand  ParticleSizeSilt  ParticleSizeClay  Rocks     BD    AirDry  LL15   DUL   SAT
              100        5                 65                30                0.132772  1.5   0.03    0.06   0.19  0.35
              300        5                 65                30                0         1.63  0.05    0.06   0.19  0.35
              400        5                 65                30                0         1.71  0.175   0.175  0.23  0.3
              400        5                 65                30                0         1.73  0.21    0.21   0.27  0.3
              400        5                 65                30                0         1.75  0.22    0.22   0.27  0.31
              400        5                 65                30                0         1.76  0.2     0.2    0.27  0.31
              400        5                 65                30                0         1.77  0.22    0.22   0.3   0.32
              400        5                 65                30                0         1.79  0.22    0.22   0.3   0.32
              Rocks, ParticleSizeSand, ParticleSizeSilt, ParticleSizeClay source: Calculated
              SoilCrop LucerneSoil: LL=[0.03, 0.06, 0.175, 0.21, 0.22, 0.2, 0.22, 0.22]; KL=[0.08, 0.08, 0.08, 0.08, 0.08, 0.07, 0.06, 0.05]; XF=[1, 0.8, 0.8, 0.8, 0.8, 0.8, 0.8, 0.8]
            Chemical: PHUnits=Water
              Thickness  PH   CEC
              100        5.3  11.54
              300        5    10.505
              400        5.1  9.6725
              400        5.1  9.38
              400        5.3  9.1325
              400        5.5  9.1325
              400        5.8  8.93
              400        5.8  8.6825
              CEC source: Calculated
            Organic: FOMCNRatio=30; CarbonUnits=Total
              Thickness  Carbon  SoilCNRatio  FBiom  FInert  FOM
              100        1.42    12           0.06   0.05    408.138
              300        0.96    12           0.05   0.1     384.37
              400        0.59    12           0.04   0.2     361.986
              400        0.46    12           0.02   0.5     340.905
              400        0.35    12           0.015  0.7     302.356
              400        0.35    12           0.015  0.75    268.166
              400        0.26    12           0.01   0.8     237.842
              400        0.15    12           0.01   0.85    210.947
            Water: Thickness=[100, 300, 400, 400, 400, 400, 400, 400]; InitialValues=[0.08, 0.09, 0.175, 0.22, 0.22, 0.27, 0.28, 0.28]; InitialPAWmm=91; RelativeTo=LL15; FilledFromTop=false
            Nutrient
            WaterBalance SoilWater: SummerDate=1-Nov; SummerU=6; SummerCona=4; WinterDate=1-Apr; WinterU=6; WinterCona=4; DiffusConst=40; DiffusSlope=16; Salb=0.13; CN2Bare=70; CNRed=20; CNCov=0.8; PSIDul=-100
            OutputLayers: Thickness=[100, 300, 400, 400, 400, 400, 400, 400]
            Solute NO3: Thickness=[100, 300, 400, 400, 400, 400, 400, 400]; InitialValues=[0.9, 0.9, 0.9, 0.9, 0.9, 0.9, 0.4, 0.5]; InitialValuesUnits=ppm; WaterTableConcentration=0; D0=0; DepthConstant=0; MaxDepthSoluteAccessible=0; RunoffEffectivenessAtMovingSolute=0; MaxEffectiveRunoff=0
            Solute NH4: Thickness=[100, 300, 400, 400, 400, 400, 400, 400]; InitialValues=[1.5, 1, 0.9, 0.6, 0.7, 0.7, 0.3, 0.5]; InitialValuesUnits=ppm; WaterTableConcentration=0; D0=0; DepthConstant=0; MaxDepthSoluteAccessible=0; RunoffEffectivenessAtMovingSolute=0; MaxEffectiveRunoff=0
            Solute Urea: Thickness=[100, 300, 400, 400, 400, 400, 400, 400]; InitialValues=[0, 0, 0, 0, 0, 0, 0, 0]; InitialValuesUnits=kg/ha; WaterTableConcentration=0; D0=0; DepthConstant=0; MaxDepthSoluteAccessible=0; RunoffEffectivenessAtMovingSolute=0; MaxEffectiveRunoff=0
            SoilTemperature Temperature
          BiomassRemovalEvents CutLucerne: same as New Zealand.Iversen_8.Iversen_8LL.paddock.CutLucerne
          Manager Mower: same as New Zealand.Iversen_8.Iversen_8LL.paddock.Mower
          Manager LucerneSowingRule
            RowSpacing = 300
            SowingDepth = 10
            StemPopulation = 300
            CultivarName = Sceptre
            SowingDate = 09/27/1993 00:00:00
            script: same as in New Zealand.Iversen_8.Iversen_8LL.paddock.LucerneSowingRule
    Experiment Quairading: DisabledSimNames=[QuairadingDefoliationCutting]
      Factors
        Factor Def: Specification=[Cutting]
          Operations Cutting
            1998-11-12  [Mower].Script.Cut();
            1998-12-17  [Mower].Script.Cut();
            1999-03-18  [Mower].Script.Cut();
            1999-04-29  [Mower].Script.Cut();
            1999-07-02  [Mower].Script.Cut();
            1999-08-21  [Mower].Script.Cut();
            1999-09-29  [Mower].Script.Cut();
            1999-11-17  [Mower].Script.Cut();
            2000-01-18  [Mower].Script.Cut();
            2000-03-01  [Mower].Script.Cut();
            2000-05-09  [Mower].Script.Cut();
            2000-08-09  [Mower].Script.Cut();
            2000-10-06  [Mower].Script.Cut();
            2000-11-23  [Mower].Script.Cut();
      Simulation 1998_01 Trifecta
        Clock: Start=1998-06-01; End=2001-04-30
        Summary summaryfile
        Weather: FileName=Qu98_01.met
        SoilArbitrator Soil Arbitrator
        MicroClimate: a_interception=0; b_interception=1; c_interception=0; d_interception=0; SoilHeatFluxFraction=0.4; MinimumHeightDiffForNewLayer=0; NightInterceptionFraction=0.5; ReferenceHeight=2
        Zone paddock: Area=1; Slope=0; AspectAngle=0; Altitude=50
          Irrigation
          Fertiliser
          SurfaceOrganicMatter surface organic matter: InitialResidueName=wheat; InitialResidueType=wheat; InitialResidueMass=0; InitialStandingFraction=0; InitialCPR=0; InitialCNR=80
          Report: same as Australia.Nekia.NekiaBaseSimulation.paddock.Report
          Operations IrrigationEvents
          Operations Cutting
          Plant Lucerne
          Soil quairading: Latitude=0; Longitude=0
            Physical
              Thickness  ParticleSizeSand  ParticleSizeSilt  ParticleSizeClay  Rocks  BD   AirDry  LL15  DUL   SAT
              100        5                 65                30                0      1.4  0.01    0.02  0.13  0.45
              100        5                 65                30                0      1.4  0.01    0.02  0.13  0.45
              200        5                 65                30                0      1.6  0.085   0.09  0.18  0.38
              200        5                 65                30                0      1.6  0.095   0.11  0.19  0.38
              200        5                 65                30                0      1.6  0.1     0.13  0.2   0.38
              200        5                 65                30                0      1.6  0.1     0.13  0.2   0.38
              200        5                 65                30                0      1.6  0.1     0.13  0.2   0.38
              200        5                 65                30                0      1.6  0.1     0.15  0.19  0.38
              200        5                 65                30                0      1.6  0.1     0.16  0.19  0.38
              Rocks, ParticleSizeSand, ParticleSizeSilt, ParticleSizeClay source: Calculated
              SoilCrop LucerneSoil: LL=[0.02, 0.02, 0.09, 0.11, 0.13, 0.13, 0.13, 0.15, 0.16]; KL=[0.06, 0.06, 0.04, 0.04, 0.04, 0.03, 0.01, 0.01, 0.01]; XF=[0.2, 0.2, 0.6, 0.6, 0.3, 0.2, 0.2, 0.2, 0.2]
            WaterBalance SoilWater: SummerDate=1-Nov; SummerU=6; SummerCona=2; WinterDate=1-Apr; WinterU=6; WinterCona=2; DiffusConst=88; DiffusSlope=35; Salb=0.13; CN2Bare=60; CNRed=20; CNCov=0.8; DischargeWidth=5; CatchmentArea=10; PSIDul=-100; Thickness=[100, 100, 200, 200, 200, 200, 200, 200, 200]; SWCON=[0.9, 0.9, 0.65, 0.65, 0.65, 0.65, 0.65, 0.65, 0.65]
            Nutrient
            Organic: FOMCNRatio=40; CarbonUnits=Total
              Thickness  Carbon  SoilCNRatio  FBiom  FInert  FOM
              100        1.23    13           0.04   0.1     284.162
              100        1.23    13           0.04   0.1     235.579
              200        0.43    13           0.02   0.2     161.911
              200        0.37    13           0.01   0.8     111.28
              200        0.26    13           0.01   0.9     76.4813
              200        0.26    13           0.01   0.9     52.5648
              200        0.21    13           0.01   0.9     36.1272
              200        0.21    13           0.01   0.9     24.8298
              200        0.2     13           0.01   0.9     17.0653
            Chemical: PHUnits=Water
              Thickness  PH   CEC
              100        4.7  11.1125
              100        4.7  11.1125
              200        5.1  9.3125
              200        5.1  9.1775
              200        5.1  8.93
              200        6    8.93
              200        6    8.8175
              200        6    8.8175
              200        6    8.795
              CEC source: Calculated
            Water: Thickness=[100, 100, 200, 200, 200, 200, 200, 200, 200]; InitialValues=[0.13, 0.13, 0.18, 0.19, 0.2, 0.2, 0.2, 0.19, 0.19]; InitialPAWmm=112; RelativeTo=LL15; FilledFromTop=false
            Solute NO3: Thickness=[100, 100, 200, 200, 200, 200, 200, 200, 200]; InitialValues=[3, 3, 2, 2, 2, 2, 2, 2, 2]; InitialValuesUnits=ppm; WaterTableConcentration=0; D0=0; DepthConstant=0; MaxDepthSoluteAccessible=0; RunoffEffectivenessAtMovingSolute=0; MaxEffectiveRunoff=0
            Solute NH4: Thickness=[100, 100, 200, 200, 200, 200, 200, 200, 200]; InitialValues=[4, 4, 0, 0, 0, 0, 0, 0, 0]; InitialValuesUnits=ppm; WaterTableConcentration=0; D0=0; DepthConstant=0; MaxDepthSoluteAccessible=0; RunoffEffectivenessAtMovingSolute=0; MaxEffectiveRunoff=0
            Solute Urea: Thickness=[100, 100, 200, 200, 200, 200, 200, 200, 200]; InitialValues=[0, 0, 0, 0, 0, 0, 0, 0, 0]; InitialValuesUnits=kg/ha; WaterTableConcentration=0; D0=0; DepthConstant=0; MaxDepthSoluteAccessible=0; RunoffEffectivenessAtMovingSolute=0; MaxEffectiveRunoff=0
            SoilTemperature Temperature
          BiomassRemovalEvents CutLucerne: same as New Zealand.Iversen_8.Iversen_8LL.paddock.CutLucerne
          Manager Mower: same as New Zealand.Iversen_8.Iversen_8LL.paddock.Mower
          Manager LucerneSowingRule
            RowSpacing = 300
            SowingDepth = 10
            StemPopulation = 100
            CultivarName = Trifecta
            SowingDate = 06/09/1998 00:00:00
            script: same as in New Zealand.Iversen_8.Iversen_8LL.paddock.LucerneSowingRule
    Experiment Jimbour
      DisabledSimNames=[JimbourSowingDateStrip6, JimbourSowingDateStrip3a, JimbourSowingDateStrip8, JimbourSowingDateStrip7]
      Factors
        Factor Sowing
          CompositeFactor Strip7
            Specifications:
              [LucerneSowingRule].Script.SowingDate = 1997-06-12
              [Cutting]
              [Clock].StartDate = 1997-06-10
            Operations Cutting
              1997-06-12  [Fertiliser].Apply(4, "UreaN", 50);
              1997-10-27  [Mower].Script.Cut();
              1997-12-02  [Mower].Script.Cut();
              1998-03-11  [Mower].Script.Cut();
              1998-03-14  [Fertiliser].Apply(10, "UreaN", 50);
              1998-05-22  [Mower].Script.Cut();
              1998-10-07  [Mower].Script.Cut();
              1998-12-25  [Mower].Script.Cut();
              1999-01-22  [Mower].Script.Cut();
              1999-02-20  [Mower].Script.Cut();
              1999-04-15  [Mower].Script.Cut();
              2000-01-07  [Mower].Script.Cut();
              2000-02-08  [Mower].Script.Cut();
              2000-05-06  [Mower].Script.Cut();
          CompositeFactor Strip8
            Specifications:
              [LucerneSowingRule].Script.SowingDate = 1997-06-12
              [Cutting]
              [Clock].StartDate =1997-05-30
            Operations Cutting
              1997-06-12  [Fertiliser].Apply(4, "UreaN", 50);
              1997-10-27  [Mower].Script.Cut();
              1997-12-05  [Mower].Script.Cut();
              1998-03-11  [Mower].Script.Cut();
              1998-03-14  [Fertiliser].Apply(10, "UreaN", 50);
              1998-05-22  [Mower].Script.Cut();
              1998-10-07  [Mower].Script.Cut();
              1998-12-25  [Mower].Script.Cut();
              1999-01-22  [Mower].Script.Cut();
              1999-02-20  [Mower].Script.Cut();
              1999-04-15  [Mower].Script.Cut();
              1999-07-13  [Mower].Script.Cut();
              2000-01-07  [Mower].Script.Cut();
              2000-02-08  [Mower].Script.Cut();
              2000-05-06  [Mower].Script.Cut();
          CompositeFactor Strip3a
            Specifications:
              [LucerneSowingRule].Script.SowingDate = 1999-08-06
              [LucerneSowingRule].Script.StemPopulation= 300
              [Cutting]
              [Clock].StartDate = 1999-07-21
            Operations Cutting
              1999-08-06  [Fertiliser].Apply(4, "UreaN", 50);
              2000-01-07  [Mower].Script.Cut();
              2000-02-08  [Mower].Script.Cut();
              2000-05-06  [Mower].Script.Cut();
          CompositeFactor Strip6
            Specifications:
              [LucerneSowingRule].Script.SowingDate = 1997-06-12
              [LucerneSowingRule].Script.StemPopulation = 300
              [Cutting]
              [Clock].StartDate =1997-05-30
            Operations Cutting
              1997-06-12  [Fertiliser].Apply(4, "UreaN", 50);
              1997-11-14  [Mower].Script.Cut();
              1998-03-04  [Mower].Script.Cut();
              1998-03-14  [Fertiliser].Apply(10, "UreaN", 50);
              1998-06-07  [Mower].Script.Cut();
              1998-10-22  [Mower].Script.Cut();
              1999-01-21  [Mower].Script.Cut();
              1999-02-23  [Mower].Script.Cut();
              2000-01-06  [Mower].Script.Cut();
              2000-02-07  [Mower].Script.Cut();
              2000-05-06  [Mower].Script.Cut();
      Simulation 1997_2000 Trifecta Grant
        Clock: Start=1997-05-30; End=2000-05-16
        Summary summaryfile
        Weather: FileName=grant.met
        SoilArbitrator Soil Arbitrator
        MicroClimate: a_interception=0; b_interception=1; c_interception=0; d_interception=0; SoilHeatFluxFraction=0.4; MinimumHeightDiffForNewLayer=0; NightInterceptionFraction=0.5; ReferenceHeight=2
        Zone paddock: Area=1; Slope=0; AspectAngle=0; Altitude=50
          Irrigation
          Fertiliser
          SurfaceOrganicMatter surface organic matter: InitialResidueName=wheat; InitialResidueType=wheat; InitialResidueMass=0; InitialStandingFraction=0; InitialCPR=0; InitialCNR=80
          Report: same as Australia.Roseworthy.1998_2001 Sceptre.paddock.Report
          Operations IrrigationEvents
          Plant Lucerne
          Operations Cutting
          Soil Grant: Latitude=0; Longitude=0
            Physical
              Thickness  ParticleSizeSand  ParticleSizeSilt  ParticleSizeClay  Rocks  BD    AirDry  LL15  DUL   SAT
              150        5                 65                30                0      1.02  0.15    0.27  0.54  0.58
              150        5                 65                30                0      1.03  0.22    0.27  0.53  0.58
              300        5                 65                30                0      1.02  0.22    0.28  0.54  0.59
              300        5                 65                30                0      1.02  0.22    0.26  0.54  0.58
              300        5                 65                30                0      1.06  0.22    0.31  0.52  0.57
              300        5                 65                30                0      1.11  0.22    0.32  0.5   0.55
              300        5                 65                30                0      1.12  0.22    0.33  0.5   0.55
              300        5                 65                30                0      1.15  0.22    0.33  0.48  0.53
              300        5                 65                30                0      1.18  0.22    0.34  0.47  0.52
              300        5                 65                30                0      1.2   0.22    0.33  0.46  0.51
              300        5                 65                30                0      1.25  0.22    0.36  0.46  0.49
              Rocks, ParticleSizeSand, ParticleSizeSilt, ParticleSizeClay source: Calculated
              SoilCrop LucerneSoil
                LL=[0.27, 0.27, 0.28, 0.26, 0.31, 0.32, 0.33, 0.33, 0.34, 0.33, 0.36]
                KL=[0.08, 0.08, 0.08, 0.08, 0.08, 0.08, 0.06, 0.06, 0.06, 0.06, 0.06]
                XF=[1, 1, 1, 1, 1, 1, 1, 1, 1, 1, 1]
            WaterBalance SoilWater: SummerDate=1-Nov; SummerU=6; SummerCona=4; WinterDate=1-Apr; WinterU=6; WinterCona=4; DiffusConst=40; DiffusSlope=16; Salb=0.13; CN2Bare=70; CNRed=20; CNCov=0.8; DischargeWidth=5; CatchmentArea=10; PSIDul=-100; Thickness=[150, 150, 300, 300, 300, 300, 300, 300, 300, 300, 300]; SWCON=[0.2, 0.2, 0.2, 0.2, 0.2, 0.2, 0.2, 0.2, 0.2, 0.2, 0.2]
            Nutrient
            Organic: FOMCNRatio=40; CarbonUnits=Total
              Thickness  Carbon  SoilCNRatio  FBiom  FInert  FOM
              150        1.04    14           0.03   0.4     24.0643
              150        0.9     14           0.025  0.5     20.7124
              300        0.89    14           0.015  0.75    15.3441
              300        0.89    14           0.01   0.9     11.3672
              300        0.77    14           0.01   0.95    8.42101
              300        0.45    14           0.01   0.99    6.23844
              300        0.27    14           0.01   0.99    4.62155
              300        0.22    14           0.01   0.99    3.42373
              300        0.16    14           0.01   0.99    2.53636
              300        0.13    14           0.01   0.99    1.87898
              300        0.12    14           0.01   0.99    1.39198
            Chemical: PHUnits=Water
              Thickness  PH   CEC
              150        8.4  10.685
              150        8.7  10.37
              300        8.9  10.3475
              300        9    10.3475
              300        9    10.0775
              300        9    9.3575
              300        9    8.9525
              300        9    8.84
              300        8.9  8.705
              300        8.9  8.6375
              300        8.9  8.615
              CEC source: Calculated
            Water: Thickness=[150, 150, 300, 300, 300, 300, 300, 300, 300, 300, 300]; InitialPAWmm=562.5; RelativeTo=LL15; FilledFromTop=false
              InitialValues=[0.54, 0.53, 0.54, 0.54, 0.52, 0.5, 0.5, 0.48, 0.47, 0.46, 0.46]
            Solute NO3: Thickness=[150, 150, 300, 300, 300, 300, 300, 300, 300, 300, 300]; InitialValues=[21.3, 22.2, 20.3, 15.9, 8.2, 2.6, 1, 0.9, 0.8, 0.9, 1]; InitialValuesUnits=ppm; WaterTableConcentration=0; D0=0; DepthConstant=0; MaxDepthSoluteAccessible=0; RunoffEffectivenessAtMovingSolute=0; MaxEffectiveRunoff=0
            Solute NH4: Thickness=[150, 150, 300, 300, 300, 300, 300, 300, 300, 300, 300]; InitialValuesUnits=ppm; WaterTableConcentration=0; D0=0; DepthConstant=0; MaxDepthSoluteAccessible=0; RunoffEffectivenessAtMovingSolute=0; MaxEffectiveRunoff=0
              InitialValues=[0.300015, 0.300015, 0.300015, 0.300015, 0.300015, 0.300015, 0.300015, 0.300015, 0.300015, 0.300015, 0.300015]
            Solute Urea: Thickness=[150, 150, 300, 300, 300, 300, 300, 300, 300, 300, 300]; InitialValues=[0, 0, 0, 0, 0, 0, 0, 0, 0, 0, 0]; InitialValuesUnits=kg/ha; WaterTableConcentration=0; D0=0; DepthConstant=0; MaxDepthSoluteAccessible=0; RunoffEffectivenessAtMovingSolute=0; MaxEffectiveRunoff=0
            SoilTemperature Temperature
          BiomassRemovalEvents CutLucerne: same as New Zealand.Iversen_8.Iversen_8LL.paddock.CutLucerne
          Manager Mower: same as New Zealand.Iversen_8.Iversen_8LL.paddock.Mower
          Manager PopulationSet
            SetDate = 12/30/1999 00:00:00
            Pop = 50
            script: same as in New Zealand.Iversen_8.Iversen_8LL.paddock.PopulationSet
          Manager LucerneSowingRule
            RowSpacing = 150
            SowingDepth = 40
            StemPopulation = 400
            CultivarName = Trifecta
            SowingDate = 05/30/1997 00:00:00
            script: same as in New Zealand.Iversen_8.Iversen_8LL.paddock.LucerneSowingRule
    Experiment Warra
      Factors
        Factor Sowing
          CompositeFactor SD1
            Specifications:
              [LucerneSowingRule].Script.SowingDate = 1988-05-26
              [Clock].StartDate = 1988-05-26
              [Operations]
            Operations
              1988-12-15  [Mower].Script.Cut();
              1989-03-15  [Mower].Script.Cut();
              1989-06-15  [Mower].Script.Cut();
              1989-09-15  [Mower].Script.Cut();
              1989-12-15  [Mower].Script.Cut();
              1990-03-15  [Mower].Script.Cut();
              1990-06-15  [Mower].Script.Cut();
              1990-09-15  [Mower].Script.Cut();
              1990-12-15  [Mower].Script.Cut();
              1991-03-15  [Mower].Script.Cut();
              1991-06-15  [Mower].Script.Cut();
              1991-09-15  [Mower].Script.Cut();
              1991-12-15  [Mower].Script.Cut();
              1992-03-15  [Mower].Script.Cut();
              1992-06-15  [Mower].Script.Cut();
              1992-09-15  [Mower].Script.Cut();
              1992-10-03  [Mower].Script.Cut();
              1992-10-03  [Mower].Script.Cut();
              1988-05-26  [Wheat].Sow(population:100,cultivar:"Hartog",depth:30,rowSpacing:250);
              1988-10-24  [Wheat].Harvest();
          CompositeFactor SD2
            Specifications:
              [LucerneSowingRule].Script.SowingDate =1989-06-20
              [Clock].StartDate = 1989-06-20
              [Operations]
            Operations
              1990-12-15  [Mower].Script.Cut();
              1990-03-15  [Mower].Script.Cut();
              1990-06-15  [Mower].Script.Cut();
              1990-09-15  [Mower].Script.Cut();
              1990-12-15  [Mower].Script.Cut();
              1991-03-15  [Mower].Script.Cut();
              1991-06-15  [Mower].Script.Cut();
              1991-09-15  [Mower].Script.Cut();
              1991-12-15  [Mower].Script.Cut();
              1992-03-15  [Mower].Script.Cut();
              1992-06-15  [Mower].Script.Cut();
              1992-09-15  [Mower].Script.Cut();
              1992-12-15  [Mower].Script.Cut();
              1993-03-15  [Mower].Script.Cut();
              1993-06-15  [Mower].Script.Cut();
              1993-09-15  [Mower].Script.Cut();
              1993-10-03  [Mower].Script.Cut();
              1989-06-20  [Wheat].Sow(population:100,cultivar:"Hartog",depth:30,rowSpacing:250);
              1988-10-24  [Wheat].Harvest();
      Simulation 1989_93 Trifecta
        Clock: Start=1988-05-26; End=1993-11-17
        Summary summaryfile
        Weather: FileName=warra.met
        SoilArbitrator Soil Arbitrator
        MicroClimate: a_interception=0; b_interception=1; c_interception=0; d_interception=0; SoilHeatFluxFraction=0.4; MinimumHeightDiffForNewLayer=0; NightInterceptionFraction=0.5; ReferenceHeight=2
        Zone paddock: Area=1; Slope=0; AspectAngle=0; Altitude=50
          Irrigation
          Fertiliser
          SurfaceOrganicMatter surface organic matter: InitialResidueName=wheat; InitialResidueType=wheat; InitialResidueMass=0; InitialStandingFraction=0; InitialCPR=0; InitialCNR=80
          Report: same as Australia.Roseworthy.1998_2001 Sceptre.paddock.Report
          Operations IrrigationEvents
          Operations Cutting
          Plant Lucerne
          Plant Wheat
          Soil warra88_96_T8: Latitude=0; Longitude=0
            Physical
              Thickness  BD    AirDry  LL15   DUL    SAT
              100        1.3   0.1     0.21   0.425  0.5
              100        1.3   0.2     0.21   0.465  0.509
              100        1.29  0.2     0.21   0.473  0.51
              300        1.31  0.2     0.225  0.468  0.505
              300        1.35  0.2     0.265  0.418  0.49
              300        1.36  0.2     0.289  0.364  0.48
              300        1.36  0.2     0.327  0.363  0.48
              SoilCrop LucerneSoil: LL=[0.21, 0.21, 0.21, 0.225, 0.265, 0.289, 0.327]; KL=[0.08, 0.08, 0.08, 0.08, 0.08, 0.08, 0.08]; XF=[1, 1, 1, 1, 1, 1, 1]
              SoilCrop WheatSoil: LL=[0.261, 0.248, 0.28, 0.306, 0.36, 0.36, 0.36]; KL=[0.06, 0.06, 0.06, 0.04, 0.04, 0.02, 0.01]; XF=[1, 1, 1, 1, 1, 1, 1]
            WaterBalance SoilWater: SummerDate=1-Nov; SummerU=6; SummerCona=3.5; WinterDate=1-Apr; WinterU=6; WinterCona=3.5; DiffusConst=40; DiffusSlope=16; Salb=0.13; CN2Bare=80; CNRed=20; CNCov=0.8; PSIDul=-100
            Nutrient
            Organic: FOMCNRatio=40; CarbonUnits=Total
              Thickness  Carbon  SoilCNRatio  FBiom  FInert  FOM
              100        1       14.5         0.024  0.3     3.09555
              100        0.84    14.5         0.02   0.5     2.53442
              100        0.77    14.5         0.015  0.75    2.07501
              300        0.65    14.5         0.01   0.9     1.13879
              300        0.54    14.5         0.01   0.95    0.624981
              300        0.48    14.5         0.01   0.99    0.342997
              300        0.43    14.5         0.01   0.99    0.188241
            Chemical: Thickness=[100, 100, 100, 300, 300, 300, 300]; PH=[8.2, 8.5, 8.6, 8.6, 7.4, 5.3, 5]; PHUnits=Water
            Water: Thickness=[100, 100, 100, 300, 300, 300, 300]; InitialValues=[0.437, 0.434, 0.43, 0.431, 0.422, 0.416, 0.417]; InitialPAWmm=241.1; RelativeTo=LL15; FilledFromTop=false
            Solute NO3: Thickness=[100, 100, 100, 300, 300, 300, 300]; InitialValues=[1.8, 4.6, 5.9, 12.3, 6.1, 4, 4.9]; InitialValuesUnits=ppm; WaterTableConcentration=0; D0=0; DepthConstant=0; MaxDepthSoluteAccessible=0; RunoffEffectivenessAtMovingSolute=0; MaxEffectiveRunoff=0
            Solute NH4: Thickness=[100, 100, 100, 300, 300, 300, 300]; InitialValues=[0.3, 0.3, 0.3, 0.3, 0.3, 0.5, 0.5]; InitialValuesUnits=ppm; WaterTableConcentration=0; D0=0; DepthConstant=0; MaxDepthSoluteAccessible=0; RunoffEffectivenessAtMovingSolute=0; MaxEffectiveRunoff=0
            Solute Urea: Thickness=[100, 100, 100, 300, 300, 300, 300]; InitialValues=[0, 0, 0, 0, 0, 0, 0]; InitialValuesUnits=kg/ha; WaterTableConcentration=0; D0=0; DepthConstant=0; MaxDepthSoluteAccessible=0; RunoffEffectivenessAtMovingSolute=0; MaxEffectiveRunoff=0
            SoilTemperature Temperature
          Manager Harvest
```csharp
using APSIM.Shared.Utilities;
using Models.Utilities;
using Models.Soils;
using Models.PMF;
using Models.Core;
using System;

namespace Models
{
    [Serializable]
    public class Script : Model
    {
        [Link(ByName = true)] Plant Wheat;

        [EventSubscribe("DoManagement")]
        private void OnDoManagement(object sender, EventArgs e)
        {
            if (Wheat.IsReadyForHarvesting)
            {
               Wheat.Harvest();
               Wheat.EndCrop();    
            }
        
        }
        
    }
}
```
          Manager LucerneSowingRule
            RowSpacing = 150
            SowingDepth = 40
            SowingRate = 300
            CultivarName = Trifecta
            SowingDate = 05/26/1988 00:00:00
```csharp
using Models.Soils;
using System;
using Models.Core;
using Models.PMF;
using APSIM.Shared.Utilities;
        
namespace Models
{
    [Serializable] 
    [System.Xml.Serialization.XmlInclude(typeof(Model))]
    public class Script : Model
    {
        [Link] Plant Lucerne;
        [Link] Clock Clock;
        [Link] Summary summary;
        [Description("Spacing (mm) between rows")]
        public double RowSpacing { get; set; }
        [Description("Depth (mm) Grains are planted")]
        public double SowingDepth { get; set; }
        [Description("Seeds sown (/m2)")]
        public double SowingRate { get; set; }
        [Description("Cultivar")]
        [Display(Type=DisplayType.CultivarName)]
        public string CultivarName { get; set; }
        [Description("Sowing Date")]
        public DateTime SowingDate { get; set; }

        [EventSubscribe("DoManagement")]
        private void OnDoManagement(object sender, EventArgs e)
        {
        summary.WriteMessage(this,SowingDate.ToString(), MessageType.Diagnostic);
        if (Clock.Today == SowingDate)
                Lucerne.Sow(population: SowingRate, cultivar: CultivarName, depth: SowingDepth, rowSpacing: RowSpacing, budNumber: 1);
            //Lucerne.Sow(... Contains the following arguements:
            //Population  double  Required  Seeds sowing/m2
            //Cultivar    string  Required  "NameOfCultivar"
            //Depth       double  Optional  Depth (mm) seed sown.   Default is 100mm 
            //MaxCover    double  Optional  Proportion (0-1) of the ground row crop will cover.   Default is 1.0
            //BudNumber   double  Optional  Number of mainstems per seed sown.  Default is 1.0
            //RowSpacing  double  Optional  Spaceing (mm) between drill rows when crop is sown.  Default is 150mm
            //CropClass   string  Optional  Crop class to instantiate when crop is sown.  Default is "Plant"
        }
    }
}
```
          Manager Mower
            YearTransation = 1-Jun
            script: same as in New Zealand.Iversen_8.Iversen_8LL.paddock.Mower
          BiomassRemovalEvents CutLucerne: same as New Zealand.Iversen_8.Iversen_8LL.paddock.CutLucerne
    Experiment Griffith: DisabledSimNames=[GriffithDefoliationCutting]
      Factors
        Factor Def: Specification=[Cutting]
          Operations Cutting
            1995-12-01  [Mower].Script.Cut();
            1991-01-15  [Mower].Script.Cut();
            1991-02-19  [Mower].Script.Cut();
            1991-03-01  // soilbbc set water_table = 1000
            1991-05-22  [Mower].Script.Cut();
            1991-09-17  // soilbbc set water_table = 600
            1991-10-16  [Mower].Script.Cut();
            1991-11-26  [Mower].Script.Cut();
            1992-01-09  // soilbbc set water_table = 1000
            1992-01-07  [Mower].Script.Cut();
            1992-02-18  [Mower].Script.Cut();
            1992-03-04  // apswim set gwc_salt = 10240
            1992-03-24  [Mower].Script.Cut();
            1992-07-18  [Mower].Script.Cut();
            1992-10-14  [Mower].Script.Cut();
            1992-11-27  [Mower].Script.Cut();
            1993-01-06  [Mower].Script.Cut();
            1993-02-05  [Mower].Script.Cut();
            1993-03-24  [Mower].Script.Cut();
      Simulation Lysimeter1
        Clock: Start=1990-10-11; End=1993-04-30
        Summary summaryfile
        Weather: FileName=griffith.met
        SoilArbitrator Soil Arbitrator
        MicroClimate: a_interception=0; b_interception=1; c_interception=0; d_interception=0; SoilHeatFluxFraction=0.4; MinimumHeightDiffForNewLayer=0; NightInterceptionFraction=0.5; ReferenceHeight=2
        Zone paddock: Area=1; Slope=0; AspectAngle=0; Altitude=50
          Irrigation
          Fertiliser
          SurfaceOrganicMatter surface organic matter: InitialResidueName=wheat; InitialResidueType=wheat; InitialResidueMass=0; InitialStandingFraction=0; InitialCPR=0; InitialCNR=80
          Report: EventNames=[Clock].DoReport
            VariableNames:
              [Clock].Today
              [DiagnosticsVariables].Script.AccumPlantN
              [DiagnosticsVariables].Script.AccumMineralisation
              [DiagnosticsVariables].Script.AccumDenit
              [DiagnosticsVariables].Script.AccumFert
              [DiagnosticsVariables].Script.AccumLeach
              [DiagnosticsVariables].Script.AccumDetach
              [DiagnosticsVariables].Script.DeltaSoilOMN
              [DiagnosticsVariables].Script.DeltaSurfaceOMN
              [DiagnosticsVariables].Script.DeltaSoilMineralN
              [Lucerne].Root.NSupply
              [Soil].SoilWater.Eo
              [Soil].SoilWater.Es
              [DiagnosticsVariables].Script.SWC as SWC
              [DiagnosticsVariables].Script.DUL
              [Soil].SoilWater.Drainage
              [Soil].SoilWater.Runoff
              [DiagnosticsVariables].Script.OutFlowLat
              [Soil].
              [Soil].SoilWater.pond
              [DiagnosticsVariables].Script.AccumEO
              [DiagnosticsVariables].Script.AccumEP
              [DiagnosticsVariables].Script.AccumES
              [DiagnosticsVariables].Script.AccumDrainage
              [DiagnosticsVariables].Script.AccumRunoff
              [DiagnosticsVariables].Script.AccumRainfall
              [DiagnosticsVariables].Script.AccumIrrigation
              [DiagnosticsVariables].Script.AccumOutflowLat
              [DiagnosticsVariables].Script.SoilWaterDeficit
              [Lucerne].Grain.Live.Wt
              [Lucerne].Shell.Live.Wt
              [Lucerne].Stem.Live.Wt as StemWt
              [Lucerne].Stem.Live.Wt
              [Lucerne].Grain.Live.N
              [Lucerne].Shell.Live.N
              [Lucerne].Leaf.Live.Wt as LeafWt
              [Lucerne].Root.Live.Wt as RootWt
              [Lucerne].Leaf.Live.N
              [Lucerne].Root.Live.N
              [Lucerne].Leaf.Live.NConc
              [Lucerne].Root.Live.NConc
              [Lucerne].Root.WaterSupply
              [Lucerne].Root.WaterUptake
              [Lucerne].Leaf.Transpiration
              [Lucerne].Leaf.WaterDemand
              [Lucerne].Root.Depth
              [Lucerne].Leaf.CoverTotal
              [Lucerne].Leaf.CoverDead
              [Lucerne].Leaf.LAI
              [Lucerne].Leaf.Height
              [Soil].Water.MM
              [Soil].NO3.kgha
              [DiagnosticsVariables].Script.SoilNitrogenContent
              [Lucerne].Arbitrator.N.TotalPlantDemand
              [DiagnosticsVariables].Script.FomN
              [DiagnosticsVariables].Script.HumN
              [DiagnosticsVariables].Script.BiomN
              [DiagnosticsVariables].Script.DltNMinRes
              [DiagnosticsVariables].Script.DltNMinTot
              [Lucerne].Leaf.Fw
              [Lucerne].Leaf.Fn
              [Lucerne].Phenology.CurrentPhase.Name
              [Lucerne].Phenology.CurrentStageName
              [Lucerne].Phenology.Stage
              [Lucerne].Pod.Wt
              [Lucerne].Pod.N
              [Lucerne].AboveGround.Wt *10 as ShootWt
              [Lucerne].Shell.PodNumber
              [Lucerne].Leaf.LAIFunction
              [Soil].Initial.EC as EC
              [Lucerne].Root.LengthDensity
          Operations IrrigationEvents
            1990-10-15  [Irrigation].Apply(15.84);
            1990-10-17  [Irrigation].Apply(14.79);
            1990-10-23  [Irrigation].Apply(7.03);
            1990-10-24  [Irrigation].Apply(4.9);
            1990-10-25  [Irrigation].Apply(8.05);
            1990-10-28  [Irrigation].Apply(9.88);
            1990-10-31  [Irrigation].Apply(6.4);
            1990-11-05  [Irrigation].Apply(15.67);
            1990-11-08  [Irrigation].Apply(6.94);
            1990-11-13  [Irrigation].Apply(28.37);
            1990-11-19  [Irrigation].Apply(31.91);
            1990-11-20  [Irrigation].Apply(3.56);
            1990-11-26  [Irrigation].Apply(24.33);
            1990-11-27  [Irrigation].Apply(2.27);
            1990-12-03  [Irrigation].Apply(31.6);
            1990-12-11  [Irrigation].Apply(12.34);
            1990-12-12  [Irrigation].Apply(0.44);
            1990-12-18  [Irrigation].Apply(17.39);
            1990-12-19  [Irrigation].Apply(5);
            1990-12-27  [Irrigation].Apply(9.05);
            1990-12-28  [Irrigation].Apply(11.49);
            1991-01-03  [Irrigation].Apply(30.98);
            1991-01-04  [Irrigation].Apply(24.31);
            1991-01-16  [Irrigation].Apply(63.12);
            1991-01-23  [Irrigation].Apply(3.31);
            1991-01-24  [Irrigation].Apply(0.21);
            1991-01-30  [Irrigation].Apply(39.96);
            1991-01-31  [Irrigation].Apply(9.87);
            1991-02-05  [Irrigation].Apply(50.44);
            1991-02-06  [Irrigation].Apply(23.80);
            1991-02-20  [Irrigation].Apply(40.23);
            1991-02-21  [Irrigation].Apply(50.45);
            1991-02-27  [Irrigation].Apply(24.37);
            1991-10-23  [Irrigation].Apply(44.15);
            1991-10-24  [Irrigation].Apply(17.09);
            1991-11-06  [Irrigation].Apply(63);
            1991-11-07  [Irrigation].Apply(0.63);
            1991-11-19  [Irrigation].Apply(59.42);
            1991-11-20  [Irrigation].Apply(6.88);
            1991-12-03  [Irrigation].Apply(31.04);
            1991-12-04  [Irrigation].Apply(44.42);
            1991-12-19  [Irrigation].Apply(52.51);
            1991-12-30  [Irrigation].Apply(57.71);
            1991-12-31  [Irrigation].Apply(2.69);
            1992-01-15  [Irrigation].Apply(47.28);
            1992-01-16  [Irrigation].Apply(40.52);
            1992-01-17  [Irrigation].Apply(6.96);
            1992-02-26  [Irrigation].Apply(49.37);
            1992-02-27  [Irrigation].Apply(104.23);
            1992-03-10  [Irrigation].Apply(40.31);
            1992-03-11  [Irrigation].Apply(27.27);
            1992-03-30  [Irrigation].Apply(40.77);
            1992-03-31  [Irrigation].Apply(36.23);
            1992-04-13  [Irrigation].Apply(50.68);
            1992-04-14  [Irrigation].Apply(15.05);
            1992-10-27  [Irrigation].Apply(46.58);
            1992-10-28  [Irrigation].Apply(2.87);
            1992-12-15  [Irrigation].Apply(47.11);
            1992-12-16  [Irrigation].Apply(36.84);
            1993-01-12  [Irrigation].Apply(35.77);
            1993-01-13  [Irrigation].Apply(28.46);
            1993-02-10  [Irrigation].Apply(56.43);
            1993-02-11  [Irrigation].Apply(43.4);
            1993-03-02  [Irrigation].Apply(47.07);
            1993-03-03  [Irrigation].Apply(25.36);
          Operations Cutting
            1991-01-09  [Mower].Script.Cut();
            1991-02-18  [Mower].Script.Cut();
            1991-05-22  [Mower].Script.Cut();
            1991-10-15  [Mower].Script.Cut();
            1991-11-25  [Mower].Script.Cut();
            1992-01-06  [Mower].Script.Cut();
            1992-02-17  [Mower].Script.Cut();
            1992-03-23  [Mower].Script.Cut();
            1992-10-13  [Mower].Script.Cut();
            1992-11-26  [Mower].Script.Cut();
            1993-01-05  [Mower].Script.Cut();
            1993-02-04  [Mower].Script.Cut();
            1993-03-23  [Mower].Script.Cut();
          Operations WaterInflow
            1990-10-10  [Irrigation].Apply(amount: 0.32, depth: 1400)
            1990-10-11  [Irrigation].Apply(amount: 0.01, depth: 1400)
            1990-10-12  [Irrigation].Apply(amount: 0.6, depth: 1400)
            1990-10-13  [Irrigation].Apply(amount: 0.54, depth: 1400)
            1990-10-14  [Irrigation].Apply(amount: 0.34, depth: 1400)
            1990-10-15  [Irrigation].Apply(amount: 0.27, depth: 1400)
            1990-10-16  [Irrigation].Apply(amount: 0.46, depth: 1400)
            1990-10-17  [Irrigation].Apply(amount: 0.31, depth: 1400)
            1990-10-18  [Irrigation].Apply(amount: 0.33, depth: 1400)
            1990-10-19  [Irrigation].Apply(amount: 0.17, depth: 1400)
            1990-10-20  [Irrigation].Apply(amount: 0.23, depth: 1400)
            1990-10-21  [Irrigation].Apply(amount: 0.18, depth: 1400)
            1990-10-22  [Irrigation].Apply(amount: 0.18, depth: 1400)
            1990-10-23  [Irrigation].Apply(amount: 0.19, depth: 1400)
            1990-10-24  [Irrigation].Apply(amount: 0.17, depth: 1400)
            1990-10-25  [Irrigation].Apply(amount: 0.18, depth: 1400)
            1990-10-26  [Irrigation].Apply(amount: 0.18, depth: 1400)
            1990-10-27  [Irrigation].Apply(amount: 0.19, depth: 1400)
            1990-10-28  [Irrigation].Apply(amount: 0.18, depth: 1400)
            1990-10-29  [Irrigation].Apply(amount: 0.21, depth: 1400)
            1990-10-30  [Irrigation].Apply(amount: 0.17, depth: 1400)
            1990-10-31  [Irrigation].Apply(amount: 0.01, depth: 1400)
            1990-11-01  [Irrigation].Apply(amount: 0.01, depth: 1400)
            1990-11-02  [Irrigation].Apply(amount: 0.07, depth: 1400)
            1990-11-03  [Irrigation].Apply(amount: 0.09, depth: 1400)
            1990-11-04  [Irrigation].Apply(amount: 0.13, depth: 1400)
            1990-11-05  [Irrigation].Apply(amount: 0.05, depth: 1400)
            1990-11-06  [Irrigation].Apply(amount: 0.08, depth: 1400)
            1990-11-07  [Irrigation].Apply(amount: 0.1, depth: 1400)
            1990-11-08  [Irrigation].Apply(amount: 0.19, depth: 1400)
            1990-11-09  [Irrigation].Apply(amount: 0.07, depth: 1400)
            1990-11-10  [Irrigation].Apply(amount: 0.06, depth: 1400)
            1990-11-11  [Irrigation].Apply(amount: 0.35, depth: 1400)
            1990-11-12  [Irrigation].Apply(amount: 0.31, depth: 1400)
            1990-11-13  [Irrigation].Apply(amount: 0.57, depth: 1400)
            1990-11-14  [Irrigation].Apply(amount: 0.51, depth: 1400)
            1990-11-15  [Irrigation].Apply(amount: 0.49, depth: 1400)
            1990-11-16  [Irrigation].Apply(amount: 0.5, depth: 1400)
            1990-11-17  [Irrigation].Apply(amount: 0.62, depth: 1400)
            1990-11-18  [Irrigation].Apply(amount: 0.57, depth: 1400)
            1990-11-19  [Irrigation].Apply(amount: 0.61, depth: 1400)
            1990-11-20  [Irrigation].Apply(amount: 0.05, depth: 1400)
            1990-11-21  [Irrigation].Apply(amount: 0.05, depth: 1400)
            1990-11-22  [Irrigation].Apply(amount: 0.14, depth: 1400)
            1990-11-23  [Irrigation].Apply(amount: 0.07, depth: 1400)
            1990-11-24  [Irrigation].Apply(amount: 0.02, depth: 1400)
            1990-11-25  [Irrigation].Apply(amount: 0.31, depth: 1400)
            1990-11-26  [Irrigation].Apply(amount: 0.68, depth: 1400)
            1990-11-27  [Irrigation].Apply(amount: 0.6, depth: 1400)
            1990-11-28  [Irrigation].Apply(amount: 0.69, depth: 1400)
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            1990-11-29  [Irrigation].Apply(amount: 1.02, depth: 1400)
            1990-11-30  [Irrigation].Apply(amount: 1.19, depth: 1400)
            1990-12-01  [Irrigation].Apply(amount: 1.38, depth: 1400)
            1990-12-02  [Irrigation].Apply(amount: 1.67, depth: 1400)
            1990-12-03  [Irrigation].Apply(amount: 1.05, depth: 1400)
            1990-12-04  [Irrigation].Apply(amount: 0.72, depth: 1400)
            1990-12-05  [Irrigation].Apply(amount: 1.03, depth: 1400)
            1990-12-06  [Irrigation].Apply(amount: 2.35, depth: 1400)
            1990-12-07  [Irrigation].Apply(amount: 2.93, depth: 1400)
            1990-12-08  [Irrigation].Apply(amount: 2.91, depth: 1400)
            1990-12-09  [Irrigation].Apply(amount: 3.1, depth: 1400)
            1990-12-10  [Irrigation].Apply(amount: 2.92, depth: 1400)
            1990-12-11  [Irrigation].Apply(amount: 3.24, depth: 1400)
            1990-12-12  [Irrigation].Apply(amount: 2.65, depth: 1400)
            1990-12-13  [Irrigation].Apply(amount: 3.6, depth: 1400)
            1990-12-14  [Irrigation].Apply(amount: 4.04, depth: 1400)
            1990-12-15  [Irrigation].Apply(amount: 4.34, depth: 1400)
            1990-12-17  [Irrigation].Apply(amount: 4.13, depth: 1400)
            1990-12-18  [Irrigation].Apply(amount: 5.83, depth: 1400)
            1990-12-19  [Irrigation].Apply(amount: 5.15, depth: 1400)
            1990-12-20  [Irrigation].Apply(amount: 4.88, depth: 1400)
            1990-12-21  [Irrigation].Apply(amount: 5.98, depth: 1400)
            1990-12-22  [Irrigation].Apply(amount: 6.32, depth: 1400)
            1990-12-23  [Irrigation].Apply(amount: 6.39, depth: 1400)
            1990-12-24  [Irrigation].Apply(amount: 4.46, depth: 1400)
            1990-12-25  [Irrigation].Apply(amount: 3.26, depth: 1400)
            1990-12-26  [Irrigation].Apply(amount: 2.77, depth: 1400)
            1990-12-27  [Irrigation].Apply(amount: 9.17, depth: 1400)
            1990-12-28  [Irrigation].Apply(amount: 9.05, depth: 1400)
            1990-12-29  [Irrigation].Apply(amount: 5.05, depth: 1400)
            1990-12-30  [Irrigation].Apply(amount: 6.75, depth: 1400)
            1990-12-31  [Irrigation].Apply(amount: 0.97, depth: 1400)
            1991-01-01  [Irrigation].Apply(amount: 7.11, depth: 1400)
            1991-01-02  [Irrigation].Apply(amount: 9.99, depth: 1400)
            1991-01-03  [Irrigation].Apply(amount: 9.95, depth: 1400)
            1991-01-04  [Irrigation].Apply(amount: 10.74, depth: 1400)
            1991-01-06  [Irrigation].Apply(amount: 5.96, depth: 1400)
            1991-01-07  [Irrigation].Apply(amount: 8.12, depth: 1400)
            1991-01-08  [Irrigation].Apply(amount: 9.04, depth: 1400)
            1991-01-09  [Irrigation].Apply(amount: 6.98, depth: 1400)
            1991-01-10  [Irrigation].Apply(amount: 4.62, depth: 1400)
            1991-01-11  [Irrigation].Apply(amount: 5.25, depth: 1400)
            1991-01-12  [Irrigation].Apply(amount: 4.94, depth: 1400)
            1991-01-13  [Irrigation].Apply(amount: 4.91, depth: 1400)
            1991-01-14  [Irrigation].Apply(amount: 4.64, depth: 1400)
            1991-01-15  [Irrigation].Apply(amount: 6.89, depth: 1400)
            1991-01-16  [Irrigation].Apply(amount: 2.48, depth: 1400)
            1991-01-17  [Irrigation].Apply(amount: 2.52, depth: 1400)
            1991-01-18  [Irrigation].Apply(amount: 4.1, depth: 1400)
            1991-01-19  [Irrigation].Apply(amount: 5.2, depth: 1400)
            1991-01-20  [Irrigation].Apply(amount: 5.51, depth: 1400)
            1991-01-21  [Irrigation].Apply(amount: 5.14, depth: 1400)
            1991-01-23  [Irrigation].Apply(amount: 4, depth: 1400)
            1991-01-24  [Irrigation].Apply(amount: 4.69, depth: 1400)
            1991-01-25  [Irrigation].Apply(amount: 6.06, depth: 1400)
            1991-01-26  [Irrigation].Apply(amount: 7.91, depth: 1400)
            1991-01-27  [Irrigation].Apply(amount: 8.11, depth: 1400)
            1991-01-28  [Irrigation].Apply(amount: 5.49, depth: 1400)
            1991-01-29  [Irrigation].Apply(amount: 8.7, depth: 1400)
            1991-01-30  [Irrigation].Apply(amount: 9.27, depth: 1400)
          Plant Lucerne
          Soil: Latitude=0; Longitude=0
            Physical
              Thickness  ParticleSizeSand  ParticleSizeSilt  ParticleSizeClay  Rocks  BD   AirDry  LL15  DUL   SAT   KS
              250        5                 65                30                0      1    0.12    0.12  0.32  0.53  0
              250        5                 65                30                0      1.1  0.3     0.3   0.44  0.57  0
              250        5                 65                30                0      1.1  0.26    0.26  0.42  0.57  0
              250        5                 65                30                0      1.1  0.26    0.26  0.4   0.55  0
              500        5                 65                30                0      1.1  0.38    0.38  0.4   0.55  0
              Rocks, ParticleSizeSilt, ParticleSizeClay source: Calculated (layer 1, 2, 3, 4)
              ParticleSizeSand source: Calculated (layer 1, 2, 3)
              SoilCrop LucerneSoil: LL=[0.12, 0.3, 0.26, 0.26, 0.38]; KL=[0.08, 0.08, 0.08, 0.06, 0.06]; XF=[1, 1, 1, 1, 1]
            WaterBalance SoilWater: SummerDate=1-Nov; SummerU=9; SummerCona=5; WinterDate=1-Apr; WinterU=9; WinterCona=5; DiffusConst=40; DiffusSlope=16; Salb=0.13; CN2Bare=72; CNRed=20; CNCov=0.8; PSIDul=-100
            Nutrient
            Organic: FOMCNRatio=40; CarbonUnits=Total
              Thickness  Carbon  SoilCNRatio  FBiom  FInert  FOM
              100        1.4     14.5         0.03   0.45    1.843
              200        1.4     14.5         0.03   0.45    1.519
              200        1.4     14.5         0.02   0.6     1.251
              200        1.35    14.5         0.015  0.7     1.031
              200        0.95    14.5         0.01   0.85    0.85
              200        1       14.5         0.01   0.9     0.7
              200        0.8     14.5         0.01   0.99    0.577
              200        0.45    14.5         0.01   0.99    0.475
            Chemical: PHUnits=Water
              Thickness  PH   CEC
              100        6    11.495
              200        6.4  11.495
              200        6.8  11.495
              200        7.2  11.3825
              200        7.6  10.4825
              200        8    10.595
              200        8    10.145
              200        8    9.3575
              CEC source: Calculated
            Water: Thickness=[100, 150, 250, 250, 250, 250, 250]; InitialValues=[0.47, 0.47, 0.56, 0.43, 0.39, 0.39, 0.39]; InitialPAWmm=232.5; RelativeTo=LL15; FilledFromTop=true
            OutputLayers: Thickness=[250, 250, 250, 250, 500]
            Solute NO3: Thickness=[100, 200, 200, 200, 200, 200, 200, 200]; InitialValues=[10.7, 9.99, 7.87, 6.2, 4.85, 3.56, 2.72, 2.34]; InitialValuesUnits=ppm; WaterTableConcentration=0; D0=0; DepthConstant=0; MaxDepthSoluteAccessible=0; RunoffEffectivenessAtMovingSolute=0; MaxEffectiveRunoff=0
            Solute NH4: Thickness=[100, 200, 200, 200, 200, 200, 200, 200]; InitialValues=[0.3, 0.3, 0.3, 0.3, 0.3, 0.3, 0.3, 0.3]; InitialValuesUnits=ppm; WaterTableConcentration=0; D0=0; DepthConstant=0; MaxDepthSoluteAccessible=0; RunoffEffectivenessAtMovingSolute=0; MaxEffectiveRunoff=0
            Solute Urea: Thickness=[100, 200, 200, 200, 200, 200, 200, 200]; InitialValues=[0, 0, 0, 0, 0, 0, 0, 0]; InitialValuesUnits=kg/ha; WaterTableConcentration=0; D0=0; DepthConstant=0; MaxDepthSoluteAccessible=0; RunoffEffectivenessAtMovingSolute=0; MaxEffectiveRunoff=0
            SoilTemperature Temperature
          BiomassRemovalEvents CutLucerne: same as New Zealand.Iversen_8.Iversen_8LL.paddock.CutLucerne
          Manager Mower: same as New Zealand.Iversen_8.Iversen_8LL.paddock.Mower
          Manager LucerneSowingRule
            RowSpacing = 300
            SowingDepth = 20
            StemPopulation = 200
            CultivarName = southern_special
            SowingDate = 10/11/1990 00:00:00
            script: same as in New Zealand.Iversen_8.Iversen_8LL.paddock.LucerneSowingRule
    Experiment Moora: DisabledSimNames=[MooraDefoliationCutting]
      Factors
        Factor Def: Specification=[Cutting]
          Operations Cutting
            1999-04-08  [Mower].Script.Cut();
            1999-08-10  [Mower].Script.Cut();
            2000-04-14  [Mower].Script.Cut();
            2000-08-18  [Mower].Script.Cut();
      Simulation MooraLucerne
        Clock: Start=1998-08-26; End=2001-02-01
        Summary summaryfile
        Weather: FileName=moora.met
        SoilArbitrator Soil Arbitrator
        MicroClimate: a_interception=0; b_interception=1; c_interception=0; d_interception=0; SoilHeatFluxFraction=0.4; MinimumHeightDiffForNewLayer=0; NightInterceptionFraction=0.5; ReferenceHeight=2
        Zone paddock: Area=1; Slope=0; AspectAngle=0; Altitude=50
          Irrigation
          Fertiliser
          SurfaceOrganicMatter surface organic matter: InitialResidueName=wheat; InitialResidueType=wheat; InitialResidueMass=0; InitialStandingFraction=0; InitialCPR=0; InitialCNR=80
          Report: same as Australia.Nekia.NekiaBaseSimulation.paddock.Report
          Operations IrrigationEvents
          Operations Cutting: same as Australia.Moora.Factors.Def.Cutting
          Plant Lucerne
          Soil: Latitude=0; Longitude=0
            Physical
              Thickness  ParticleSizeSand  ParticleSizeSilt  ParticleSizeClay  Rocks  BD   AirDry  LL15   DUL   SAT
              100        5                 65                30                0      1.8  0.001   0.002  0.06  0.32
              200        5                 65                30                0      1.8  0.001   0.002  0.06  0.32
              200        5                 65                30                0      1.8  0.001   0.002  0.05  0.32
              200        5                 65                30                0      1.8  0.001   0.002  0.05  0.32
              300        5                 65                30                0      1.8  0.001   0.002  0.05  0.32
              500        5                 65                30                0      1.8  0.001   0.002  0.05  0.32
              500        5                 65                30                0      1.8  0.001   0.002  0.05  0.32
              2500       5                 65                30                0      1.8  0.001   0.002  0.05  0.32
              Rocks, ParticleSizeSand, ParticleSizeSilt, ParticleSizeClay source: Calculated (layer 1, 2, 3, 4, 5, 6, 7)
              SoilCrop LucerneSoil: LL=[0.03, 0.03, 0.05, 0.013, 0.015, 0.016, 0.018, 0.018]; KL=[0.08, 0.08, 0.08, 0.08, 0.08, 0.07, 0.06, 0.06]; XF=[1, 0.8, 0.8, 0.8, 0.8, 0.8, 0.8, 0.8]
            WaterBalance SoilWater: SummerDate=1-Nov; SummerU=4; SummerCona=2; WinterDate=1-Apr; WinterU=4; WinterCona=2; DiffusConst=0; DiffusSlope=0; Salb=0.18; CN2Bare=60; CNRed=20; CNCov=0.8; PSIDul=-100
            Nutrient
            Organic: FOMCNRatio=20; CarbonUnits=Total
              Thickness  Carbon  SoilCNRatio  FBiom  FInert  FOM
              100        0.9     14.5         0.035  0.3     159.5
              200        0.3     14.5         0.025  0.3     118.1
              200        0.01    14.5         0.015  0.6     87.5
              200        0.01    14.5         0.01   0.75    64.8
              300        0.01    14.5         0.01   0.9     41.3
              500        0.01    14.5         0.01   0.99    19.5
              500        0.01    14.5         0.01   0.99    9.2
              2500       0.01    14.5         0.01   0.99    9.2
            Chemical: PHUnits=Water
              Thickness  PH  CEC
              100        5   10.37
              200        5   9.02
              200        5   8.3675
              200        5   8.3675
              300        5   8.3675
              500        5   8.3675
              500        5   8.3675
              2500       5   8.3675
              CEC source: Calculated
            Water: Thickness=[100, 200, 200, 200, 300, 500, 500, 2500]; InitialValues=[0.014, 0.014, 0.012, 0.012, 0.012, 0.012, 0.012, 0.012]; InitialPAWmm=45.6; RelativeTo=LL15; FilledFromTop=false
            OutputLayers: Thickness=[500, 500, 1000, 2500]
            Solute NO3: Thickness=[100, 200, 200, 200, 300, 500, 500, 2500]; InitialValues=[9.2, 7.6, 4.9, 2.7, 1.5, 1.8, 1.4, 1.4]; InitialValuesUnits=ppm; WaterTableConcentration=0; D0=0; DepthConstant=0; MaxDepthSoluteAccessible=0; RunoffEffectivenessAtMovingSolute=0; MaxEffectiveRunoff=0
            Solute NH4: Thickness=[100, 200, 200, 200, 300, 500, 500, 2500]; InitialValues=[0.3, 0.3, 0.3, 0.3, 0.3, 0.5, 0.5, 0.5]; InitialValuesUnits=ppm; WaterTableConcentration=0; D0=0; DepthConstant=0; MaxDepthSoluteAccessible=0; RunoffEffectivenessAtMovingSolute=0; MaxEffectiveRunoff=0
            Solute Urea: Thickness=[100, 200, 200, 200, 300, 500, 500, 2500]; InitialValues=[0, 0, 0, 0, 0, 0, 0, 0]; InitialValuesUnits=kg/ha; WaterTableConcentration=0; D0=0; DepthConstant=0; MaxDepthSoluteAccessible=0; RunoffEffectivenessAtMovingSolute=0; MaxEffectiveRunoff=0
            SoilTemperature Temperature
          BiomassRemovalEvents CutLucerne: same as New Zealand.Iversen_8.Iversen_8LL.paddock.CutLucerne
          Manager Mower: same as New Zealand.Iversen_8.Iversen_8LL.paddock.Mower
          Manager LucerneSowingRule
            RowSpacing = 300
            SowingDepth = 40
            StemPopulation = 100
            CultivarName = Sceptre
            SowingDate = 08/26/1998 00:00:00
            script: same as in New Zealand.Iversen_8.Iversen_8LL.paddock.LucerneSowingRule
          Manager PopulationSet
            SetDate = 05/30/2000 00:00:00
            Pop = 1
            script: same as in New Zealand.Iversen_8.Iversen_8LL.paddock.PopulationSet
    Experiment Forth
      Factors
        Factor FD
          CompositeFactor FD2: Specifications=[LucerneSowingRule].Script.CultivarName = FD2
          CompositeFactor FD10: Specifications=[LucerneSowingRule].Script.CultivarName = FD10
      Simulation Forth
        Weather: FileName=Forth.met
        Clock: Start=1989-02-15; End=1992-03-22
        Summary summaryfile
        SoilArbitrator Soil Arbitrator
        MicroClimate: a_interception=0; b_interception=1; c_interception=0; d_interception=0; SoilHeatFluxFraction=0.4; MinimumHeightDiffForNewLayer=0; NightInterceptionFraction=0.5; ReferenceHeight=2
        Zone paddock: Area=1; Slope=0; AspectAngle=0; Altitude=50
          Irrigation
          Fertiliser
          Report: EventNames=[Clock].DoReport
            VariableNames:
              [Clock].Today
              [DiagnosticsVariables].Script.AccumPlantN
              [DiagnosticsVariables].Script.AccumMineralisation
              [DiagnosticsVariables].Script.AccumDenit
              [DiagnosticsVariables].Script.AccumFert
              [DiagnosticsVariables].Script.AccumLeach
              [DiagnosticsVariables].Script.AccumDetach
              [DiagnosticsVariables].Script.DeltaSoilOMN
              [DiagnosticsVariables].Script.DeltaSurfaceOMN
              [DiagnosticsVariables].Script.DeltaSoilMineralN
              [Lucerne].Root.NSupply
              [Soil].SoilWater.Eo
              [Soil].SoilWater.Es
              [DiagnosticsVariables].Script.SWC
              [DiagnosticsVariables].Script.DUL
              [Soil].SoilWater.Drainage
              [Soil].SoilWater.Runoff
              [DiagnosticsVariables].Script.OutFlowLat
              [Soil].SoilWater.pond
              [DiagnosticsVariables].Script.AccumEO
              [DiagnosticsVariables].Script.AccumEP
              [DiagnosticsVariables].Script.AccumES
              [DiagnosticsVariables].Script.AccumDrainage
              [DiagnosticsVariables].Script.AccumRunoff
              [DiagnosticsVariables].Script.AccumRainfall
              [DiagnosticsVariables].Script.AccumIrrigation
              [DiagnosticsVariables].Script.AccumOutflowLat
              [DiagnosticsVariables].Script.SoilWaterDeficit
              [Lucerne].Grain.Live.Wt
              [Lucerne].Shell.Live.Wt
              [Lucerne].Stem.Live.Wt
              [Lucerne].Stem.Live.Wt
              [Lucerne].Grain.Live.N
              [Lucerne].Shell.Live.N
              [Lucerne].Leaf.Live.Wt
              [Lucerne].Root.Live.Wt
              [Lucerne].Leaf.Live.N
              [Lucerne].Root.Live.N
              [Lucerne].Leaf.Live.NConc
              [Lucerne].Root.Live.NConc
              [Lucerne].Root.WaterSupply
              [Lucerne].Root.WaterUptake
              [Lucerne].Leaf.Transpiration
              [Lucerne].Leaf.WaterDemand
              [Lucerne].Root.Depth
              [Lucerne].Leaf.CoverTotal
              [Lucerne].Leaf.CoverDead
              [Lucerne].Leaf.LAI
              [Lucerne].Leaf.Height
              [Soil].Water.MM
              [Soil].NO3.kgha
              [DiagnosticsVariables].Script.SoilNitrogenContent
              [Lucerne].Arbitrator.N.TotalPlantDemand
              [DiagnosticsVariables].Script.FomN
              [DiagnosticsVariables].Script.HumN
              [DiagnosticsVariables].Script.BiomN
              [DiagnosticsVariables].Script.DltNMinRes
              [DiagnosticsVariables].Script.DltNMinTot
              [Lucerne].Leaf.Fw
              [Lucerne].Leaf.Fn
              [Lucerne].Phenology.CurrentPhase.Name
              [Lucerne].Phenology.CurrentStageName
              [Lucerne].Phenology.Stage
              [Lucerne].Pod.Wt
              [Lucerne].Pod.N
              [Lucerne].AboveGround.Wt *10 as ShootWt
              [Lucerne].Shell.PodNumber
              [Lucerne].Leaf.LAIFunction
          Operations IrrigationEvents
            1999-01-13  [Irrigation].Apply(26);
          Operations Cutting
            1989-09-14  [Mower].Script.Cut();
            1989-11-04  [Mower].Script.Cut();
            1989-12-07  [Mower].Script.Cut();
            1990-01-17  [Mower].Script.Cut();
            1990-02-27  [Mower].Script.Cut();
            1990-05-09  [Mower].Script.Cut();
            1990-08-02  [Mower].Script.Cut();
            1990-11-01  [Mower].Script.Cut();
            1990-12-13  [Mower].Script.Cut();
            1991-01-15  [Mower].Script.Cut();
            1991-02-20  [Mower].Script.Cut();
            1991-04-19  [Mower].Script.Cut();
            1991-07-04  [Mower].Script.Cut();
            1991-11-14  [Mower].Script.Cut();
            1991-12-17  [Mower].Script.Cut();
            1992-01-22  [Mower].Script.Cut();
          SurfaceOrganicMatter: InitialResidueName=lucerne_stubble; InitialResidueType=lucerne; InitialResidueMass=262; InitialStandingFraction=0; InitialCPR=0; InitialCNR=7.98
          Plant Lucerne
          Soil Red Ferrosol: ASCOrder=Ferrosol; ASCSubOrder=Red; SoilType=?; Site=Moriarty; NearestTown=Moriarty; Region=North West Coast; State=Tasmania; Country=Australia; ApsoilNumber=776; Latitude=-41.2286; Longitude=146.499; LocationAccuracy=+/- 20m
            DataSource=Data collected by Bill Cotching as part of project 'Landscape Logic' in collaboration with Shaun Lisson
            Comments=Site 3 (IH); A1, 0-21cm; Dark reddish brown (5YR3/3); Clay loam; strong fine subangular blocky structure; moderately firm consistence (moist); many very fine roots; abrupt smooth boundary; B1, 21-40cm; Dark reddish brown (2.5YR2.5/4); Light clay; strong f
            Water: Thickness=[210, 190, 250, 280, 270]; InitialValues=[0.54, 0.51, 0.51, 0.51, 0.506]; InitialPAWmm=293.34; RelativeTo=LL15; FilledFromTop=false
            WaterBalance SoilWater: SummerDate=1-Nov; SummerU=6; SummerCona=3.5; WinterDate=1-Apr; WinterU=4; WinterCona=2.5; DiffusConst=40; DiffusSlope=16; Salb=0.13; CN2Bare=73; CNRed=20; CNCov=0.8; PSIDul=-100
            Nutrient
            Physical
              Thickness  ParticleSizeSand  ParticleSizeSilt  ParticleSizeClay  Rocks  BD     AirDry  LL15   DUL    SAT
              210        5                 65                30                0      1.11   0.14    0.15   0.54   0.551
              190        5                 65                30                0      1.21   0.23    0.232  0.51   0.513
              250        5                 65                30                0      1.21   0.29    0.29   0.51   0.513
              280        5                 65                30                0      1.21   0.3     0.3    0.51   0.513
              270        5                 65                30                0      1.203  0.34    0.34   0.506  0.516
              Rocks, ParticleSizeSand, ParticleSizeSilt, ParticleSizeClay source: Calculated
              SoilCrop LucerneSoil: LL=[0.28, 0.29, 0.29, 0.3, 0.34]; KL=[0.06, 0.06, 0.06, 0.04, 0.04]; XF=[1, 1, 1, 1, 1]
            Organic: FOMCNRatio=40; CarbonUnits=Total
              Thickness  Carbon  SoilCNRatio  FBiom  FInert  FOM
              210        6.838   12           0.035  0.4     453.676
              190        1.599   12           0.02   0.5     282.134
              250        0.741   12           0.015  0.7     151.015
              280        0.702   12           0.015  0.95    74.992
              270        0.247   12           0.01   0.95    38.183
            Chemical: PHUnits=Water
              Thickness  PH   EC    ESP
              210        5.9  0.14  2.133
              190        5.9  0.15  4.912
              250        6.3  0.17  5.83
              280        6.5  0.15  6.641
              270        6.6  0.12  5.694
            Solute NO3: Thickness=[210, 190, 250, 280, 270]; InitialValues=[0, 0, 0, 0, 0]; InitialValuesUnits=ppm; WaterTableConcentration=0; D0=0; DepthConstant=0; MaxDepthSoluteAccessible=0; RunoffEffectivenessAtMovingSolute=0; MaxEffectiveRunoff=0
            Solute NH4: same as Australia.Forth.Forth.paddock.Red Ferrosol.NO3
            Solute Urea: Thickness=[210, 190, 250, 280, 270]; InitialValues=[0, 0, 0, 0, 0]; InitialValuesUnits=kg/ha; WaterTableConcentration=0; D0=0; DepthConstant=0; MaxDepthSoluteAccessible=0; RunoffEffectivenessAtMovingSolute=0; MaxEffectiveRunoff=0
            SoilTemperature Temperature
          BiomassRemovalEvents CutLucerne: same as New Zealand.Iversen_8.Iversen_8LL.paddock.CutLucerne
          Manager Mower: same as New Zealand.Iversen_8.Iversen_8LL.paddock.Mower
          Manager LucerneSowingRule
            RowSpacing = 150
            SowingDepth = 10
            StemPopulation = 400
            CultivarName = Kaituna
            SowingDate = 02/16/1989 00:00:00
            script: same as in New Zealand.Iversen_8.Iversen_8LL.paddock.LucerneSowingRule
    Experiment Cranbrook
      Factors: same as Australia.Forth.Factors
      Simulation Cranbrook
        Weather: FileName=Cranbrook.met
        Clock: Start=1989-01-01; End=1992-02-05
        Summary summaryfile
        SoilArbitrator Soil Arbitrator
        MicroClimate: a_interception=0; b_interception=1; c_interception=0; d_interception=0; SoilHeatFluxFraction=0.4; MinimumHeightDiffForNewLayer=0; NightInterceptionFraction=0.5; ReferenceHeight=2
        Zone paddock: Area=1; Slope=0; AspectAngle=0; Altitude=50
          Irrigation
          Fertiliser
          Report: same as Australia.Forth.Forth.paddock.Report
          Operations IrrigationEvents
            1999-01-13  [Irrigation].Apply(26);
          Operations Cutting
            1989-09-03  [Mower].Script.Cut();
            1989-10-24  [Mower].Script.Cut();
            1989-12-13  [Mower].Script.Cut();
            1990-01-24  [Mower].Script.Cut();
            1990-03-14  [Mower].Script.Cut();
            1990-06-22  [Mower].Script.Cut();
            1990-11-15  [Mower].Script.Cut();
            1990-12-20  [Mower].Script.Cut();
            1991-01-22  [Mower].Script.Cut();
            1991-03-13  [Mower].Script.Cut();
            1991-06-27  [Mower].Script.Cut();
            1991-12-11  [Mower].Script.Cut();
            1992-02-05  [Mower].Script.Cut();
          SurfaceOrganicMatter: InitialResidueName=lucerne_stubble; InitialResidueType=lucerne; InitialResidueMass=262; InitialStandingFraction=0; InitialCPR=0; InitialCNR=7.98
          Plant Lucerne
          Soil Red Ferrosol (Moriarty No776): ASCOrder=Ferrosol; ASCSubOrder=Red; SoilType=?; Site=Moriarty; NearestTown=Moriarty; Region=North West Coast; State=Tasmania; Country=Australia; ApsoilNumber=776; Latitude=-41.2286; Longitude=146.499; LocationAccuracy=+/- 20m
            DataSource=Data collected by Bill Cotching as part of project 'Landscape Logic' in collaboration with Shaun Lisson
            Comments=Site 3 (IH); A1, 0-21cm; Dark reddish brown (5YR3/3); Clay loam; strong fine subangular blocky structure; moderately firm consistence (moist); many very fine roots; abrupt smooth boundary; B1, 21-40cm; Dark reddish brown (2.5YR2.5/4); Light clay; strong f
            Water: Thickness=[210, 190, 250, 280, 270]; InitialValues=[0.36, 0.35, 0.35, 0.355, 0.403]; InitialPAWmm=75.61; RelativeTo=LL15; FilledFromTop=false
            WaterBalance SoilWater: same as Australia.Forth.Forth.paddock.Red Ferrosol.SoilWater
            Nutrient
            Physical
              Thickness  ParticleSizeSand  ParticleSizeSilt  ParticleSizeClay  Rocks  BD     AirDry  LL15  DUL    SAT
              210        5                 65                30                0      1.11   0.14    0.28  0.44   0.551
              190        5                 65                30                0      1.21   0.232   0.29  0.41   0.513
              250        5                 65                30                0      1.21   0.29    0.29  0.41   0.513
              280        5                 65                30                0      1.21   0.3     0.3   0.41   0.513
              270        5                 65                30                0      1.203  0.34    0.34  0.466  0.516
              Rocks, ParticleSizeSand, ParticleSizeSilt, ParticleSizeClay source: Calculated
              SoilCrop LucerneSoil: LL=[0.28, 0.29, 0.29, 0.3, 0.34]; KL=[0.06, 0.06, 0.06, 0.04, 0.04]; XF=[1, 1, 1, 1, 1]
            Organic: FOMCNRatio=40; CarbonUnits=Total
              Thickness  Carbon  SoilCNRatio  FBiom  FInert  FOM
              210        6.838   12           0.035  0.4     453.676
              190        1.599   12           0.02   0.5     282.134
              250        0.741   12           0.015  0.7     151.015
              280        0.702   12           0.015  0.95    74.9921
              270        0.247   12           0.01   0.95    38.1827
            Chemical: PHUnits=Water
              Thickness  PH   EC    ESP      CEC
              210        5.9  0.14  2.13322  23.7305
              190        5.9  0.15  4.91228  11.94275
              250        6.3  0.17  5.83004  10.01225
              280        6.5  0.15  6.641    9.9245
              270        6.6  0.12  5.69358  8.90075
              CEC source: Calculated
            Solute NO3: same as Australia.Forth.Forth.paddock.Red Ferrosol.NO3
            Solute NH4: same as Australia.Forth.Forth.paddock.Red Ferrosol.NO3
            Solute Urea: same as Australia.Forth.Forth.paddock.Red Ferrosol.Urea
            SoilTemperature Temperature
          BiomassRemovalEvents CutLucerne: same as New Zealand.Iversen_8.Iversen_8LL.paddock.CutLucerne
          Manager Mower: same as New Zealand.Iversen_8.Iversen_8LL.paddock.Mower
          Manager PopulationSet
            SetDate = 03/30/1991 00:00:00
            Pop = 300
            script: same as in New Zealand.Iversen_8.Iversen_8LL.paddock.PopulationSet
          Manager LucerneSowingRule
            RowSpacing = 150
            SowingDepth = 15
            StemPopulation = 400
            CultivarName = Kaituna
            SowingDate = 01/02/1989 00:00:00
            script: same as in New Zealand.Iversen_8.Iversen_8LL.paddock.LucerneSowingRule
    Experiment Cambridge
      Factors
        Factor FD
          CompositeFactor FD3: Specifications=[LucerneSowingRule].Script.CultivarName = DuPuits
          CompositeFactor FD5: Specifications=[LucerneSowingRule].Script.CultivarName = Kaituna
          CompositeFactor FD7: Specifications=[LucerneSowingRule].Script.CultivarName = SARDI7
          CompositeFactor FD10: Specifications=[LucerneSowingRule].Script.CultivarName = SARDI10
      Simulation Cambridge
        Weather: FileName=Cambridge.MET
        Clock: Start=2006-10-30; End=2008-06-25
        Summary summaryfile
        SoilArbitrator Soil Arbitrator
        MicroClimate: a_interception=0; b_interception=1; c_interception=0; d_interception=0; SoilHeatFluxFraction=0.4; MinimumHeightDiffForNewLayer=0; NightInterceptionFraction=0.5; ReferenceHeight=2
        Zone paddock: Area=1; Slope=0; AspectAngle=0; Altitude=50
          Irrigation
          Fertiliser
          Report: same as Australia.Forth.Forth.paddock.Report
          Operations IrrigationEvents
            2006-11-30  [Irrigation].Apply(80);
            2006-12-15  [Irrigation].Apply(80);
            2007-11-30  [Irrigation].Apply(20);
            2007-12-15  [Irrigation].Apply(20);
            2008-03-01  [Irrigation].Apply(30);
            3008-05-01  [Irrigation].Apply(10);
          Plant Lucerne
          Operations Cutting
            2007-02-07  [Mower].Script.Cut();
            2007-05-18  [Mower].Script.Cut();
            2007-10-01  [Mower].Script.Cut();
            2007-12-13  [Mower].Script.Cut();
            2008-01-22  [Mower].Script.Cut();
            2008-03-20  [Mower].Script.Cut();
            2008-06-25  [Mower].Script.Cut();
          SurfaceOrganicMatter: InitialResidueName=lucerne_stubble; InitialResidueType=lucerne; InitialResidueMass=262; InitialStandingFraction=0; InitialCPR=0; InitialCNR=7.98
          Soil Brown Sodoosol soil: ASCOrder=Sodosol; ASCSubOrder=Brown; SoilType=?; Site=Cambridge; NearestTown=Cambridge; Region=South East; State=Tasmania; Country=Australia; ApsoilNumber=781; Latitude=-42.8041; Longitude=147.4304; LocationAccuracy=+/- 20m
            DataSource=Data collected by Bill Cotching as part of project Landscape Logic in collaboration with Shaun Lisson
            Comments=Site 1 (UT); A1, 0-17cm; Very dark grayish brown (10YR3/2);sandy loam; weakly developed medium angular blocky structure; moderately weak consistence (dry);  common very fine roots; sharp smooth boundary; B21, 17-34cm; Dark greyish brown (10YR4/2); medium
            WaterBalance SoilWater: SummerDate=1-Nov; SummerU=6; SummerCona=3.5; WinterDate=1-Apr; WinterU=4; WinterCona=2.5; DiffusConst=88; DiffusSlope=35; Salb=0.13; CN2Bare=68; CNRed=20; CNCov=0.8; PSIDul=-100
            Nutrient
            Water: Thickness=[160, 170, 440, 330]; InitialValues=[0.24, 0.36, 0.39, 0.22]; InitialPAWmm=0; RelativeTo=LL15; FilledFromTop=false
            Physical
              Thickness  ParticleSizeSand  ParticleSizeSilt  ParticleSizeClay  Rocks  BD    AirDry  LL15  DUL   SAT
              160        5                 65                30                0      0.73  0.12    0.24  0.4   0.69
              170        5                 65                30                0      0.99  0.288   0.36  0.43  0.6
              440        5                 65                30                0      1.06  0.39    0.39  0.51  0.57
              330        5                 65                30                0      1.11  0.22    0.22  0.42  0.55
              Rocks, ParticleSizeSand, ParticleSizeSilt, ParticleSizeClay source: Calculated
              SoilCrop LucerneSoil: LL=[0.24, 0.36, 0.39, 0.22]; KL=[0.06, 0.06, 0.06, 0.04]; XF=[1, 1, 1, 1]
            Organic: FOMCNRatio=40; CarbonUnits=Total
              Thickness  Carbon  SoilCNRatio  FBiom  FInert  FOM
              160        3.653   12           0.035  0.4     527.575
              170        1.469   12           0.02   0.5     331.841
              440        0.884   12           0.015  0.7     99.948
              330        0.442   12           0.015  0.95    40.636
            Chemical: PHUnits=Water
              Thickness  PH   EC    ESP
              160        6.3  0.12  4.728
              170        5.7  0.14  8.032
              440        6.7  0.25  10.686
              330        7.8  0.62  17.83
            Solute NO3: Thickness=[160, 170, 440, 330]; InitialValues=[5.318, 2.441, 1.285, 0.769]; InitialValuesUnits=ppm; WaterTableConcentration=0; D0=0; DepthConstant=0; MaxDepthSoluteAccessible=0; RunoffEffectivenessAtMovingSolute=0; MaxEffectiveRunoff=0
            Solute NH4: Thickness=[160, 170, 440, 330]; InitialValues=[1.043, 0.153, 0.089, 0.032]; InitialValuesUnits=ppm; WaterTableConcentration=0; D0=0; DepthConstant=0; MaxDepthSoluteAccessible=0; RunoffEffectivenessAtMovingSolute=0; MaxEffectiveRunoff=0
            Solute Urea: Thickness=[160, 170, 440, 330]; InitialValues=[0, 0, 0, 0]; InitialValuesUnits=kg/ha; WaterTableConcentration=0; D0=0; DepthConstant=0; MaxDepthSoluteAccessible=0; RunoffEffectivenessAtMovingSolute=0; MaxEffectiveRunoff=0
            SoilTemperature Temperature
          BiomassRemovalEvents CutLucerne: same as New Zealand.Iversen_8.Iversen_8LL.paddock.CutLucerne
          Manager Mower: same as New Zealand.Iversen_8.Iversen_8LL.paddock.Mower
          Manager LucerneSowingRule
            RowSpacing = 150
            SowingDepth = 15
            StemPopulation = 200
            CultivarName = Kaituna
            SowingDate = 10/31/2006 00:00:00
            script: same as in New Zealand.Iversen_8.Iversen_8LL.paddock.LucerneSowingRule
          Manager PopulationSet
            SetDate = 07/01/2007 00:00:00
            Pop = 300
            script: same as in New Zealand.Iversen_8.Iversen_8LL.paddock.PopulationSet
    Experiment Elliott
      Factors
        Permutation
          Factor FD
            CompositeFactor FD3: Specifications=[LucerneSowingRule].Script.CultivarName = DuPuits
            CompositeFactor FD5
              Specifications:
                [LucerneSowingRule].Script.CultivarName = Kaituna
                [Cutting]
              Operations Cutting
                2007-03-28  [Mower].Script.Cut();
                2007-05-31  [Mower].Script.Cut();
                2007-09-07  [Mower].Script.Cut();
                2007-11-27  [Mower].Script.Cut();
                2008-01-09  [Mower].Script.Cut();
                2008-02-15  [Mower].Script.Cut();
                2008-03-10  [Mower].Script.Cut();
            CompositeFactor FD7
              Specifications:
                [LucerneSowingRule].Script.CultivarName = SARDI7
                [Cutting]
              Operations Cutting: same as Australia.Elliott.Factors.Permutation.FD.FD5.Cutting
            CompositeFactor FD10: Specifications=[LucerneSowingRule].Script.CultivarName = SARDI10
          Factor Water
            CompositeFactor Dry: Specifications=[IrrigationEvents]
              Operations IrrigationEvents
                2006-11-30  [Irrigation].Apply(60);
                2006-12-15  [Irrigation].Apply(60);
            CompositeFactor Irr: Specifications=[IrrigationEvents]
              Operations IrrigationEvents
                2007-01-18  [Irrigation].Apply(60);
                2007-02-18  [Irrigation].Apply(60);
                2007-03-27  [Irrigation].Apply(40);
                2007-05-30  [Irrigation].Apply(40);
                2007-09-06  [Irrigation].Apply(40);
                2007-11-26  [Irrigation].Apply(40);
                2008-01-08  [Irrigation].Apply(40);
                2008-02-14  [Irrigation].Apply(40);
                2008-03-26  [Irrigation].Apply(40);
                2008-04-29  [Irrigation].Apply(40);
      Simulation Elliott
        Weather: FileName=Elliott.MET
        Clock: Start=2007-01-01; End=2008-07-01
        Summary summaryfile
        SoilArbitrator Soil Arbitrator
        MicroClimate: a_interception=0; b_interception=1; c_interception=0; d_interception=0; SoilHeatFluxFraction=0.4; MinimumHeightDiffForNewLayer=0; NightInterceptionFraction=0.5; ReferenceHeight=2
        Zone paddock: Area=1; Slope=0; AspectAngle=0; Altitude=50
          Irrigation
          Fertiliser
          Report: same as Australia.Forth.Forth.paddock.Report
          Operations IrrigationEvents
          Operations Cutting
            2007-03-28  [Mower].Script.Cut();
            2007-05-31  [Mower].Script.Cut();
            2007-09-07  [Mower].Script.Cut();
            2007-11-27  [Mower].Script.Cut();
            2008-01-09  [Mower].Script.Cut();
            2008-02-15  [Mower].Script.Cut();
            2008-03-27  [Mower].Script.Cut();
          Plant Lucerne
          SurfaceOrganicMatter: InitialResidueName=lucerne_stubble; InitialResidueType=lucerne; InitialResidueMass=262; InitialStandingFraction=0; InitialCPR=0; InitialCNR=7.98
          Soil Red Ferrosol (Northdown No775)1: ASCOrder=Ferrosol; ASCSubOrder=Red; SoilType=?; Site=Northdown; NearestTown=Northdown; Region=North West Coast; State=Tasmania; Country=Australia; ApsoilNumber=775; Latitude=-41.1884; Longitude=146.494975; LocationAccuracy=+/- 20m
            DataSource=Data collected by Bill Cotching as part of project 'Landscape Logic' in collaboration with Shaun Lisson
            Comments=Site 4 (SG); A1, 0-15cm: Dark reddish brown (5YR2.5/2); Clay loam; strong fine and medium subangular blocky structure; firm consistence (moist); common very fine roots; abrupt smooth boundary; A1, 15-32cm: Dark reddish brown (5YR2.5/2); Clay loam; strong fi
            WaterBalance SoilWater: same as Australia.Forth.Forth.paddock.Red Ferrosol.SoilWater
            Nutrient
            Water: Thickness=[200, 160, 120, 320, 300]; InitialValues=[0.34, 0.33, 0.42, 0.43, 0.49]; InitialPAWmm=137; RelativeTo=LL15; FilledFromTop=false
            Physical
              Thickness  ParticleSizeSand  ParticleSizeSilt  ParticleSizeClay  Rocks     BD   AirDry  LL15  DUL   SAT
              200        5                 65                30                0.26068   0.8  0.09    0.21  0.34  0.48
              160        5                 65                30                0.203691  0.8  0.09    0.21  0.33  0.517
              120        5                 65                30                0         1    0.2     0.3   0.42  0.536
              320        5                 65                30                0         1    0.2     0.31  0.43  0.53
              300        5                 65                30                0         1.1  0.3     0.36  0.49  0.53
              Rocks, ParticleSizeSand, ParticleSizeSilt, ParticleSizeClay source: Calculated
              SoilCrop LucerneSoil: LL=[0.21, 0.21, 0.3, 0.31, 0.36]; KL=[0.06, 0.06, 0.06, 0.04, 0.04]; XF=[1, 1, 1, 1, 1]
            Organic: FOMCNRatio=40; CarbonUnits=Total
              Thickness  Carbon  SoilCNRatio  FBiom  FInert  FOM
              200        7.215   12           0.035  0.4     417.896
              160        7.384   12           0.02   0.5     270.121
              120        3.367   12           0.015  0.7     194.726
              320        1.274   12           0.015  0.95    81.359
              300        0.858   12           0.01   0.95    35.898
            Chemical: PHUnits=Water
              Thickness  PH   EC    ESP
              200        5.9  0.08  1.66331
              160        5.9  0.08  2.14362
              120        6.4  0.07  3.1405
              320        6.5  0.11  4.93129
              300        6.5  0.11  4.32043
            Solute NO3: Thickness=[200, 160, 120, 320, 300]; InitialValues=[52, 24, 1.285, 0.769, 1.006]; InitialValuesUnits=ppm; WaterTableConcentration=0; D0=0; DepthConstant=0; MaxDepthSoluteAccessible=0; RunoffEffectivenessAtMovingSolute=0; MaxEffectiveRunoff=0
            Solute NH4: Thickness=[200, 160, 120, 320, 300]; InitialValues=[1.043, 0.153, 0.089, 0.032, 2.869]; InitialValuesUnits=ppm; WaterTableConcentration=0; D0=0; DepthConstant=0; MaxDepthSoluteAccessible=0; RunoffEffectivenessAtMovingSolute=0; MaxEffectiveRunoff=0
            Solute Urea: Thickness=[200, 160, 120, 320, 300]; InitialValues=[0, 0, 0, 0, 0]; InitialValuesUnits=kg/ha; WaterTableConcentration=0; D0=0; DepthConstant=0; MaxDepthSoluteAccessible=0; RunoffEffectivenessAtMovingSolute=0; MaxEffectiveRunoff=0
            SoilTemperature Temperature
          BiomassRemovalEvents CutLucerne: same as New Zealand.Iversen_8.Iversen_8LL.paddock.CutLucerne
          Manager Mower: same as New Zealand.Iversen_8.Iversen_8LL.paddock.Mower
          Manager PopulationSet
            SetDate = 01/01/2018 00:00:00
            Pop = 100
            script: same as in New Zealand.Iversen_8.Iversen_8LL.paddock.PopulationSet
          Manager LucerneSowingRule
            RowSpacing = 150
            SowingDepth = 15
            StemPopulation = 350
            CultivarName = Kaituna
            SowingDate = 01/17/2007 00:00:00
            script: same as in New Zealand.Iversen_8.Iversen_8LL.paddock.LucerneSowingRule
  Folder Argentina
    Experiment TrenqueLauquen
      Factors
        Factor Defoliation: Specification=[Cutting]
          Operations Cutting
            2010-11-16  [Mower].Script.Cut();
            2010-12-14  [Mower].Script.Cut();
            2011-01-13  [Mower].Script.Cut();
            2011-02-15  [Mower].Script.Cut();
            2011-03-17  [Mower].Script.Cut();
            2011-05-07  [Mower].Script.Cut();
            2011-07-13  [Mower].Script.Cut();
            2011-09-15  [Mower].Script.Cut();
            2011-10-25  [Mower].Script.Cut();
            2011-11-24  [Mower].Script.Cut();
            2011-12-22  [Mower].Script.Cut();
            2012-02-03  [Mower].Script.Cut();
            2012-03-27  [Mower].Script.Cut();
            2012-04-27  [Mower].Script.Cut();
      Simulation winter active Trenque Lauquen
        Clock: Start=2010-04-18; End=2012-04-27
        Summary summaryfile
        Weather: FileName=TrenqueLauquen.met
        SoilArbitrator Soil Arbitrator
        MicroClimate: a_interception=0; b_interception=1; c_interception=0; d_interception=0; SoilHeatFluxFraction=0.4; MinimumHeightDiffForNewLayer=0; NightInterceptionFraction=0.5; ReferenceHeight=2
        Zone paddock: Area=1; Slope=0; AspectAngle=0; Altitude=50
          Irrigation
          Fertiliser
          SurfaceOrganicMatter surface organic matter: InitialResidueName=wheat; InitialResidueType=wheat; InitialResidueMass=0; InitialStandingFraction=0; InitialCPR=0; InitialCNR=80
          Report: same as Australia.Nekia.NekiaBaseSimulation.paddock.Report
          Operations IrrigationEvents
          Operations Cutting
          Plant Lucerne
          Soil TrenqueLauquen: SoilType=Sandy loam; Site=Trenque Lauquen; State=Buenos Aires; Country=Argentina; DataSource=EEA Rafaela INTA
            Comments=These soils represent typical sandy/sandy loam soils in the regions of Bulawayo and Masvingo, Zimbabwe. Possibly about 1999?
            Physical
              Thickness  BD    AirDry  LL15   DUL    SAT
              280        1.37  0.035   0.07   0.17   0.189
              190        1.38  0.031   0.061  0.182  0.202
              370        1.22  0.023   0.045  0.133  0.147
              240        1.3   0.033   0.065  0.121  0.134
              220        1.22  0.049   0.097  0.209  0.231
              SoilCrop LucerneSoil: LL=[0.07, 0.061, 0.045, 0.065, 0.097]; KL=[0.06, 0.06, 0.04, 0.04, 0.04]; XF=[1, 1, 1, 1, 0.6]
            Water: Thickness=[280, 190, 370, 240, 220]; InitialValues=[0.17, 0.182, 0.133, 0.121, 0.209]; InitialPAWmm=121.63; RelativeTo=LL15; FilledFromTop=false
            WaterBalance SoilWater: SummerDate=1-nov; SummerU=6; SummerCona=3.5; WinterDate=1-apr; WinterU=2; WinterCona=2; DiffusConst=40; DiffusSlope=16; Salb=0.1; CN2Bare=0; CNRed=0.9; CNCov=0.9; PSIDul=-100
            Nutrient
            Organic: FOMCNRatio=40; CarbonUnits=Total
              Thickness  Carbon  SoilCNRatio  FBiom   FInert  FOM
              280        1.349   19.35        0.0356  0.0042  198.329
              190        0.804   19.35        0.0152  0.0034  198.216
              370        0.353   19.35        0.0237  0.0083  197.996
              240        0.133   19.35        0.0145  0.0057  197.854
              220        0.094   19.35        0.0185  0.0077  197.723
              999999     -       19.35        -       -       9.88249
            Chemical: Thickness=[280, 190, 370, 240, 220]; PH=[7.1, 8.3, 8.3, 8.8, 9.3]; PHUnits=Water
            Solute NO3: Thickness=[280, 190, 370, 240, 220]; InitialValues=[5.318, 2.441, 1.285, 0.769, 1.006]; InitialValuesUnits=ppm; WaterTableConcentration=0; D0=0; DepthConstant=0; MaxDepthSoluteAccessible=0; RunoffEffectivenessAtMovingSolute=0; MaxEffectiveRunoff=0
            Solute NH4: Thickness=[280, 190, 370, 240, 220]; InitialValues=[1.043, 0.153, 0.089, 0.032, 2.869]; InitialValuesUnits=ppm; WaterTableConcentration=0; D0=0; DepthConstant=0; MaxDepthSoluteAccessible=0; RunoffEffectivenessAtMovingSolute=0; MaxEffectiveRunoff=0
            Solute Urea: Thickness=[280, 190, 370, 240, 220]; InitialValues=[0, 0, 0, 0, 0]; InitialValuesUnits=kg/ha; WaterTableConcentration=0; D0=0; DepthConstant=0; MaxDepthSoluteAccessible=0; RunoffEffectivenessAtMovingSolute=0; MaxEffectiveRunoff=0
            SoilTemperature Temperature
          BiomassRemovalEvents CutLucerne: same as New Zealand.Iversen_8.Iversen_8LL.paddock.CutLucerne
          Manager Mower: same as New Zealand.Iversen_8.Iversen_8LL.paddock.Mower
          Manager LucerneSowingRule
            RowSpacing = 300
            SowingDepth = 10
            StemPopulation = 200
            CultivarName = Kaituna
            SowingDate = 04/19/2010 00:00:00
            script: same as in New Zealand.Iversen_8.Iversen_8LL.paddock.LucerneSowingRule
    Experiment Balcarce
      Factors
        Factor Defoliation: Specification=[Cutting]
          Operations Cutting
            2013-01-10  [Mower].Script.Cut();
            2013-02-08  [Mower].Script.Cut();
            2013-03-14  [Mower].Script.Cut();
            2013-04-18  [Mower].Script.Cut();
            2013-05-06  [Mower].Script.Cut();
            2013-09-17  [Mower].Script.Cut();
            2013-10-29  [Mower].Script.Cut();
            2013-11-27  [Mower].Script.Cut();
            2013-12-28  [Mower].Script.Cut();
            2014-01-29  [Mower].Script.Cut();
            2014-02-25  [Mower].Script.Cut();
            2014-04-17  [Mower].Script.Cut();
            2014-06-12  [Mower].Script.Cut();
            2014-09-11  [Mower].Script.Cut();
            2014-11-06  [Mower].Script.Cut();
            2014-12-04  [Mower].Script.Cut();
            2014-12-24  [Mower].Script.Cut();
            2015-01-17  [Mower].Script.Cut();
            2015-02-11  [Mower].Script.Cut();
            2015-03-17  [Mower].Script.Cut();
            2015-05-12  [Mower].Script.Cut();
            2015-12-11  [Mower].Script.Cut();
            2016-01-07  [Mower].Script.Cut();
            2016-02-27  [Mower].Script.Cut();
            2016-04-23  [Mower].Script.Cut();
            2016-06-16  [Mower].Script.Cut();
            2016-08-16  [Mower].Script.Cut();
            2016-10-06  [Mower].Script.Cut();
            2016-11-23  [Mower].Script.Cut();
            2017-01-05  [Mower].Script.Cut();
            2017-03-07  [Mower].Script.Cut();
      Simulation Balcarce
        Clock: Start=2012-10-17; End=2017-04-10
        Summary summaryfile
        Weather: FileName=Balcarce.met
        SoilArbitrator Soil Arbitrator
        MicroClimate: a_interception=0; b_interception=1; c_interception=0; d_interception=0; SoilHeatFluxFraction=0.4; MinimumHeightDiffForNewLayer=0; NightInterceptionFraction=0.5; ReferenceHeight=2
        Zone paddock: Area=1; Slope=0; AspectAngle=0; Altitude=50
          MicroClimate: a_interception=0; b_interception=1; c_interception=0; d_interception=0; SoilHeatFluxFraction=0.4; MinimumHeightDiffForNewLayer=0; NightInterceptionFraction=0.5; ReferenceHeight=2
          Irrigation
          Fertiliser
          SurfaceOrganicMatter surface organic matter: InitialResidueName=wheat; InitialResidueType=wheat; InitialResidueMass=0; InitialStandingFraction=0; InitialCPR=0; InitialCNR=80
          Report: same as Australia.Nekia.NekiaBaseSimulation.paddock.Report
          Operations IrrigationEvents
          Operations Cutting
            2013-01-10  [Mower].Script.Cut();
            2013-02-08  [Mower].Script.Cut();
            2013-03-14  [Mower].Script.Cut();
            2013-04-18  [Mower].Script.Cut();
            2013-05-06  [Mower].Script.Cut();
            2013-09-17  [Mower].Script.Cut();
            2013-10-29  [Mower].Script.Cut();
            2013-11-27  [Mower].Script.Cut();
            2013-12-28  [Mower].Script.Cut();
            2014-01-29  [Mower].Script.Cut();
            2014-02-25  [Mower].Script.Cut();
            2014-04-17  [Mower].Script.Cut();
            2014-06-12  [Mower].Script.Cut();
            2014-09-11  [Mower].Script.Cut();
            2014-11-06  [Mower].Script.Cut();
            2014-12-04  [Mower].Script.Cut();
            2014-12-24  [Mower].Script.Cut();
            2015-01-17  [Mower].Script.Cut();
            2015-02-11  [Mower].Script.Cut();
            2015-03-17  [Mower].Script.Cut();
            2015-05-12  [Mower].Script.Cut();
          Plant Lucerne
          Soil Balcarce: Site=Balcarce; NearestTown=Buenos Aires; State=Buenos Aires; Country=Argentina; Latitude=-37.8; Longitude=-58.3; DataSource=EEA Balcarce INTA
            Water: Thickness=[100, 100, 100, 100, 100, 100, 100, 100, 100]; InitialPAWmm=136.4; RelativeTo=LL15; FilledFromTop=false
              InitialValues=[0.271, 0.271, 0.267, 0.33, 0.337, 0.374, 0.41, 0.383, 0.38]
            WaterBalance SoilWater: SummerDate=1-nov; SummerU=6; SummerCona=3.5; WinterDate=1-apr; WinterU=2; WinterCona=2; DiffusConst=40; DiffusSlope=16; Salb=0.1; CN2Bare=0; CNRed=0.9; CNCov=0.9; PSIDul=-100
            Nutrient
            Physical
              Thickness  ParticleSizeSand  ParticleSizeSilt  ParticleSizeClay  Rocks     BD    AirDry  LL15   DUL    SAT
              100        5                 65                30                0.253441  1.15  0.085   0.169  0.28   0.393
              100        5                 65                30                0.253441  1.15  0.085   0.169  0.28   0.393
              100        5                 65                30                0.196782  1.27  0.099   0.156  0.277  0.389
              100        5                 65                30                0         1.27  0.138   0.175  0.344  0.487
              100        5                 65                30                0         1.35  0.142   0.178  0.351  0.49
              100        5                 65                30                0         1.35  0.168   0.197  0.389  0.49
              100        5                 65                30                0         1.35  0.194   0.215  0.427  0.49
              100        5                 65                30                0         1.35  0.181   0.201  0.399  0.456
              100        5                 65                30                0         1.35  0.179   0.199  0.396  0.45
              Rocks, ParticleSizeSand, ParticleSizeSilt, ParticleSizeClay source: Calculated
              SoilCrop LucerneSoil
                LL=[0.169, 0.15, 0.178, 0.215, 0.199, 0.199, 0.199, 0.199, 0.199]
                KL=[0.06, 0.06, 0.04, 0.04, 0.04, 0.04, 0.04, 0.04, 0.04]
                XF=[1, 1, 1, 1, 0.6, 0.6, 0.6, 0.6, 0.6]
            Organic: FOMCNRatio=30; CarbonUnits=Total
              Thickness  Carbon  SoilCNRatio  FBiom  FInert  FOM
              200        4.179   19.69        0.046  0.022   550.236
              200        2.552   19.69        0.007  0.009   358.445
              200        1.167   19.69        0.002  0       233.505
              200        0.631   19.69        0.001  0       152.114
              200        0.64    19.69        0      0       99.093
              200        0.64    19.69        0      0       64.553
              200        0.64    19.69        0      0       42.052
            Chemical: PHUnits=Water
              Thickness  PH   CEC
              200        7    17.7478
              200        7.4  14.087
              200        7.4  10.9708
              200        7.8  9.76475
              200        7.8  9.785
              200        7.8  9.785
              CEC source: Calculated
            OutputLayers: Thickness=[100, 100, 100, 100, 100, 100, 100, 100, 100]
            Solute NO3: Thickness=[200, 200, 200, 200, 200, 200]; InitialValues=[6.522, 0.415, 4.567, 3.359, 1.741, 1.222]; InitialValuesUnits=ppm; WaterTableConcentration=0; D0=0; DepthConstant=0; MaxDepthSoluteAccessible=0; RunoffEffectivenessAtMovingSolute=0; MaxEffectiveRunoff=0
            Solute NH4: Thickness=[200, 200, 200, 200, 200, 200]; InitialValues=[1.217, 0, 0, 0, 0, 0]; InitialValuesUnits=ppm; WaterTableConcentration=0; D0=0; DepthConstant=0; MaxDepthSoluteAccessible=0; RunoffEffectivenessAtMovingSolute=0; MaxEffectiveRunoff=0
            Solute Urea: Thickness=[200, 200, 200, 200, 200, 200]; InitialValues=[0, 0, 0, 0, 0, 0]; InitialValuesUnits=kg/ha; WaterTableConcentration=0; D0=0; DepthConstant=0; MaxDepthSoluteAccessible=0; RunoffEffectivenessAtMovingSolute=0; MaxEffectiveRunoff=0
            SoilTemperature Temperature
          BiomassRemovalEvents CutLucerne: same as New Zealand.Iversen_8.Iversen_8LL.paddock.CutLucerne
          Manager Mower: same as New Zealand.Iversen_8.Iversen_8LL.paddock.Mower
          Manager LucerneSowingRule
            RowSpacing = 300
            SowingDepth = 10
            StemPopulation = 350
            CultivarName = WL611
            SowingDate = 10/18/2012 00:00:00
            script: same as in New Zealand.Iversen_8.Iversen_8LL.paddock.LucerneSowingRule
    Experiment Pergamino
      Factors
        Factor Defoliation: Specification=[Cutting]
          Operations Cutting
            2010-10-09  [Mower].Script.Cut();
            2010-10-08  [Fertiliser].Apply(3.7, "UreaN", 50);
            2010-11-17  [Mower].Script.Cut();
            2010-12-11  [Mower].Script.Cut();
            2011-01-07  [Mower].Script.Cut();
            2011-02-02  [Mower].Script.Cut();
            2011-03-10  [Mower].Script.Cut();
            2011-04-26  [Mower].Script.Cut();
            2011-06-09  [Mower].Script.Cut();
            2011-09-15  [Mower].Script.Cut();
            2011-10-25  [Mower].Script.Cut();
            2011-11-18  [Mower].Script.Cut();
            2011-12-13  [Mower].Script.Cut();
            2012-01-18  [Mower].Script.Cut();
            2012-02-11  [Mower].Script.Cut();
            2012-03-20  [Mower].Script.Cut();
            2012-05-10  [Mower].Script.Cut();
            2012-06-22  [Mower].Script.Cut();
            2012-10-05  [Mower].Script.Cut();
      Simulation Winter dormant Pergamino
        Clock: Start=2010-01-02; End=2012-10-31
        Summary summaryfile
        Weather: FileName=Per.met
        SoilArbitrator Soil Arbitrator
        MicroClimate: a_interception=0; b_interception=1; c_interception=0; d_interception=0; SoilHeatFluxFraction=0.4; MinimumHeightDiffForNewLayer=0; NightInterceptionFraction=0.5; ReferenceHeight=2
        Zone paddock: Area=1; Slope=0; AspectAngle=0; Altitude=50
          Irrigation
          Fertiliser
          SurfaceOrganicMatter surface organic matter: InitialResidueName=wheat; InitialResidueType=wheat; InitialResidueMass=0; InitialStandingFraction=0; InitialCPR=0; InitialCNR=80
          Report: EventNames=[Clock].DoReport
            VariableNames:
              [Clock].Today
              [DiagnosticsVariables].Script.AccumPlantN
              [DiagnosticsVariables].Script.AccumMineralisation
              [DiagnosticsVariables].Script.AccumDenit
              [DiagnosticsVariables].Script.AccumFert
              [DiagnosticsVariables].Script.AccumLeach
              [DiagnosticsVariables].Script.AccumDetach
              [DiagnosticsVariables].Script.DeltaSoilOMN
              [DiagnosticsVariables].Script.DeltaSurfaceOMN
              [DiagnosticsVariables].Script.DeltaSoilMineralN
              [Lucerne].Root.NSupply
              [Soil].SoilWater.Eo
              [Soil].SoilWater.Es
              [DiagnosticsVariables].Script.SWC as SWC
              [DiagnosticsVariables].Script.DUL
              [Soil].SoilWater.Drainage
              [Soil].SoilWater.Runoff
              [DiagnosticsVariables].Script.OutFlowLat
              [Soil].SoilWater.pond
              [DiagnosticsVariables].Script.AccumEO
              [DiagnosticsVariables].Script.AccumEP
              [DiagnosticsVariables].Script.AccumES
              [DiagnosticsVariables].Script.AccumDrainage
              [DiagnosticsVariables].Script.AccumRunoff
              [DiagnosticsVariables].Script.AccumRainfall
              [DiagnosticsVariables].Script.AccumIrrigation
              [DiagnosticsVariables].Script.AccumOutflowLat
              [DiagnosticsVariables].Script.SoilWaterDeficit
              [Lucerne].Grain.Live.Wt
              [Lucerne].Shell.Live.Wt
              [Lucerne].Stem.Live.Wt as StemWt
              [Lucerne].Stem.Live.Wt
              [Lucerne].Grain.Live.N
              [Lucerne].Shell.Live.N
              [Lucerne].Leaf.Live.Wt as LeafWt
              [Lucerne].Root.Live.Wt as RootWt
              [Lucerne].Leaf.Live.N
              [Lucerne].Root.Live.N
              [Lucerne].Leaf.Live.NConc
              [Lucerne].Root.Live.NConc
              [Lucerne].Root.WaterSupply
              [Lucerne].Root.WaterUptake
              [Lucerne].Leaf.Transpiration
              [Lucerne].Leaf.WaterDemand
              [Lucerne].Root.Depth
              [Lucerne].Leaf.CoverTotal
              [Lucerne].Leaf.CoverDead
              [Lucerne].Leaf.LAI
              [Lucerne].Leaf.Height
              [Soil].Water.MM
              [Soil].NO3.kgha
              [DiagnosticsVariables].Script.SoilNitrogenContent
              [Lucerne].Arbitrator.N.TotalPlantDemand
              [DiagnosticsVariables].Script.FomN
              [DiagnosticsVariables].Script.HumN
              [DiagnosticsVariables].Script.BiomN
              [DiagnosticsVariables].Script.DltNMinRes
              [DiagnosticsVariables].Script.DltNMinTot
              [Lucerne].Leaf.Fw
              [Lucerne].Leaf.Fn
              [Lucerne].Phenology.CurrentPhase.Name
              [Lucerne].Phenology.CurrentStageName
              [Lucerne].Phenology.Stage
              [Lucerne].Pod.Wt
              [Lucerne].Pod.N
              [Lucerne].AboveGround.Wt *10 as ShootWt
              [Lucerne].Shell.PodNumber
              [Lucerne].Leaf.LAIFunction
          Operations IrrigationEvents
          Operations Cutting
          Plant Lucerne
          Soil per soil: SoilType=Typical argiudol; Site=Pergamino; NearestTown=Buenos Aires; State=Buenos Aires; Country=Argentina; Latitude=-33.9; Longitude=-60.6; DataSource=EEA Pergamino INTA
            Water: Thickness=[130, 120, 90, 410, 200, 650]; InitialValues=[0.326, 0.327, 0.356, 0.418, 0.355, 0.293]; InitialPAWmm=249.36; RelativeTo=LL15; FilledFromTop=true
            WaterBalance SoilWater: same as Argentina.TrenqueLauquen.winter active Trenque Lauquen.paddock.TrenqueLauquen.SoilWater
            Nutrient
            Physical
              Thickness  BD    AirDry  LL15   DUL    SAT
              130        1.27  0.089   0.178  0.326  0.362
              120        1.32  0.125   0.178  0.327  0.363
              90         1.33  0.155   0.193  0.356  0.393
              410        1.33  0.204   0.226  0.418  0.461
              200        1.33  0.174   0.193  0.355  0.392
              650        1.33  0.145   0.16   0.293  0.323
              SoilCrop LucerneSoil: LL=[0.178, 0.178, 0.193, 0.226, 0.193, 0.16]; KL=[0.16, 0.16, 0.1, 0.1, 0.05, 0.05]; XF=[1, 1, 1, 1, 1, 1]
            Organic: FOMCNRatio=30; CarbonUnits=Total
              Thickness  Carbon  SoilCNRatio  FBiom   FInert  FOM
              130        1.732   18.71        0.0729  0.0281  213.234
              120        1.103   18.71        0.0323  0.0269  213.157
              90         0.501   18.71        0.0099  0.0001  213.1
              410        0.385   18.71        0.0099  0       212.838
              200        0.209   18.71        0.0099  0.0001  212.711
              650        0.149   18.71        0.0099  0       212.297
              400        0.096   18.71        0.0099  0.0001  212.043
            Chemical: Thickness=[130, 120, 90, 410, 200, 650, 400]; PH=[5.9, 6.1, 6.2, 6.3, 6.5, 6.4, 7.3]; PHUnits=Water
            Solute NO3: Thickness=[130, 120, 90, 410, 200, 650, 400]; InitialValuesUnits=ppm; WaterTableConcentration=0; D0=0; DepthConstant=0; MaxDepthSoluteAccessible=0; RunoffEffectivenessAtMovingSolute=0; MaxEffectiveRunoff=0
              InitialValues=[7.02604, 2.90404, 3.00752, 4.67632, 4.96241, 7.14864, 9.66165]
            Solute NH4: Thickness=[130, 120, 90, 410, 200, 650, 400]; InitialValuesUnits=ppm; WaterTableConcentration=0; D0=0; DepthConstant=0; MaxDepthSoluteAccessible=0; RunoffEffectivenessAtMovingSolute=0; MaxEffectiveRunoff=0
              InitialValues=[1.63537, 0.441919, 0.0835422, 0.0366771, 0.037594, 0.0115674, 0.018797]
            Solute Urea: Thickness=[130, 120, 90, 410, 200, 650, 400]; InitialValues=[0, 0, 0, 0, 0, 0, 0]; InitialValuesUnits=kg/ha; WaterTableConcentration=0; D0=0; DepthConstant=0; MaxDepthSoluteAccessible=0; RunoffEffectivenessAtMovingSolute=0; MaxEffectiveRunoff=0
            SoilTemperature Temperature
          BiomassRemovalEvents CutLucerne: same as New Zealand.Iversen_8.Iversen_8LL.paddock.CutLucerne
          Manager Mower: same as New Zealand.Iversen_8.Iversen_8LL.paddock.Mower
          Manager LucerneSowingRule
            RowSpacing = 175
            SowingDepth = 10
            StemPopulation = 200
            CultivarName = Kaituna
            SowingDate = 03/29/2010 00:00:00
            script: same as in New Zealand.Iversen_8.Iversen_8LL.paddock.LucerneSowingRule
    Experiment Rafaela
      Factors
        Factor Defoliation: Specification=[Cutting]
          Operations Cutting
            2010-09-29  [Mower].Script.Cut();
            2010-11-04  [Mower].Script.Cut();
            2010-12-07  [Mower].Script.Cut();
            2011-01-13  [Mower].Script.Cut();
            2011-02-11  [Mower].Script.Cut();
            2011-03-06  [Mower].Script.Cut();
            2011-04-24  [Mower].Script.Cut();
            2011-07-05  [Mower].Script.Cut();
            2011-09-15  [Mower].Script.Cut();
            2011-11-01  [Mower].Script.Cut();
            2011-11-27  [Mower].Script.Cut();
            2011-12-21  [Mower].Script.Cut();
            2012-01-31  [Mower].Script.Cut();
            2012-03-30  [Mower].Script.Cut();
            2012-05-16  [Mower].Script.Cut();
      Simulation Winter dormant Rafaela
        Clock: Start=2010-01-01; End=2012-08-31
        Summary summaryfile
        Weather: FileName=Raf.met
        SoilArbitrator Soil Arbitrator
        MicroClimate: a_interception=0; b_interception=1; c_interception=0; d_interception=0; SoilHeatFluxFraction=0.4; MinimumHeightDiffForNewLayer=0; NightInterceptionFraction=0.5; ReferenceHeight=2
        Zone paddock: Area=1; Slope=0; AspectAngle=0; Altitude=50
          Irrigation
          Fertiliser
          SurfaceOrganicMatter surface organic matter: InitialResidueName=wheat; InitialResidueType=wheat; InitialResidueMass=0; InitialStandingFraction=0; InitialCPR=0; InitialCNR=80
          Report: same as Australia.Nekia.NekiaBaseSimulation.paddock.Report
          Operations IrrigationEvents
            2010-09-28  [Irrigation].Apply(23);
            2010-11-03  [Irrigation].Apply(28);
            2010-12-06  [Irrigation].Apply(56);
            2011-01-12  [Irrigation].Apply(62);
            2011-02-10  [Irrigation].Apply(30);
            2011-03-05  [Irrigation].Apply(50);
            2011-04-23  [Irrigation].Apply(56);
            2011-07-04  [Irrigation].Apply(13);
            2011-09-14  [Irrigation].Apply(66);
            2011-10-31  [Irrigation].Apply(64);
            2011-11-26  [Irrigation].Apply(24);
            2011-12-20  [Irrigation].Apply(62);
            2012-01-30  [Irrigation].Apply(82);
            2012-03-29  [Irrigation].Apply(18);
          Operations Cutting
          Plant Lucerne
          Soil raf soil: SoilType=Sand; Country=Africa (Generic); ApsoilNumber=958; Latitude=-20.074444; Longitude=30.832778; DataSource=EEA Rafaela INTA
            Comments=These soils represent typical sandy/sandy loam soils in the regions of Bulawayo and Masvingo, Zimbabwe. Possibly about 1999?
            Water: Thickness=[150, 90, 80, 230, 320, 280, 250, 400]; InitialValues=[0.2253, 0.2204, 0.2192, 0.27, 0.294, 0.2804, 0.27, 0.242]; InitialPAWmm=79.239; RelativeTo=LL15; FilledFromTop=false
            WaterBalance SoilWater: same as Argentina.TrenqueLauquen.winter active Trenque Lauquen.paddock.TrenqueLauquen.SoilWater
            Nutrient
            Physical
              Thickness  BD    AirDry  LL15   DUL    SAT
              150        1.18  0.089   0.177  0.338  0.474
              90         1.26  0.119   0.17   0.338  0.474
              80         1.33  0.136   0.17   0.334  0.474
              230        1.38  0.203   0.225  0.375  0.445
              320        1.35  0.227   0.252  0.392  0.445
              280        1.31  0.213   0.236  0.384  0.445
              250        1.28  0.205   0.228  0.368  0.423
              400        1.27  0.18    0.2    0.34   0.423
              SoilCrop LucerneSoil: LL=[0.177, 0.17, 0.17, 0.225, 0.252, 0.236, 0.228, 0.2]; KL=[0.16, 0.16, 0.1, 0.1, 0.05, 0.05, 0.01, 0.01]; XF=[1, 0.6, 0.5, 0.5, 0.5, 0.5, 0.1, 0.1]
            Organic: FOMCNRatio=30; CarbonUnits=Total
              Thickness  Carbon  SoilCNRatio  FBiom   FInert  FOM
              200        1.435   19.93        0.0081  0.0056  534.062
              150        0.803   19.93        0.0048  0.0056  403.131
              275        0.483   19.93        0.0035  0.0042  240.721
              300        0.362   19.93        0.001   0.001   137.158
              225        0.245   19.93        0.0029  0.0037  89.9507
              250        0.171   19.93        0.0003  0.0003  56.2897
              200        0.111   19.93        0.0005  0.0008  38.6873
            Chemical: Thickness=[200, 150, 275, 300, 225, 250, 200]; PH=[6.2, 6.3, 6.5, 6.7, 7.2, 7.4, 8.2]; PHUnits=Water
            Solute NO3: Thickness=[200, 150, 275, 300, 225, 250, 200]; InitialValuesUnits=ppm; WaterTableConcentration=0; D0=0; DepthConstant=0; MaxDepthSoluteAccessible=0; RunoffEffectivenessAtMovingSolute=0; MaxEffectiveRunoff=0
              InitialValues=[15.1667, 6.30676, 3.41948, 1.34062, 0.882103, 0.3125, 0.11811]
            Solute NH4: Thickness=[200, 150, 275, 300, 225, 250, 200]; InitialValues=[0.583333, 0.151362, 0.0795229, 0.0248262, 0.0339271, 0, 0]; InitialValuesUnits=ppm; WaterTableConcentration=0; D0=0; DepthConstant=0; MaxDepthSoluteAccessible=0; RunoffEffectivenessAtMovingSolute=0; MaxEffectiveRunoff=0
            Solute Urea: Thickness=[200, 150, 275, 300, 225, 250, 200]; InitialValues=[0, 0, 0, 0, 0, 0, 0]; InitialValuesUnits=kg/ha; WaterTableConcentration=0; D0=0; DepthConstant=0; MaxDepthSoluteAccessible=0; RunoffEffectivenessAtMovingSolute=0; MaxEffectiveRunoff=0
            SoilTemperature Temperature
          BiomassRemovalEvents CutLucerne: same as New Zealand.Iversen_8.Iversen_8LL.paddock.CutLucerne
          Manager Mower: same as New Zealand.Iversen_8.Iversen_8LL.paddock.Mower
          Manager LucerneSowingRule
            RowSpacing = 175
            SowingDepth = 15
            StemPopulation = 250
            CultivarName = Sceptre
            SowingDate = 05/15/2010 00:00:00
            script: same as in New Zealand.Iversen_8.Iversen_8LL.paddock.LucerneSowingRule
    Experiment BalcarceGerman
      Factors
        Permutation
          Factor Rest
            CompositeFactor Feb: Specifications=[Cutting]
              Operations Cutting
                2017-09-25  [Mower].Script.Cut();
                2017-11-18  [Mower].Script.Cut();
                2017-12-12  [Mower].Script.Cut();
                2017-12-28  [Mower].Script.Cut();
                2018-01-17  [Mower].Script.Cut();
                2018-02-07  [Mower].Script.Cut();
                2018-03-22  [Mower].Script.Cut();
                2018-05-04  [Mower].Script.Cut();
                2018-07-13  [Mower].Script.Cut();
                2018-09-08  [Mower].Script.Cut();
                2018-10-11  [Mower].Script.Cut();
                2018-11-08  [Mower].Script.Cut();
                2018-12-27  [Mower].Script.Cut();
                2019-01-12  [Mower].Script.Cut();
                2019-01-31  [Mower].Script.Cut();
                2019-03-28  [Mower].Script.Cut();
                2019-05-16  [Mower].Script.Cut();
                2019-08-09  [Mower].Script.Cut();
            CompositeFactor March: Specifications=[Cutting]
              Operations Cutting
                2017-09-25  [Mower].Script.Cut();
                2017-11-18  [Mower].Script.Cut();
                2017-12-12  [Mower].Script.Cut();
                2017-12-28  [Mower].Script.Cut();
                2018-01-17  [Mower].Script.Cut();
                2018-02-07  [Mower].Script.Cut();
                2018-02-28  [Mower].Script.Cut();
                2018-03-22  [Mower].Script.Cut();
                2018-05-04  [Mower].Script.Cut();
                2018-07-13  [Mower].Script.Cut();
                2018-09-08  [Mower].Script.Cut();
                2018-10-11  [Mower].Script.Cut();
                2018-11-08  [Mower].Script.Cut();
                2018-12-01  [Mower].Script.Cut();
                2018-12-27  [Mower].Script.Cut();
                2019-01-12  [Mower].Script.Cut();
                2019-01-31  [Mower].Script.Cut();
                2019-03-07  [Mower].Script.Cut();
                2019-03-28  [Mower].Script.Cut();
                2019-05-16  [Mower].Script.Cut();
                2019-08-08  [Mower].Script.Cut();
            CompositeFactor May: Specifications=[Cutting]
              Operations Cutting
                2017-09-25  [Mower].Script.Cut();
                2017-11-18  [Mower].Script.Cut();
                2017-12-12  [Mower].Script.Cut();
                2017-12-28  [Mower].Script.Cut();
                2018-01-17  [Mower].Script.Cut();
                2018-02-07  [Mower].Script.Cut();
                2018-02-28  [Mower].Script.Cut();
                2018-03-22  [Mower].Script.Cut();
                2018-04-10  [Mower].Script.Cut();
                2018-05-04  [Mower].Script.Cut();
                2018-07-13  [Mower].Script.Cut();
                2018-09-08  [Mower].Script.Cut();
                2018-10-11  [Mower].Script.Cut();
                2018-11-08  [Mower].Script.Cut();
                2018-12-01  [Mower].Script.Cut();
                2018-12-27  [Mower].Script.Cut();
                2019-01-12  [Mower].Script.Cut();
                2019-01-31  [Mower].Script.Cut();
                2019-03-07  [Mower].Script.Cut();
                2019-03-28  [Mower].Script.Cut();
                2019-04-16  [Mower].Script.Cut();
                2019-05-16  [Mower].Script.Cut();
                2019-08-08  [Mower].Script.Cut();
            CompositeFactor Never: Specifications=[Cutting]
              Operations Cutting
                2017-09-25  [Mower].Script.Cut();
                2017-11-18  [Mower].Script.Cut();
                2017-12-12  [Mower].Script.Cut();
                2017-12-28  [Mower].Script.Cut();
                2018-01-17  [Mower].Script.Cut();
                2018-02-07  [Mower].Script.Cut();
                2018-02-28  [Mower].Script.Cut();
                2018-03-22  [Mower].Script.Cut();
                2018-04-10  [Mower].Script.Cut();
                2018-05-04  [Mower].Script.Cut();
                2018-06-01  [Mower].Script.Cut();
                2018-07-13  [Mower].Script.Cut();
                2018-09-08  [Mower].Script.Cut();
                2018-10-11  [Mower].Script.Cut();
                2018-11-08  [Mower].Script.Cut();
                2018-12-01  [Mower].Script.Cut();
                2018-12-27  [Mower].Script.Cut();
                2019-01-12  [Mower].Script.Cut();
                2019-01-31  [Mower].Script.Cut();
                2019-03-07  [Mower].Script.Cut();
                2019-03-28  [Mower].Script.Cut();
                2019-04-16  [Mower].Script.Cut();
                2019-05-16  [Mower].Script.Cut();
                2019-06-25  [Mower].Script.Cut();
                2019-08-08  [Mower].Script.Cut();
          Factor FD
            CompositeFactor FD6: Specifications=[LucerneSowingRule].Script.CultivarName = FD6
            CompositeFactor FD10: Specifications=[LucerneSowingRule].Script.CultivarName = FD10
      Simulation FD6
        Clock: Start=2017-05-11; End=2019-08-10
        Summary summaryfile
        Weather: FileName=Balcarce.met
        SoilArbitrator Soil Arbitrator
        MicroClimate: a_interception=0; b_interception=1; c_interception=0; d_interception=0; SoilHeatFluxFraction=0.4; MinimumHeightDiffForNewLayer=0; NightInterceptionFraction=0.5; ReferenceHeight=2
        Zone paddock: Area=1; Slope=0; AspectAngle=0; Altitude=50
          Irrigation
          Fertiliser
          SurfaceOrganicMatter surface organic matter: InitialResidueName=wheat; InitialResidueType=wheat; InitialResidueMass=0; InitialStandingFraction=0; InitialCPR=0; InitialCNR=80
          Report: same as Australia.Nekia.NekiaBaseSimulation.paddock.Report
          Operations IrrigationEvents
            2017-11-27  [Irrigation].Apply(35);
            2017-12-20  [Irrigation].Apply(35);
            2017-12-29  [Irrigation].Apply(35);
            2018-01-22  [Irrigation].Apply(65);
            2018-02-14  [Irrigation].Apply(65);
            2018-02-23  [Irrigation].Apply(65);
            2018-03-22  [Irrigation].Apply(65);
          Plant Lucerne
          Operations Cutting: same as Argentina.Balcarce.Balcarce.paddock.Cutting
          Soil Balcarce: Site=Balcarce; NearestTown=Buenos Aires; State=Buenos Aires; Country=Argentina; Latitude=-37.8; Longitude=-58.3; DataSource=EEA Balcarce INTA
            Water: Thickness=[100, 100, 100, 100, 100, 100, 100, 100, 100]; InitialPAWmm=136.528; RelativeTo=LL15; FilledFromTop=false
              InitialValues=[0.27112, 0.27112, 0.26732, 0.33048, 0.33716, 0.37364, 0.41004, 0.38316, 0.38024]
            WaterBalance SoilWater: same as Argentina.TrenqueLauquen.winter active Trenque Lauquen.paddock.TrenqueLauquen.SoilWater
            Nutrient
            Physical
              Thickness  BD    AirDry  LL15   DUL    SAT
              100        1.15  0.085   0.169  0.28   0.393
              100        1.15  0.085   0.169  0.28   0.393
              100        1.27  0.099   0.156  0.277  0.389
              100        1.27  0.138   0.175  0.344  0.487
              100        1.35  0.142   0.178  0.351  0.49
              100        1.35  0.168   0.197  0.389  0.49
              100        1.35  0.194   0.215  0.427  0.49
              100        1.35  0.181   0.201  0.399  0.456
              100        1.35  0.179   0.199  0.396  0.45
              SoilCrop LucerneSoil
                LL=[0.169, 0.15, 0.178, 0.215, 0.199, 0.199, 0.199, 0.199, 0.199]
                KL=[0.06, 0.06, 0.04, 0.04, 0.04, 0.04, 0.04, 0.04, 0.04]
                XF=[1, 1, 1, 1, 0.6, 0.6, 0.6, 0.6, 0.6]
            Organic: FOMCNRatio=30; CarbonUnits=Total
              Thickness  Carbon  SoilCNRatio  FBiom   FInert  FOM
              200        4.179   19.69        0.0457  0.0216  550.236
              200        2.552   19.69        0.0066  0.0095  358.445
              200        1.167   19.69        0.0018  0       233.505
              200        0.631   19.69        0.0009  0       152.114
              200        0.64    19.69        0       0       99.0933
              200        0.64    19.69        0       0       64.5532
              200        0.64    19.69        0       0       42.0525
            Chemical: Thickness=[200, 200, 200, 200, 200, 200]; PH=[7, 7.4, 7.4, 7.8, 7.8, 7.8]; PHUnits=Water
            OutputLayers: Thickness=[100, 100, 100, 100, 100, 100, 100, 100, 100]
            Solute NO3: Thickness=[200, 200, 200, 200, 200, 200]; InitialValues=[6.52174, 0.415282, 4.56693, 3.35878, 1.74074, 1.22222]; InitialValuesUnits=ppm; WaterTableConcentration=0; D0=0; DepthConstant=0; MaxDepthSoluteAccessible=0; RunoffEffectivenessAtMovingSolute=0; MaxEffectiveRunoff=0
            Solute NH4: Thickness=[200, 200, 200, 200, 200, 200]; InitialValues=[1.21739, 0, 0, 0, 0, 0]; InitialValuesUnits=ppm; WaterTableConcentration=0; D0=0; DepthConstant=0; MaxDepthSoluteAccessible=0; RunoffEffectivenessAtMovingSolute=0; MaxEffectiveRunoff=0
            Solute Urea: same as Argentina.Balcarce.Balcarce.paddock.Balcarce.Urea
            SoilTemperature Temperature
          Constant DailyStrucDemandRate: FixedValue=0.05; Units=fraction of biomass gap per day as demand
          BiomassRemovalEvents CutLucerne: same as New Zealand.Iversen_8.Iversen_8LL.paddock.CutLucerne
          Manager Mower: same as New Zealand.Iversen_8.Iversen_8LL.paddock.Mower
          Manager LucerneSowingRule
            RowSpacing = 200
            SowingDepth = 15
            StemPopulation = 350
            CultivarName = WL611
            SowingDate = 05/11/2017 00:00:00
            script: same as in New Zealand.Iversen_8.Iversen_8LL.paddock.LucerneSowingRule
  Folder Sensibility
    Folder Simulation_Example
      Experiment Test
        DisabledSimNames=[Iversen_12SowingDateSD10, Iversen_12SowingDateSD9, Iversen_12SowingDateSD8, Iversen_12SowingDateSD7, Iversen_12SowingDateSD6, Iversen_12SowingDateSD5, Iversen_12SowingDateSD4, Iversen_12SowingDateSD3, Iversen_12SowingDateSD2]
        Factors
          Permutation
            Factor SowingDate
              CompositeFactor SD1
                Specifications:
                  [LucerneSowingRule].Script.SowingDate = 1990-10-04
                  [Clock].StartDate = 1990-10-04
                  [Clock].EndDate = 1995-06-10
                  [Cutting]
                Operations Cutting
                  1991-01-25  [Mower].Script.Cut();
                  1991-03-08  [Mower].Script.Cut();
                  1991-05-04  [Mower].Script.Cut();
                  1991-07-05  [Mower].Script.Cut();
                  1991-10-04  [Mower].Script.Cut();
                  1991-11-19  [Mower].Script.Cut();
                  1991-12-25  [Mower].Script.Cut();
                  1992-02-05  [Mower].Script.Cut();
                  1992-04-08  [Mower].Script.Cut();
                  1992-06-10  [Mower].Script.Cut();
                  1992-10-04  [Mower].Script.Cut();
                  1992-11-19  [Mower].Script.Cut();
                  1992-12-25  [Mower].Script.Cut();
                  1993-01-25  [Mower].Script.Cut();
                  1993-03-08  [Mower].Script.Cut();
                  1993-05-04  [Mower].Script.Cut();
                  1993-07-05  [Mower].Script.Cut();
                  1993-10-04  [Mower].Script.Cut();
                  1993-11-19  [Mower].Script.Cut();
                  1993-12-25  [Mower].Script.Cut();
                  1994-02-05  [Mower].Script.Cut();
                  1994-04-08  [Mower].Script.Cut();
                  1994-06-10  [Mower].Script.Cut();
                  1994-10-04  [Mower].Script.Cut();
                  1994-11-19  [Mower].Script.Cut();
                  1994-12-25  [Mower].Script.Cut();
                  1995-02-05  [Mower].Script.Cut();
                  1995-04-08  [Mower].Script.Cut();
                  1995-06-10  [Mower].Script.Cut();
              CompositeFactor SD2
                Specifications:
                  [LucerneSowingRule].Script.SowingDate = 1991-10-04
                  [Clock].StartDate = 1991-10-04
                  [Clock].EndDate = 1996-06-10
                  [Cutting]
                Operations Cutting
                  1992-01-25  [Mower].Script.Cut();
                  1992-03-08  [Mower].Script.Cut();
                  1992-05-04  [Mower].Script.Cut();
                  1992-07-05  [Mower].Script.Cut();
                  1992-10-04  [Mower].Script.Cut();
                  1992-11-19  [Mower].Script.Cut();
                  1992-12-25  [Mower].Script.Cut();
                  1993-02-05  [Mower].Script.Cut();
                  1993-04-08  [Mower].Script.Cut();
                  1993-06-10  [Mower].Script.Cut();
                  1993-10-04  [Mower].Script.Cut();
                  1993-11-19  [Mower].Script.Cut();
                  1993-12-25  [Mower].Script.Cut();
                  1994-01-25  [Mower].Script.Cut();
                  1994-03-08  [Mower].Script.Cut();
                  1994-05-04  [Mower].Script.Cut();
                  1994-07-05  [Mower].Script.Cut();
                  1994-10-04  [Mower].Script.Cut();
                  1994-11-19  [Mower].Script.Cut();
                  1994-12-25  [Mower].Script.Cut();
                  1995-02-05  [Mower].Script.Cut();
                  1995-04-08  [Mower].Script.Cut();
                  1995-06-10  [Mower].Script.Cut();
                  1995-10-04  [Mower].Script.Cut();
                  1995-11-19  [Mower].Script.Cut();
                  1995-12-25  [Mower].Script.Cut();
                  1996-02-05  [Mower].Script.Cut();
                  1996-04-08  [Mower].Script.Cut();
                  1996-06-10  [Mower].Script.Cut();
            Factor Water
              CompositeFactor dry
              CompositeFactor irr: Specifications=[IrrigationEvents]
                Operations IrrigationEvents
                  1990-10-10  [Irrigation].Apply(40);
                  1990-12-12  [Irrigation].Apply(30);
                  1991-01-22  [Irrigation].Apply(50);
                  1991-12-27  [Irrigation].Apply(30);
                  1991-12-28  [Irrigation].Apply(30);
                  1991-12-29  [Irrigation].Apply(15);
                  1992-02-01  [Irrigation].Apply(35);
                  1992-02-02  [Irrigation].Apply(30);
                  1992-02-03  [Irrigation].Apply(30);
                  1992-12-21  [Irrigation].Apply(20);
                  1992-12-22  [Irrigation].Apply(25);
                  1992-12-23  [Irrigation].Apply(20);
                  1993-02-01  [Irrigation].Apply(35);
                  1993-02-02  [Irrigation].Apply(30);
                  1993-02-03  [Irrigation].Apply(30);
                  1993-12-21  [Irrigation].Apply(20);
                  1993-12-22  [Irrigation].Apply(25);
                  1993-12-23  [Irrigation].Apply(20);
                  1994-01-21  [Irrigation].Apply(35);
                  1994-02-02  [Irrigation].Apply(30);
                  1994-12-21  [Irrigation].Apply(20);
                  1994-12-22  [Irrigation].Apply(25);
                  1994-12-23  [Irrigation].Apply(20);
                  1995-01-21  [Irrigation].Apply(35);
                  1995-02-02  [Irrigation].Apply(30);
                  1995-12-21  [Irrigation].Apply(20);
                  1995-12-22  [Irrigation].Apply(25);
                  1995-12-23  [Irrigation].Apply(20);
                  1996-01-21  [Irrigation].Apply(35);
                  1996-02-02  [Irrigation].Apply(30);
        Simulation Simulationtesting
          Clock: Start=2010-09-27; End=2020-04-08
          Summary summaryfile
          Weather: FileName=lincoln.met
          SoilArbitrator Soil Arbitrator
          MicroClimate: a_interception=0; b_interception=1; c_interception=0; d_interception=0; SoilHeatFluxFraction=0.4; MinimumHeightDiffForNewLayer=0; NightInterceptionFraction=0.5; ReferenceHeight=2
          Zone paddock: Area=1; Slope=0; AspectAngle=0; Altitude=50
            Irrigation
            Fertiliser
            SurfaceOrganicMatter surface organic matter: InitialResidueName=wheat; InitialResidueType=wheat; InitialResidueMass=0; InitialStandingFraction=0; InitialCPR=0; InitialCNR=80
            Report: same as New Zealand.Iversen_121.Simulation5.paddock.Report
            Operations IrrigationEvents: same as New Zealand.Iversen_121.Simulation5.paddock.IrrigationEvents
            Plant Lucerne
            Operations Cutting
            Soil AshleyDene Lismore very stony silt Loam: SoilType=Udic Haplustept (US), Pallic orthic brown soil (NZ); Site=Ashley Dene: Lincoln University Research Farm; NearestTown=Lincoln; Country=New Zealand; Latitude=999999; Longitude=999999
              Comments=Soil water characterised from NNM (2 years). Stone content and BD  from Di and Cameron 2002. Soil saturation from Cichota 2013.
              Chemical: PHUnits=Water
                Thickness=[200, 100, 100, 100, 100, 100, 100, 100, 100, 100, 100, 100, 100, 100, 100, 100, 100, 100, 100, 100, 100, 100]
                PH=[6, -, -, -, -, -, -, -, -, -, -, -, -, -, -, -, -, -, -, -, -, -, -]
              Physical
                Thickness  BD    AirDry  LL15    DUL     SAT
                200        1.15  0.075   0.075   0.2653  0.2653
                100        1.15  0.0829  0.0829  0.1907  0.1907
                100        1.31  0.0778  0.0778  0.1543  0.1543
                100        1.31  0.0766  0.0766  0.1296  0.1296
                100        1.95  0.0723  0.0723  0.1155  0.1155
                100        1.95  0.0726  0.0726  0.1083  0.1083
                100        1.95  0.0718  0.0718  0.1081  0.1081
                100        1.95  0.0733  0.0733  0.1133  0.1133
                100        1.95  0.0722  0.0722  0.1104  0.1104
                100        1.95  0.0728  0.0728  0.1064  0.1064
                100        1.95  0.0759  0.0759  0.1048  0.1048
                100        1.95  0.0858  0.0858  0.113   0.113
                100        1.95  0.0868  0.0868  0.1139  0.1139
                100        1.95  0.091   0.091   0.1215  0.1215
                100        1.95  0.1     0.1     0.1303  0.1303
                100        1.95  0.1023  0.1023  0.1263  0.1263
                100        1.95  0.0983  0.0983  0.1224  0.1224
                100        1.95  0.0978  0.0978  0.116   0.116
                100        1.95  0.0972  0.0972  0.1132  0.1132
                100        1.95  0.0999  0.0999  0.1094  0.1094
                100        1.95  0.1018  0.1018  0.12    0.12
                100        1.95  0.1069  0.1069  0.1099  0.1099
                SoilCrop LucerneSoil
                  LL=[0.075, 0.083, 0.078, 0.077, 0.072, 0.073, 0.072, 0.073, 0.072, 0.073, 0.076, 0.086, 0.087, 0.091, 0.1, 0.102, 0.098, 0.098, 0.097, 0.1, 0.102, 0.107]
                  KL=[0.06, 0.06, 0.049, 0.048, 0.055, 0.05, 0.048, 0.059, 0.076, 0.051, 0.094, 0.069, 0.033, 0.03, 0.043, 0.043, 0.056, 0.061, 0.03, 0.03, 0.03, 0.03]
                  XF=[1, 1, 1, 1, 1, 1, 1, 1, 1, 1, 1, 1, 1, 1, 1, 1, 1, 1, 1, 1, 1, 1]
              WaterBalance SoilWater: SummerDate=1-Oct; SummerU=5; SummerCona=4.4; WinterDate=1-Mar; WinterU=5; WinterCona=2.5; DiffusConst=88; DiffusSlope=35.4; Salb=0.18; CN2Bare=68; CNRed=20; CNCov=0.8; PSIDul=-100
              Nutrient
              Organic: same as New Zealand.AshleyDene.AshleyDene.paddock.AshleyDene Lismore very stony silt Loam.Organic
              Water: InitialPAWmm=80.4387; RelativeTo=LL15; FilledFromTop=true
                Thickness=[200, 100, 100, 100, 100, 100, 100, 100, 100, 100, 100, 100, 100, 100, 100, 100, 100, 100, 100, 100, 100, 100]
                InitialValues=[0.2653, 0.1907, 0.1543, 0.1296, 0.1155, 0.1083, 0.1081, 0.1133, 0.103487, 0.0728, 0.0759, 0.0858, 0.0868, 0.091, 0.1, 0.1023, 0.0983, 0.0978, 0.0972, 0.0999, 0.1018, 0.1069]
              Solute NO3: same as New Zealand.AshleyDene.AshleyDene.paddock.AshleyDene Lismore very stony silt Loam.NO3
              Solute NH4: same as New Zealand.AshleyDene.AshleyDene.paddock.AshleyDene Lismore very stony silt Loam.NH4
              Solute Urea: same as New Zealand.Iversen_8.Iversen_8LL.paddock.IVF96_99_irrigated.Urea
              SoilTemperature Temperature
            BiomassRemovalEvents CutLucerne: same as New Zealand.Iversen_8.Iversen_8LL.paddock.CutLucerne
            Manager Mower: same as New Zealand.Iversen_8.Iversen_8LL.paddock.Mower
            Manager LucerneSowingRule
              RowSpacing = 150
              SowingDepth = 20
              StemPopulation = 400
              CultivarName = Kaituna
              SowingDate = 10/24/2000 00:00:00
              script: same as in New Zealand.Iversen_8.Iversen_8LL.paddock.LucerneSowingRule
    Folder PopulationTest
      Experiment Iversen_91_Population
        Memo: same as New Zealand.Iversen_91.Memo
        Factors
          Permutation
            Factor Defoliation
              CompositeFactor LL: same as New Zealand.Iversen_91.Factors.Defoliation.LL
              CompositeFactor SS: Specifications=[Cutting]
                Operations Cutting: same as New Zealand.Iversen_91.Factors.Defoliation.SS.Cutting
            Factor SowingRate
              CompositeFactor SD1_500: Specifications=[LucerneSowingRule].Script.StemPopulation = 500
              CompositeFactor SD2_400: Specifications=[LucerneSowingRule].Script.StemPopulation = 400
              CompositeFactor SD3_300: Specifications=[LucerneSowingRule].Script.StemPopulation = 300
              CompositeFactor SD4_200: Specifications=[LucerneSowingRule].Script.StemPopulation = 200
              CompositeFactor SD5_100: Specifications=[LucerneSowingRule].Script.StemPopulation = 100
              CompositeFactor SD6_50: Specifications=[LucerneSowingRule].Script.StemPopulation = 50
              CompositeFactor SD8_0: Specifications=[LucerneSowingRule].Script.StemPopulation = 1
        Simulation Iversen_91_PopulationTest
          Clock: Start=2000-10-24; End=2004-10-31
          Summary summaryfile
          Weather: FileName=lincoln.met
          SoilArbitrator Soil Arbitrator
          MicroClimate: a_interception=0; b_interception=1; c_interception=0; d_interception=0; SoilHeatFluxFraction=0.4; MinimumHeightDiffForNewLayer=0; NightInterceptionFraction=0.5; ReferenceHeight=2
          Zone paddock: Area=1; Slope=0; AspectAngle=0; Altitude=50
            Irrigation
            Fertiliser
            SurfaceOrganicMatter surface organic matter: InitialResidueName=pasture; InitialResidueType=pasture; InitialResidueMass=2500; InitialStandingFraction=0; InitialCPR=0; InitialCNR=40
            Report: same as New Zealand.Iversen_91.Iversen_91.paddock.Report
            Operations IrrigationEvents: same as New Zealand.Iversen_91.Iversen_91.paddock.IrrigationEvents
            Plant Lucerne
            Operations Cutting
            Operations CommonCutting: same as New Zealand.Iversen_9.Factors.Permutation.SowingDate.SD1.Cutting
            Operations UncertainIrrigation: same as New Zealand.Iversen_91.Iversen_91.paddock.UncertainIrrigation
            Soil: Latitude=0; Longitude=0
              Chemical: Thickness=[100, 200, 300, 300, 300, 300]; PH=[6.6, 6.2, 5.7, 5.5, 5.5, 5.5]; PHUnits=Water
              Water: InitialPAWmm=563.7; RelativeTo=LL15; FilledFromTop=false
                Thickness=[100, 100, 100, 100, 100, 100, 100, 100, 100, 100, 100, 100, 100, 100, 100, 100, 100, 100, 100, 100, 100, 100, 100]
                InitialValues=[0.35, 0.35, 0.32, 0.29, 0.27, 0.31, 0.33, 0.35, 0.34, 0.34, 0.34, 0.34, 0.34, 0.33, 0.33, 0.32, 0.3, 0.3, 0.3, 0.31, 0.31, 0.32, 0.35]
              Physical
                Thickness  BD    AirDry  LL15   DUL   SAT
                100        1.26  0.05    0.075  0.35  0.38
                100        1.26  0.06    0.078  0.35  0.38
                100        1.26  0.07    0.07   0.32  0.39
                100        1.44  0.07    0.07   0.29  0.32
                100        1.44  0.069   0.07   0.27  0.3
                100        1.44  0.07    0.07   0.31  0.32
                100        1.57  0.07    0.07   0.33  0.34
                100        1.57  0.07    0.07   0.35  0.35
                100        1.57  0.07    0.07   0.34  0.35
                100        1.58  0.07    0.07   0.34  0.35
                100        1.58  0.07    0.07   0.34  0.35
                100        1.58  0.07    0.07   0.34  0.35
                100        1.58  0.08    0.08   0.34  0.35
                100        1.59  0.078   0.08   0.33  0.35
                100        1.59  0.08    0.08   0.33  0.35
                100        1.59  0.087   0.09   0.32  0.34
                100        1.59  0.09    0.09   0.3   0.33
                100        1.59  0.09    0.09   0.3   0.33
                100        1.59  0.09    0.09   0.3   0.33
                100        1.59  0.08    0.08   0.31  0.33
                100        1.59  0.09    0.09   0.31  0.33
                100        1.59  0.09    0.09   0.32  0.34
                100        1.59  0.09    0.09   0.35  0.38
                SoilCrop LucerneSoil
                  LL=[0.1, 0.13, 0.12, 0.12, 0.11, 0.08, 0.08, 0.08, 0.09, 0.11, 0.12, 0.15, 0.15, 0.15, 0.16, 0.2, 0.25, 0.25, 0.25, 0.25, 0.23, 0.15, 0.15]
                  KL=[0.06, 0.06, 0.03, 0.03, 0.03, 0.03, 0.03, 0.03, 0.03, 0.03, 0.03, 0.03, 0.03, 0.03, 0.03, 0.03, 0.03, 0.03, 0.03, 0.03, 0.03, 0.03, 0.03]
                  XF=[1, 1, 1, 1, 1, 1, 1, 1, 1, 1, 1, 1, 1, 1, 1, 1, 1, 1, 1, 1, 1, 1, 1]
              WaterBalance SoilWater: SummerDate=1-Oct; SummerU=6; SummerCona=3; WinterDate=1-Mar; WinterU=5; WinterCona=2.5; DiffusConst=189; DiffusSlope=21; Salb=0.13; CN2Bare=0; CNRed=0; CNCov=0.8; PSIDul=-100
              Nutrient
              Organic: FOMCNRatio=30; CarbonUnits=Total
                Thickness  Carbon  SoilCNRatio  FBiom  FInert  FOM
                100        1.82    11.5         0.025  0.3     1243.931
                200        1.47    11.5         0.025  0.4     833.832
                300        1.2     11.5         0.015  0.75    457.617
                300        1.03    11.5         0.01   0.9     251.145
                300        0.47    11.5         0.01   0.96    137.831
                300        0.47    11.5         0.01   0.96    75.644
              Solute NO3: Thickness=[100, 200, 300, 300, 300, 300]; InitialValues=[172.222, 11.905, 1.157, 1.062, 0, 0]; InitialValuesUnits=ppm; WaterTableConcentration=0; D0=0; DepthConstant=0; MaxDepthSoluteAccessible=0; RunoffEffectivenessAtMovingSolute=0; MaxEffectiveRunoff=0
              Solute NH4: same as New Zealand.Iversen_121.Simulation5.paddock.Soil.NH4
              Solute Urea: same as New Zealand.Iversen_121.Simulation5.paddock.Soil.Urea
              SoilTemperature Temperature
            BiomassRemovalEvents CutLucerne: same as New Zealand.Iversen_8.Iversen_8LL.paddock.CutLucerne
            Manager Mower: same as New Zealand.Iversen_8.Iversen_8LL.paddock.Mower
            Manager LucerneSowingRule: same as New Zealand.Iversen_91.Iversen_91.paddock.LucerneSowingRule
            Manager PopulationSet
              SetDate = 07/01/2003 00:00:00
              Pop = 100
              script: same as in New Zealand.Iversen_8.Iversen_8LL.paddock.PopulationSet
  Folder SheepGrazing
    Simulation SheepGrazingRotation
      Weather: FileName=lincoln.met
      Clock: Start=2003-07-01; End=2008-05-01
      Summary
      SoilArbitrator Soil Arbitrator
      MicroClimate: a_interception=0; b_interception=1; c_interception=0; d_interception=0; SoilHeatFluxFraction=0.4; MinimumHeightDiffForNewLayer=0; NightInterceptionFraction=0.5; ReferenceHeight=2
      Zone paddock: Area=1; Slope=0; AspectAngle=0; Altitude=50
        SurfaceOrganicMatter surface organic matter: InitialResidueName=wheat; InitialResidueType=wheat; InitialResidueMass=0; InitialStandingFraction=0; InitialCPR=0; InitialCNR=80
        Irrigation
        Fertiliser
        Plant Lucerne
        Soil: Latitude=0; Longitude=0
          Chemical: Thickness=[100, 200, 300, 300, 300, 300]; PH=[6.6, 6.2, 5.7, 5.5, 5.5, 5.5]; PHUnits=Water
          Water: same as Sensibility.PopulationTest.Iversen_91_Population.Iversen_91_PopulationTest.paddock.Soil.Water
          Physical: same as Sensibility.PopulationTest.Iversen_91_Population.Iversen_91_PopulationTest.paddock.Soil.Physical
          WaterBalance SoilWater: SummerDate=1-Oct; SummerU=6; SummerCona=3; WinterDate=1-Mar; WinterU=5; WinterCona=2.5; DiffusConst=189; DiffusSlope=21; Salb=0.13; CN2Bare=0; CNRed=0; CNCov=0.8; PSIDul=-100
          Nutrient
          Organic: same as New Zealand.Iversen_121.Simulation5.paddock.Soil.Organic
          Solute NO3: same as New Zealand.Iversen_121.Simulation5.paddock.Soil.NO3
          Solute NH4: same as New Zealand.Iversen_121.Simulation5.paddock.Soil.NH4
          Solute Urea: same as New Zealand.Iversen_121.Simulation5.paddock.Soil.Urea
          SoilTemperature Temperature
        Manager AutoIrrigationBasedOnWaterDeficit
          StartDate = 1-nov
          EndDate = 1-mar
          FASWThreshold = 0.6
          FASWDepth = 1500
          Amount = 20
```csharp
using APSIM.Numerics;
using APSIM.Shared.Utilities;
using System.Xml.Serialization;
using Models;
using Models.PMF;
using Models.Soils;
using System.Text;
using System.Collections.Generic;
using Models.Core;
using System;
using Models.Interfaces;

namespace Models
{
    [Serializable] 
    public class Script : Model
    {
        [Link] private Zone zone;
        [Link] private Irrigation irrigation;
        [Link] private Soil soil;
        [Link] private Clock clock;
        [Link]
        private IPhysical soilPhysical;
        [Link]
        private ISoilWater waterBalance;
        public double FASW { get; set; }
        public double WaterDeficit  { get; set; } 
        
        [Description("Irrigation start window (d-mmm)")]
        public string StartDate { get; set; }
        [Description("Irrigation end window (d-mmm)")]
        public string EndDate { get; set; }

        [Description("Threshold fraction available water (0-1)")]
        public double FASWThreshold { get; set; }

        [Description("Soil depth (mm) to which fraction available water is calculated")]
        public double FASWDepth { get; set; }

        [Description("Amount of water (mm) applied each irrigation")]
        public double Amount { get; set; }

        [EventSubscribe("DoManagement")]
        private void OnDoManagement(object sender, EventArgs e)
        {
            CalculateFASW();
            if (DateUtilities.WithinDates(StartDate, clock.Today, EndDate))
            {
                if (FASW < FASWThreshold)
                {
                    irrigation.Apply(Amount, depth: 0);
                }
            }
        }
        
        private void CalculateFASW()
        {
            double[] LL15 = MathUtilities.Multiply(soilPhysical.LL15, soilPhysical.Thickness);
            double[] DUL = MathUtilities.Multiply(soilPhysical.DUL, soilPhysical.Thickness);
        
            int nlayr = GetLayerIndex();
            double cumdep = MathUtilities.Sum(soilPhysical.Thickness, 0, nlayr, 0.0);

            double excess_fr = MathUtilities.Divide((cumdep - FASWDepth), soilPhysical.Thickness[nlayr], 0.0);

            // note that results may be strange if swdep < ll15
            double avail_sw = (MathUtilities.Sum(waterBalance.SWmm, 0, nlayr, 0.0)
                              - excess_fr * waterBalance.SWmm[nlayr])
                              - (MathUtilities.Sum(LL15, 0, nlayr, 0.0)
                              - excess_fr * LL15[nlayr]);


            double pot_avail_sw = (MathUtilities.Sum(DUL, 0, nlayr, 0.0)
                                  - excess_fr * DUL[nlayr])
                                  - (MathUtilities.Sum(LL15, 0, nlayr, 0.0)
                                  - excess_fr * LL15[nlayr]);

            FASW = MathUtilities.Divide(avail_sw, pot_avail_sw, 0.0);
            WaterDeficit = MathUtilities.Constrain(pot_avail_sw - avail_sw, 0.0, 100000);
        }

        private int GetLayerIndex()
        {
            double[] cumThickness = soilPhysical.ThicknessCumulative;
            for (int i = 1; i < cumThickness.Length; i++)
            {
                if (FASWDepth < cumThickness[i])
                    return i - 1;
            }
            
            return cumThickness.Length - 1;
        }

    }
}
```
        Manager LucerneSowingRule
          RowSpacing = 150
          SowingDepth = 20
          StemPopulation = 400
          CultivarName = Kaituna
          SowingDate = 10/24/2003 00:00:00
          script: same as in New Zealand.Iversen_8.Iversen_8LL.paddock.LucerneSowingRule
        Report ReportBiomass: EventNames=[Clock].EndOfDay
          VariableNames:
            [Clock].Today
            [Lucerne].AboveGround.Wt
            [Lucerne].Leaf.Wt
            [Lucerne].Stem.Wt
            [Lucerne].Leaf.Height
            [Lucerne].Phenology.CurrentPhase.Name
            [Lucerne].Phenology.CurrentStageName
            [DefoliationManager].Script.DefoliatedWt
            [DefoliationManager].Script.RemovedWt
            [DefoliationManager].Script.NReturnedInDung
            [DefoliationManager].Script.NReturnedInUrine
        Report BaseReport: EventNames=[Clock].DoReport
          VariableNames:
            [Clock].Today as Date
            [Clock].Today.DayOfYear
            // Water outputs
            [Weather].Rain
            [Irrigation].IrrigationApplied
            [MicroClimate].PrecipitationInterception
            [Soil].SoilWater.Eo
            [Soil].SoilWater.Es
            [Lucerne].Leaf.Transpiration
            [Soil].SoilWater.Drainage
            [Soil].SoilWater.Runoff
            sum([Soil].SoilWater.LateralOutflow)
            [Soil].SoilWater.pond
            sum([Soil].Water.MM)
            sum([Soil].Physical.SATmm)
            sum([Soil].Physical.DULmm)
            sum([Soil].Physical.LL15mm)
            [Soil].Water.Volumetric[1]
            [Soil].Physical.DUL[1]
            [Soil].Physical.LL15[1]
            // Nitrogen outputs
            [Fertiliser].NitrogenApplied as FertiliserN
            [DefoliationManager].Script.NReturnedInDung as DungDepositedN
            [DefoliationManager].Script.NReturnedInUrine as UrineDepositedN
            sum([Soil].Nutrient.DenitrifiedN) as DenitrifiedN
            ([Soil].SoilWater.LeachUrea + [Soil].SoilWater.LeachNH4 + [Soil].SoilWater.LeachNO3) as LeachedN
            (-1*[Lucerne].Root.NUptake) as UptakeN
            (sum([Soil].Nutrient.MineralisedN) + sum([SurfaceOrganicMatter].SurfaceResidue.Decomposition.MineralisedN)) as NetMineralisedN
            sum([Soil].Nutrient.MineralisedN) as MineralisedSoilN
            sum([SurfaceOrganicMatter].SurfaceResidue.Decomposition.MineralisedN) as MineralisedSurfOMN
            ([Lucerne].Leaf.Detached.N+[Lucerne].Stem.Detached.N+[Lucerne].Taproot.Detached.N+[Lucerne].Root.Detached.N) as DetachedPlantN
            (sum([Soil].Urea.kgha) + sum([Soil].NH4.kgha) + sum([Soil].NO3.kgha)) as TotalMineralN
            sum([Soil].Urea.kgha) as TotalUrea
            sum([Soil].NH4.kgha) as TotalNH4
            sum([Soil].NO3.kgha) as TotalNO3
            [SurfaceOrganicMatter].N as TotalSurfOMN
            sum([Soil].Nutrient.FOM.N) as TotalFOMN
            sum([Soil].Nutrient.Humic.N) as TotalHumicN
            sum([Soil].Nutrient.Microbial.N) as TotalMicrobialN
            [Lucerne].Total.N as TotalPlantN
            [Lucerne].Nodule.FixationRate
            // Defoliation outputs
            [DefoliationManager].Script.HarvestedWt as DefoliatedWt
            [DefoliationManager].Script.HarvestedN as DefoliatedN
            [DefoliationManager].Script.RemovedWt as OffTakePlantWt
            [DefoliationManager].Script.RemovedN as OffTakePlantN
            [DefoliationManager].Script.HarvestedN/([DefoliationManager].Script.HarvestedWt + 0.000000001) as DefoliatedNconc
            [DefoliationManager].Script.PreHarvestDM as PreHarvestDM
            [DefoliationManager].Script.PostHarvestDM as PostHarvestDM
            [DefoliationManager].Script.DaysSinceLastDefoliation as DaysSinceLastDefoliation
            [DefoliationManager].Script.ReturnedWt as DungDepositedWt
            [SurfaceOrganicMatter].Wt as TotalSurfaceOMWt
            ([SurfaceOrganicMatter].C / ([SurfaceOrganicMatter].N + 0.000000001)) as SurfOMCNratio
            sum([Soil].Nutrient.FOM.C) / 0.4 as FOMWt
            (sum([Soil].Nutrient.FOM.C) / (sum([Soil].Nutrient.FOM.N) + 0.000000001)) as FOMCNratio
        Manager DefoliationManager
          AllowAutomaticManagement = Yes
          Crop = [Lucerne]
          DefoliationRotationStartDate = 01/01/1900 00:00:00
          DefoliationRotationEndDate = 12/31/2100 00:00:00
          DefoliationFractions = Leaf.FractionLiveToRemove=0.7, Leaf.FractionDeadToRemove=0.5, Stem.FractionLiveToRemove=0.8, Stem.FractionDeadToRemove=0.65, Inflorescence.FractionLiveToRemove=0.8, Inflorescence.FractionDeadToRemove=0.25, TapRoot.FractionLiveToResidue=0.1, Root.FractionLiveToResidue=0.05
          DefoliationTriggerType = TargetStandingBiomass
          IntervalBetweenDefoliations = 1
          TargetStandingBiomass = 250
          TargetCropHeight = 250
          TargetPhenologyStage = 4
          DurationOfEachDefoliation = 7
          RemoveAmountType = ResidualDM
          AmountForEachDefoliation = 150
          RemoveAllBiomass = No
          EnforceMinimumInterval = No
          MinimumInterval = 15
          EnforceMaximumInterval = No
          MaximumInterval = 60
          SuppressDefoliationOnWindow = Yes
          NoDefoliationWindowStartDate = 1-Jun
          NoDefoliationWindowEndDate = 31-Aug
          DMRemoveType = BasedOnDigestibility
          FractionDMToRemove = 0.99
          NRemoveType = UserDefinedFraction
          FractionNToRemove = 0.2
          ReturnType = AsDungUrine
          NDungType = DefineCNratio
          ProportionOfNToDung = 0.4
          CNRatioDung = 17.5
          UrineDepth = 250
          rateOfPopulationDecline = 0
          StageToSet = 4
          MeanGrowthPeriodType = BetweenDefoliations
          MaxPeriodForMeanGrowth = 30
```csharp
// This script will perform defoliations, i.e remove biomass, from a selected PMF crop.
// General rules for when and how much to defoliate, as well as how to handle the material harvested, are given in the UI.
// Defoliations can be triggered automatically by this manager, based on given rules, or by calling the 'Defoliate()' method
//  from another Script or a Schedule model. Note that some rules are overriden based on the parameters given in Defoliate().
// Developed by RCichota, last updated in 10/Nov/2022

using APSIM.Numerics;
using System.Diagnostics;
using Models.ForageDigestibility;
using Models.PMF.Interfaces;
using Models.Soils.Nutrients;
using Models.Soils;
using Models.PMF;
using Models.Core;
using APSIM.Shared.Utilities;
using Newtonsoft.Json;
using System.Collections.Generic;
using System.Linq;
using System;
namespace Models
{
    [Serializable]
    public class Script : Model
    {
        //> Links to other Apsim models
        [Link] private Clock clock;
        [Link] private Zone myZone;
        [Link(ByName = true)] private ISolute Urea;
        [Link] private IPhysical soilPhysical;
        [Link] private ISummary summary;
        [Link] Plant PlantainForage;
        [Link] Fertiliser fertiliser;
        [Link] Forages forages;

        //> Events raised by this manager
        public event BiomassRemovedDelegate BiomassRemoved;
        public event EventHandler DefoliationHappenedToday;
        private EventArgs args = new EventArgs();

         //> User inputs from properties tab
        [Separator("Generic defoliation management for a PMF crop, plus residue management")]
        [Description(" Allow this manager to control defoliations automatically? ")]
        public yesNoAnswer AllowAutomaticManagement { get; set; }
        [Description("Choose the crop that will be defoliated:")]
        public IPlant Crop { get; set; }
        [Description(" Date to start the defoliation management (dd/mm/yyyy): ")]
        public DateTime DefoliationRotationStartDate { get; set; }
        [Description(" Date to end the defoliation management (dd/mm/yyyy): ")]
        public DateTime DefoliationRotationEndDate { get; set; }

        [Separator("Parameters defining how the defoliation is managed")]
        
        [Description(" Defoliation fractions (e.g. Leaf.FractionLiveToResidue=0.1")]
        [Display(Type=DisplayType.MultiLineText)]
        public string[] DefoliationFractions { get; set; }
        [Description(" How the defoliations should be triggered? ")]
        public DefoliationTriggerTypes DefoliationTriggerType { get; set; }
        [Description("   Minimum number of days between defoliations, used if trigger is an interval: ")]
        public int IntervalBetweenDefoliations { get; set; }
        [Description("   Minimum standing biomass to start defoliations, used if trigger is DM target (g/m2): ")]
        public double TargetStandingBiomass { get; set; }
        [Description("   Minimum crop height to start defoliations, used if trigger is a target height (mm): ")]
        public double TargetCropHeight { get; set; }
        [Description("   Phenology stage to start defoliations, used if trigger is a target phenology stage: ")]
        public double TargetPhenologyStage { get; set; }
        [Description(" Duration of each defoliation event (days): ")]
        public int DurationOfEachDefoliation { get; set; }
        [Description(" Which amount is being defined? ")]
        public DefoliateAmountTypes RemoveAmountType { get; set; }
        [Description(" DM amount to use (g/m2): ")]
        public double AmountForEachDefoliation { get; set; }
        [Description(" Allow all biomass of PMF species to be removed? ")]
        public yesNoAnswer RemoveAllBiomass { get; set; }

        [Separator(" Additional management parameters to control defoliation frequency")]
        [Description(" Enforce a minimum interval between defoliations, if triggered by biomass? ")]
        public yesNoAnswer EnforceMinimumInterval { get; set; }
        [Description("   Minimum number of days between defoliations, when trigged by biomass: ")]
        public int MinimumInterval { get; set; }
        [Description(" Enforce a maximum interval between defoliations, if triggered by biomass? ")]
        public yesNoAnswer EnforceMaximumInterval { get; set; }
        [Description("   Maximum number of days between defoliations, when trigged by biomass: ")]
        public int MaximumInterval { get; set; }
        [Description(" Suppress defoliations over a period of time within the year? ")]
        public yesNoAnswer SuppressDefoliationOnWindow { get; set; }
        [Description("   Date to start the defoliation suppression window (dd-mmm): ")]
        public string NoDefoliationWindowStartDate { get; set; }
        [Description("   Date to end the defoliation suppression window (dd-mmm): ")]
        public string NoDefoliationWindowEndDate { get; set; }

        [Separator("Parameters defining the management of the defoliated biomass")]
        [Description(" How much of the DM defoliated is to be removed from the field? ")]
        public DMRemovalTypes DMRemoveType { get; set; }
        [Description("   Fraction of DM to remove off field, if using UserDefinedFraction (0-1): ")]
        public double FractionDMToRemove { get; set; }
        [Description(" How much of the N defoliated is to be removed from the field? ")]
        public NRemovalTypes NRemoveType { get; set; }
        [Description("   Fraction of N to remove off field, if using UserDefinedFraction (0-1): ")]
        public double FractionNToRemove { get; set; }
        [Description(" How the non-removed material is returned to the field? ")]
        public ReturnAsTypes ReturnType { get; set; }

        [Separator("Parameters for partitioning non-removed N into urine and dung")]
        [Description(" How the partition of N to dung and urine is defined? ")]
        public DungNContentTypes NDungType { get; set; }
        [Description("   Proportion of N returned in dung, if using DefineProportion (0-1): ")]
        public double ProportionOfNToDung { get; set; }
        [Description("   The C:N of dung, if using DefineCNratio (typically around 20): ")]
        public double CNRatioDung { get; set; }
        [Description(" Soil depth down to which urine should be applied (mm): ")]
        public double UrineDepth { get; set; }

        [Separator(" Additional parameters to control effects of defoliations on plant population")]
        [Description("Enter the fraction of population decline due to each defoliation (0-1):")]
        public double rateOfPopulationDecline { get; set; }
        [Description("Enter the phenology stage to be set at each defoliation (1-7):")]
        public double StageToSet { get; set; }
        
        [Separator("Additional parameters for computing growth rates")]
        [Description(" For which period the mean growth rate will be calculated?")]
        public MeanGrowthPeriodTypes MeanGrowthPeriodType { get; set; }
        [Description("  Number of days to compute mean growth rate, if using FixedPeriod or MaxPeriod:")]
        public int MaxPeriodForMeanGrowth { get; set; }

        //> Outputs from this manager
        [JsonIgnore][Units("g/m2")] // Pasture DM defoliated (removed from plants) today
        public double DefoliatedWt{ get; set; }
        [JsonIgnore][Units("g/m2")] // N in the pasture material defoliated today
        public double DefoliatedN{ get; set; }
        [JsonIgnore][Units("g/m2")] // Pasture DM harvested (removed from plants minus direct residue) today
        public double HarvestedWt{ get; set; }
        [JsonIgnore][Units("g/m2")] // N in the pasture material harvested today
        public double HarvestedN{ get; set; }
        [JsonIgnore][Units("g/m2")] // Pasture DM actually removed from the field
        public double RemovedWt{ get; set; }
        [JsonIgnore][Units("g/m2")] // N in the pasture material removed from the field
        public double RemovedN{ get; set; }
        [JsonIgnore][Units("g/m2")] // Pasture DM returned by this manager to the field
        public double ReturnedWt{ get; set; }
        [JsonIgnore][Units("g/m2")] // N in the pasture material returned by this manager to the field
        public double ReturnedN{ get; set; }
        [JsonIgnore][Units("g/m2")] // Non-removed N returned as dung (to SurfaceOM)
        public double NReturnedInDung{ get; set; }
        [JsonIgnore][Units("g/m2")] // Non-removed N returned as urine (soil urea)
        public double NReturnedInUrine{ get; set; }
        [JsonIgnore][Units("days")] // Number of days since the end of last defoliation event
        public int DaysSinceLastDefoliation{ get; set; }
        [JsonIgnore][Units("g/m2")] // Total standing aboveground DM before a defoliation
        public double PreHarvestDM{ get; set; }
        [JsonIgnore][Units("g/m2")] // Total standing aboveground DM after a defoliation
        public double PostHarvestDM{ get; set; }
        [JsonIgnore][Units("g/m2")] // Total pasture DM harvested over a complete defoliation event
        public double RotationHarvestedWt{ get; set; }
        [JsonIgnore][Units("g/m2")] // Pasture DM to be harvested this rotation cycle
        public double RotationHarvestingWt{ get; set; }
        [JsonIgnore][Units("g/m2")] // Mean growth rate of harvested plants over a given period before the defoliation
        public double MeanGrowthRateDM{ get; set; }

        //> Internal variables
        private Plant PMFSpecies;                       // link to the crop being defoliated
        private double[] urineFraction;                 // fraction of urine to be applied in each soil layer
        private string baseAmountType;                  // record of the amount given in the UI
        private string typeOfAmount;                    // string for the type of amount given (DMToRemove, ResidualDM, or UseDefoliationFractions)
        private double amountGiven;                     // an amount given
        private double herbageToRemove;                 // amount of DM herbage to remove
        private int durationOfThisDefoliation;          // duration in days for a given defoliation
        private int daysDefoliating;                    // number of days over which the defoliation is going
        private double cumAmountHarvested;              // cumulative amount defoliated during an ongoing defoliation
        private double currentPostHarvest;              // DM amount after each day's defoliation
        private LinkedList<double> growthQueue;         // list of daily growth rates over the period to compute mean growth rate
        // auxiliary boolean
        private bool removeAllBiomassIsPermitted;       // flag whether all biomass from PMF crops can be removed in a defoliation
        private bool aDefoliationHasHappened = false;   // flag whether a defoliation has happened in this simulation run

                //fraction of each plant part returned as residue (0-1), wastage
        private double leafResidueFrac = 0.01;
        private double stemResidueFrac = 0.01;
        private double flowerResidueFrac = 0.01;
        private double minLeafAmount = 5.0;

        private Dictionary<string, double> fractions = new Dictionary<string,double>();


        [EventSubscribe("StartOfSimulation")]
        private void OnSimulationCommencing(object sender, EventArgs e)
        {
            foreach (var fractionString in DefoliationFractions)
            {
                string[] tokens = fractionString.Split('=');
                if (tokens.Length != 2)
                    throw new Exception($"Unknown defoliation fraction string: {fractionString}");            
            
                fractions.Add(tokens[0], Convert.ToDouble(tokens[1]));
            } 
        
        
            // check and set some management options
            removeAllBiomassIsPermitted = RemoveAllBiomass == yesNoAnswer.Yes;

            // check the type of amount given
            if (RemoveAmountType == DefoliateAmountTypes.DMToRemove)
            {
                baseAmountType = "DMToRemove";
            }
            else if (RemoveAmountType == DefoliateAmountTypes.ResidualDM)
            {
                baseAmountType = "ResidualDM";
            }
            else
            {
                baseAmountType = "UseDefoliationFractions";
            }

            // check the interval between events
            if (IntervalBetweenDefoliations < 1)
            {
                throw new Exception("The interval between defoliation events must be at least one day");
            }

            // check the duration for each defoliation
            if(DurationOfEachDefoliation <= 0)
            {
                throw new Exception("The duration of defoliations cannot be zero or negative!");
            }

            // check the fraction of defoliated material to remove from the field
            if (DMRemoveType == DMRemovalTypes.RemoveAll)
            {
                FractionDMToRemove = 1.0;
            }
            else if (DMRemoveType == DMRemovalTypes.RemoveNone)
            {
                FractionDMToRemove = 0.0;
            }
            else if (DMRemoveType == DMRemovalTypes.BasedOnDigestibility)
            {
                FractionDMToRemove = -1.0;  // will be calculated dynamically
            }
            else // DMRemoveType == DMRemovalTypes.UserDefinedFraction
            {
                if (FractionDMToRemove < 0.0)
                {
                    throw new Exception("The fraction of DM defoliated to remove from the field cannot be negative!");
                }
            }

            // check the fraction of defoliated N to remove from the field
            if (NRemoveType == NRemovalTypes.RemoveAll)
            {
                FractionNToRemove = 1.0;
            }
            else if (NRemoveType == NRemovalTypes.RemoveNone)
            {
                FractionNToRemove = 0.0;
            }
            else if (NRemoveType == NRemovalTypes.ProportionalToDM)
            {
                FractionNToRemove = FractionDMToRemove;
            }
            else // NRemoveType == NRemovalTypes.UserDefinedFraction
            {
                if (FractionNToRemove < 0.0)
                {
                    throw new Exception("The fraction of defoliated N to remove from the field cannot be negative!");
                }
            }

            // set up the link to the plant species to be defoliated
            foreach (Plant species in myZone.FindAllChildren<Plant>().OfType<IModel>().ToList())
            {
                if(species.Name == Crop.Name)
                {
                    PMFSpecies = species;
                }
            }

            // make sure that management starts when RotationStartDate < simulationStartDay
            if ((clock.Today > DefoliationRotationStartDate) && (clock.Today < DefoliationRotationEndDate))
            {
                DefoliationRotationStartDate = clock.Today;
            }

            // set the fraction of urine for each layer
            if (ReturnType == ReturnAsTypes.AsDungUrine)
            {
                double depthFromSurface = 0.0;
                double propAtZ0;
                double propAtZ1;
                for (int layer = 0; layer < soilPhysical.Thickness.Length; layer++)
                {
                    depthFromSurface += soilPhysical.Thickness[layer];
                    if (depthFromSurface >= UrineDepth)
                    { // bottom layer found
                        urineFraction = new double[layer + 1];
                        double distFactor = 1.5;
                        double totalProp = UrineDepth * Math.Pow(1.0, distFactor) / (distFactor + 1.0);
                        depthFromSurface = 0.0;
                        propAtZ1 = (UrineDepth - depthFromSurface) * Math.Pow(1.0 - depthFromSurface / UrineDepth, distFactor) / (distFactor + 1.0);
                        for (int z = 0; z < layer+1; z++)
                        {
                            propAtZ0 = propAtZ1;
                            depthFromSurface += soilPhysical.Thickness[z];
                            propAtZ1 = (UrineDepth - depthFromSurface) * Math.Pow(1.0 - depthFromSurface / UrineDepth, distFactor) / (distFactor + 1);
                            if (1.0 - (depthFromSurface / UrineDepth) < 0.0)
                            {
                                propAtZ1 = 0;
                            }
                            urineFraction[z] = (propAtZ0 - propAtZ1) / totalProp;
                        }
                        layer = soilPhysical.Thickness.Length;
                    }
                }
            }

            // initialise some variables
            growthQueue = new LinkedList<double>();
            DaysSinceLastDefoliation = 0;
            durationOfThisDefoliation = -1;
            daysDefoliating = 0;
            resetMyOutputs();

            // write message in summary
            summary.WriteMessage(this," Automatic defoliation manager initialised", MessageType.Diagnostic);
            if (AllowAutomaticManagement == yesNoAnswer.Yes)
            {
                summary.WriteMessage(this, "   Defoliations will happen between " + DefoliationRotationStartDate.ToShortDateString()
                                         + " and " + DefoliationRotationEndDate.ToShortDateString() + ".", MessageType.Diagnostic);
                if (SuppressDefoliationOnWindow == yesNoAnswer.Yes)
                {
                    summary.WriteMessage(this, "    But they will be supressed between " + NoDefoliationWindowStartDate  + " and "
                                               + NoDefoliationWindowEndDate + ".", MessageType.Diagnostic);
                }

                summary.WriteMessage(this, "   Biomass from the sward will be defoliated.", MessageType.Diagnostic);
                if (DefoliationTriggerType == DefoliationTriggerTypes.TargetStandingBiomass)
                {
                    summary.WriteMessage(this, "   Events will happen whenever aboveground biomass surpasses " + TargetStandingBiomass.ToString("#0.0") + " g/m2.", MessageType.Diagnostic);
                    if(EnforceMinimumInterval == yesNoAnswer.Yes)
                    {
                        summary.WriteMessage(this, "     With a minimum of " + MinimumInterval + " days between defoliations", MessageType.Diagnostic);
                    }
                    if(EnforceMaximumInterval == yesNoAnswer.Yes)
                    {
                        summary.WriteMessage(this, "     With a maximum of " + MaximumInterval + " days between defoliations", MessageType.Diagnostic);
                    }
                }
                else if ((DefoliationTriggerType == DefoliationTriggerTypes.FixedInterval) || (DefoliationTriggerType == DefoliationTriggerTypes.TargetInterval))
                {
                    summary.WriteMessage(this, "   Events will happen every " + IntervalBetweenDefoliations + " days, if there is enough biomass.", MessageType.Diagnostic);
                }
                else if (DefoliationTriggerType == DefoliationTriggerTypes.TargetCropHeight)
                {
                    summary.WriteMessage(this, "   Events will happen whenever crop height surpasses " + TargetCropHeight.ToString("#0.0") + " mm.", MessageType.Diagnostic);
                }
                else if (DefoliationTriggerType == DefoliationTriggerTypes.TargetPhenologyStage)
                {
                    summary.WriteMessage(this, "   Events will happen whenever teh crop phenology stage reaches " + TargetPhenologyStage.ToString("#0.00"), MessageType.Diagnostic);
                }
                else
                {
                    summary.WriteMessage(this, "No valid option was given to decide when to defoliate", MessageType.Diagnostic);
                }


                if(baseAmountType == "ResidualDM")
                {
                    summary.WriteMessage(this, "   Removing biomass down to a residual amount of " + AmountForEachDefoliation.ToString("#.0") + " g/m2 over "
                                             + DurationOfEachDefoliation + " days.", MessageType.Diagnostic);
                }
                else
                {
                    summary.WriteMessage(this, "   Removing " + AmountForEachDefoliation.ToString("#.0") + " g/m2 of biomass per day over "
                                             + DurationOfEachDefoliation + " days.", MessageType.Diagnostic);
                }
            }
            else
            {
                summary.WriteMessage(this,"   Automatic defoliations are currently disabled, though defoliations can be triggered by another manager", MessageType.Diagnostic);
            }

            if(ReturnType == ReturnAsTypes.AsDungUrine)
            {
                summary.WriteMessage(this,"   Non-removed material will be returned as dung and urine. Urine added to soil according to proportions: "
                                         + string.Join(", ",urineFraction), MessageType.Diagnostic);
            }
            else
            {
                summary.WriteMessage(this,"   Non-removed material will be returned as residue.", MessageType.Diagnostic);
            }
        }

        [EventSubscribe("DoManagement")]
        private void OnDoManagement(object sender, EventArgs e)
        {
            // check whether we need to continue defoliationg, i.e. within a multi-day defoliation event (need to check this first in the day)
            if ((daysDefoliating > 0) && (daysDefoliating < durationOfThisDefoliation))
            {
                // reset outputs
                resetMyOutputs();

                // re-check the amount to defoliate
                double harvestableBiomass = harvestableSwardBiomass("All", "Harvestable");
                if (typeOfAmount == "DMToRemove")
                {
                    if(harvestableBiomass > 0.001)
                    {
                        herbageToRemove = Math.Min(harvestableBiomass, (amountGiven - cumAmountHarvested) / (durationOfThisDefoliation - daysDefoliating));
                    }
                }
                else if (typeOfAmount == "ResidualDM")
                {
                    double currentDM = standingSwardBiomassWt;
                    if (currentDM > amountGiven)
                    {
                        herbageToRemove = Math.Min(harvestableBiomass, (currentDM - amountGiven) / (durationOfThisDefoliation - daysDefoliating));
                    }
                }

                // remove plant biomass and return residue
                if (Math.Abs(herbageToRemove) >= 0.001)
                {
                    // set biomass removal
                    defoliateSward(herbageToRemove);

                    // return residue or excreta
                    if(ReturnedWt + ReturnedN > 0.0)
                    {
                        if (ReturnType == ReturnAsTypes.AsResidue)
                        {
                            returnResidues();
                        }
                        else
                        {
                            returnExcreta();
                        }
                    }

                    // gather amount removed this event
                    cumAmountHarvested += HarvestedWt;
                }

                daysDefoliating += 1;
            }

            // check whether a defoliation ended yesterday
            if (daysDefoliating < 0)
            { // clean up variables
                resetMyOutputs();
                daysDefoliating = 0;
            }

            // check whether automatic defoliations are enabled
            if (AllowAutomaticManagement == yesNoAnswer.Yes)
            {
                // check whether we are within the period in which defoliation management is allowed
                if ((clock.Today.Date >= DefoliationRotationStartDate.Date) && (clock.Today.Date <= DefoliationRotationEndDate.Date))
                {
                    if (clock.Today.Date == DefoliationRotationStartDate.Date)
                    {
                        if ((DefoliationTriggerType == DefoliationTriggerTypes.FixedInterval) || (DefoliationTriggerType == DefoliationTriggerTypes.TargetInterval))
                        {
                            DaysSinceLastDefoliation = IntervalBetweenDefoliations;
                        }
                        else
                        {
                            if(EnforceMaximumInterval == yesNoAnswer.Yes)
                            {
                                DaysSinceLastDefoliation = MaximumInterval;
                            }
                        }
                    }

                    // check whether a window for suppressing defoliations has been set
                    if (SuppressDefoliationOnWindow == yesNoAnswer.Yes && DateUtilities.WithinDates(NoDefoliationWindowStartDate, clock.Today, NoDefoliationWindowEndDate))
                    { // do nothing as we're within the suppression window
                    }
                    else
                    {
                        // check whether we should start a defoliation event
                        if (DefoliationTriggerType == DefoliationTriggerTypes.FixedInterval)
                        {
                            if (DaysSinceLastDefoliation == IntervalBetweenDefoliations)
                            {
                                Defoliate(AmountForEachDefoliation, baseAmountType, DurationOfEachDefoliation, 50.0, "yes");
                            }
                        }
                        else if (DefoliationTriggerType == DefoliationTriggerTypes.TargetInterval)
                        {
                            if (DaysSinceLastDefoliation >= IntervalBetweenDefoliations)
                            {
                                Defoliate(AmountForEachDefoliation, baseAmountType, DurationOfEachDefoliation, 50.0, "no");
                            }
                        }
                        else  if( DefoliationTriggerType == DefoliationTriggerTypes.TargetStandingBiomass)
                        {
                            if (standingSwardBiomassWt >= TargetStandingBiomass)
                            {
                                if(EnforceMinimumInterval == yesNoAnswer.Yes)
                                { // check interval between defoliations
                                    if(DaysSinceLastDefoliation >= MinimumInterval)
                                    { // sufficient days passed since last defoliation
                                        Defoliate(AmountForEachDefoliation, baseAmountType, DurationOfEachDefoliation, 50.0, "no");
                                    }
                                    //else wait for minimum interval
                                }
                                else
                                { // no checks, just defoliate
                                    Defoliate(AmountForEachDefoliation, baseAmountType, DurationOfEachDefoliation, 50.0, "no");
                                }
                            }
                            else
                            {
                                if(EnforceMaximumInterval == yesNoAnswer.Yes && (DaysSinceLastDefoliation >= MaximumInterval))
                                { // start a defoliation even if biomass is insufficient
                                    Defoliate(AmountForEachDefoliation, baseAmountType, DurationOfEachDefoliation, 50.0, "yes");
                                }
                            }
                        }
                        else if (DefoliationTriggerType == DefoliationTriggerTypes.TargetCropHeight)
                        {
                            if (standingSwardHeight >= TargetCropHeight)
                            {
                                if(EnforceMinimumInterval == yesNoAnswer.Yes)
                                { // check interval between defoliations
                                    if(DaysSinceLastDefoliation >= MinimumInterval)
                                    { // sufficient days passed since last defoliation
                                        Defoliate(AmountForEachDefoliation, baseAmountType, DurationOfEachDefoliation, 50.0, "no");
                                    }
                                    //else wait for minimum interval
                                }
                                else
                                { // no checks, just defoliate
                                    Defoliate(AmountForEachDefoliation, baseAmountType, DurationOfEachDefoliation, 50.0, "no");
                                }
                            }
                        }
                        else if (DefoliationTriggerType == DefoliationTriggerTypes.TargetPhenologyStage)
                        {
                            if (currentPhenologyStage >= TargetPhenologyStage)
                            {
                                if(EnforceMinimumInterval == yesNoAnswer.Yes)
                                { // check interval between defoliations
                                    if(DaysSinceLastDefoliation >= MinimumInterval)
                                    { // sufficient days passed since last defoliation
                                        Defoliate(AmountForEachDefoliation, baseAmountType, DurationOfEachDefoliation, 50.0, "no");
                                    }
                                    //else wait for minimum interval
                                }
                                else
                                { // no checks, just defoliate
                                    Defoliate(AmountForEachDefoliation, baseAmountType, DurationOfEachDefoliation, 50.0, "no");
                                }
                            }
                        }
                        //TargetCropHeight TargetPhenologyStage
                    }
                }
                //// Note: Only the code above, responsible for triggering automatic events, is limited by 'AllowAutomaticManagement'.
                ////       The rest of the code is still available to perform one-off defoliations.
                ////       It can be called from another manager or a schedulle thingy via Defoliate().
            }
        }

        [EventSubscribe("DoManagementCalculations")]
        private void OnDoManagementCalculations(object sender, EventArgs e)
        {
            // check whether a defoliation event has just been completed
            if (daysDefoliating == durationOfThisDefoliation)
            {
                // get amount of biomass remaining and zero counters
                PostHarvestDM = currentPostHarvest;
                RotationHarvestedWt = cumAmountHarvested;
                aDefoliationHasHappened = true;
                daysDefoliating = -1;

                // compute the mean growth rate for the queued period
                MeanGrowthRateDM = MathUtilities.Average(growthQueue.ToArray());
                growthQueue.Clear();
            }

            // count the days after a defoliation
            if (aDefoliationHasHappened && (daysDefoliating == 0))
            {
                DaysSinceLastDefoliation += 1;
            }

            // update the list holding growth rates
            updateGrowthQueue();
        }

        [EventSubscribe("EndOfDay")]
        private void OnEndOfDay(object sender, EventArgs e)
        {
            // send a 'message' to let models know that a defoliation has ended today (mostly for report)
            if ((daysDefoliating < 0) && (DefoliationHappenedToday != null))
            {
                DefoliationHappenedToday.Invoke(this, args);
            }
        }

        /// <summary>Sets up a defoliation event.</summary>
        /// <param name="defoliationType">Type of defoliation (cut, graze, or harvest)</param>
        /// <param name="amountDM">Amount of biomass to use (g/m2)</param>
        /// <param name="amountType">How the DM amount is interpreted (toRemove, residual)</param>
        /// <param name="duration">Number of days to defoliate over</param>
        /// <param name="mustDo">Flag whether a defoliation must be counted as such even if there is no biomass</param>
        public void Defoliate(double amountDM, string amountType, int duration = 1, double residualHeight = 50.0, string mustDo = "yes")
        {
            // check whether there are plants in the sward that can be defoliated
            if (PMFSpecies.IsEmerged)
            {
                // check DM amount given
                if (amountDM < 0.0)
                {
                    throw new Exception("Amount to defoliate cannot be negative!");
                }
                else
                {
                    amountGiven = amountDM;
                }

                // check the type of amount given
                if (amountType.ToLower() == "dmtoremove")
                {
                    typeOfAmount = "DMToRemove";
                }
                else if (amountType.ToLower() == "residualdm")
                {
                    typeOfAmount = "ResidualDM";
                }
                else if (amountType.ToLower() == "usedefoliationfractions")
                {
                    typeOfAmount = "UseDefoliationFractions";
                }
                else
                {
                    throw new Exception("Amount type should be \"DMToRemove\", \"ResidualDM\", or \"UseDefoliationFractions\"!");
                }

                // check duration given
                if (duration <= 0)
                {
                    throw new Exception("Duration of defoliation cannot be zero or negative!");
                }
                else
                {
                    durationOfThisDefoliation = duration;
                }

                // check residual height
                if (residualHeight < 0.0)
                {
                    throw new Exception("Value of the residual height cannot be negative!");
                }

                // check existing biomass and amount to remove
                PreHarvestDM = standingSwardBiomassWt;
                herbageToRemove = 0.0;
                double harvestableBiomass = harvestableSwardBiomass("All", "Harvestable");
                if (typeOfAmount == "UseDefoliationFractions")
                { // amount given is ignored, removal based on fractions
                    amountGiven = 0.0;
                    if (harvestableBiomass > 0.0)
                    {
                        herbageToRemove = -1.0;
                    }

                    summary.WriteMessage(this, "   Defoliation triggered, removing biomass using the removal fractions (set or default), during " + durationOfThisDefoliation + " days", MessageType.Diagnostic);
                }
                else if (typeOfAmount == "DMToRemove")
                {
                    if (amountGiven > 0.001)
                    { // a meaningful amount was given, check whether all can be removed
                        if (harvestableBiomass > 0.001)
                        {
                            herbageToRemove = Math.Min(harvestableBiomass, amountGiven / durationOfThisDefoliation);
                        }

                        summary.WriteMessage(this, "   Defoliation triggered, attempting to remove " + amountGiven.ToString("#0.0") + " g/m2 of biomass over " + durationOfThisDefoliation + " days", MessageType.Diagnostic);
                    }
                }
                else if (typeOfAmount == "ResidualDM")
                {
                    // check how much biomass will be removed
                    if (PreHarvestDM > amountGiven)
                    {
                        herbageToRemove = Math.Min(harvestableBiomass, (PreHarvestDM - amountGiven) / durationOfThisDefoliation);
                    }

                    summary.WriteMessage(this, "   Defoliation triggered, attempting to remove biomass down to " + amountGiven.ToString("#0.0") + " g/m2 over " + durationOfThisDefoliation + " days", MessageType.Diagnostic);

                }

                // can defoliation begin?
                if (Math.Abs(herbageToRemove) >= 0.001)
                {
                    // set height proportion - proportion of height that is removed
                    double todaysPorportion = MathUtilities.Divide(PMFSpecies.Leaf.Height - residualHeight, PMFSpecies.Leaf.Height,0.0);
                    //myZone.Set(PMFSpecies.Name+".Leaf.HeightFunction.FractionRemovedOnCut",todaysPorportion);
                   //myZone.Set(PMFSpecies.Name+".Leaf.HeightFunction.FractionRemovedOnHarvest",todaysPorportion);
                    //myZone.Set(PMFSpecies.Name+".Leaf.HeightFunction.FractionRemovedOnGraze",todaysPorportion);
                    //myZone.Set(PMFSpecies.Name+".Leaf.HeightFunction.FractionRemovedOnPrune",todaysPorportion);
                     
                     //myZone.Set(PMFSpecies.Name+".Phenology.SetToStage(,todaysPorportion);
                     PMFSpecies.Phenology.SetToStage(StageToSet);
                   
                    // set off first defoliation
                    defoliateSward(herbageToRemove);

                    // return residue or excreta
                    if(ReturnedWt + ReturnedN > 0.0)
                    {
                        if (ReturnType == ReturnAsTypes.AsResidue)
                        {
                            returnResidues();
                        }
                        else
                        {
                            returnExcreta();
                        }
                    }

                    // gather values for this event
                    cumAmountHarvested = HarvestedWt;
                    currentPostHarvest = standingSwardBiomassWt;
                    daysDefoliating = 1;
                    DaysSinceLastDefoliation = 0;
                }
                else
                {
                    // abort command as there is not enough biomass, except...
                    if (mustDo.ToLower() == "yes")
                    { // count the event as if it did happen
                        cumAmountHarvested = 0.0;
                        currentPostHarvest = standingSwardBiomassWt;
                        daysDefoliating = 1;
                        DaysSinceLastDefoliation = 0;
                    }

                    summary.WriteMessage(this, "   Defoliation did not happend because current biomass (" + PreHarvestDM.ToString("#0.0") + " g/m2) is too low (total harvestable = " + harvestableBiomass.ToString("#0.0") + " g/m2)", MessageType.Diagnostic);
                }
            }
            else
            {
                summary.WriteMessage(this, "   Defoliation did not happend because there is no growing plants in the sward", MessageType.Diagnostic);
            }
        }

        /// <summary>Resets the values of outputs.</summary>
        private void resetMyOutputs()
        {
            DefoliatedWt = 0.0;
            DefoliatedN = 0.0;
            HarvestedWt = 0.0;
            HarvestedN = 0.0;
            RemovedWt = 0.0;
            RemovedN = 0.0;
            ReturnedWt = 0.0;
            ReturnedN = 0.0;
            NReturnedInDung = 0.0;
            NReturnedInUrine = 0.0;
            RotationHarvestedWt = 0.0;
            MeanGrowthRateDM = 0.0;
        }

        /// <summary>Updates the lists holding data to compute mean growth rate.</summary>
        private void updateGrowthQueue()
        {
            growthQueue.AddFirst(growthRateBiomassWt);
            if (MeanGrowthPeriodType != MeanGrowthPeriodTypes.BetweenDefoliations)
            {
               if (growthQueue.Count > MaxPeriodForMeanGrowth)
               { // Max period reached, need to remove last value in the queue
                   growthQueue.RemoveLast();
               }
            }
        }

        /// <summary>Amount of plant biomass aboveground (g/m2).</summary>
        private double standingSwardBiomassWt
        {
            get
            {
                return (double)myZone.Get(PMFSpecies.Name+".AboveGround.Wt");
            }
        }

        /// <summary>Amount of N in plant's biomass aboveground (g/m2).</summary>
        private double standingSwardBiomassN
        {
            get
            {
                return (double)myZone.Get(PMFSpecies.Name+".AboveGround.N");
            }
        }

        /// <summary>Amount of N in plant's biomass aboveground (g/m2).</summary>
        private double standingSwardHeight
        {
            get
            {
                return (double)myZone.Get(PMFSpecies.Name+".Leaf.Height");
            }
        }

        /// <summary>Amount of N in plant's biomass aboveground (g/m2).</summary>
        private double currentPhenologyStage
        {
            get
            {
                return (double)myZone.Get(PMFSpecies.Name+".Phenology.Stage");
            }
        }

        /// <summary>Amount of plant biomass from all organs available for defoliation (g/m2).</summary>
        /// <remarks>Assumes that organs with a BiomassRemoval.FractionToRemove > 0 are harvestable.</remarks>
        /// <param name="plantName">The name of the plant to retrieve its biomass</param>
        /// <param name="fractionType">The type of fraction to use (harvestable or total)</param>
        private double harvestableSwardBiomass(string plantName, string fractionType)
        {
            double amountWt = 0.0;
            double fraction = 0.0;
            foreach (var forage in forages.ModelsWithDigestibleBiomass)
            {
                if (plantName == "All" || forage.Name == plantName)
                {
                    foreach (var material in forage.Material) 
                    {
                        string liveDead = "Dead";
                        if (material.IsLive)
                            liveDead = "Live";
                            
                        // consider only amounts toRemove
                        fractions.TryGetValue($"{forage.Name}.Fraction{liveDead}ToRemove", out fraction);
                        if ((fractionType == "Total") && (fraction > 0.0))
                        { // to return all biomass, for any organ that has some removable fraction
                            fraction = 1.0;
                        }
                        else if (removeAllBiomassIsPermitted && (fraction > 0.0))
                        { // theoretical to return, and remove, all biomass, but will assume a minimum of 5% left behind
                            fraction = 0.95;
                        }

                        if (fractionType == "Total")
                            amountWt += material.Total.Wt * fraction;
                        else
                            amountWt += material.Consumable.Wt * fraction;
                    }
                }
            }
            
            return amountWt;
        }

        /// <summary>Growth rate of aboveground biomass for any plant being defoliated (g/m2).</summary>
        private double growthRateBiomassWt
        {
            get
            {
                double result = 0.0;
                foreach (IOrgan organ in PMFSpecies.FindAllChildren<IOrgan>().OfType<IModel>().ToList())
                {
                    if ((bool)myZone.Get(PMFSpecies.Name + "." + organ.Name + ".IsAboveGround"))
                    {
                        result += (double)myZone.Get(PMFSpecies.Name + "." + organ.Name + ".Allocated.Wt");
                        result -= (double)myZone.Get(PMFSpecies.Name + "." + organ.Name + ".Detached.Wt");
                    }
                }

                return result;
            }
        }

        /// <summary>Triggers the actual biomass removal and gather DM and N amounts.</summary>
        /// <param name="amountToRemove">The total DM amount to remove (g/m2)</param>
        /// <param name="removalType">The type of removal (Cut, Graze, Harvest)</param>
        private void defoliateSward(double amountToRemove)
        {
            // get the amounts of biomass and N before today's defoliation
            double preRemovalDM = standingSwardBiomassWt;
            double preRemovalN = standingSwardBiomassN;
            double fractionToRemove = 0.0;

            // gather the actual biomass removal fractions, checking whether they need to be adjusted
            double totalHarvestableAmount = harvestableSwardBiomass("All", "Harvestable");
            if (amountToRemove > 0.0)
            { // an amount was given for defoliation, adjust removal fractions for each species in order to remove the amount specified
                fractionToRemove = amountToRemove / totalHarvestableAmount;
            }
            else if (amountToRemove < 0.0)
            { // defoliation is not based on an amount, removal is determined simply by the removal fractions
                fractionToRemove = 1.0;
            }

            // check whether the plant is alive
            bool speciesIsAlive = (bool)myZone.Get(PMFSpecies.Name + ".IsEmerged");
            if (speciesIsAlive)
            {
                // set removal fractions (these overrides the default removals in the plant)
                RemoveBiomass(PMFSpecies.Name, fractionToRemove);
            }

            // get the amounts of biomass and N after today's defoliation
            double postRemovalDM = standingSwardBiomassWt;
            double postRemovalN = standingSwardBiomassN;

            // get total defoliation (total plant stuff lost)
            DefoliatedWt = preRemovalDM - postRemovalDM;
            DefoliatedN = preRemovalN - postRemovalN;

            // get amounts harvested, removed, and returned
            manageDefoliatedBiomass();
        }

        /// <summary>Sets the biomass removal fractions for PMF plants.</summary>
        /// <param name="plantName">The name of PMF species</param>
        /// <param name="fractionHarvestable">The fraction of harvestable biomass to be removed (0-1)</param>
        private void RemoveBiomass(string plantName, double fractionHarvestable)
        {
            double fractionToRemove;
            double fractionToResidue;

                if ((PMFSpecies.Name == plantName) && (PMFSpecies.IsAlive))
                {
                    // set removal fractions (these overrides the default removals in the plant)
                    foreach (IOrgan organ in PMFSpecies.FindAllChildren<IOrgan>().OfType<IModel>().ToList())
                    {
                        // first get the removal for Live material
                        if (!fractions.TryGetValue(organ.Name + ".FractionLiveToRemove", out fractionToRemove))
                            fractionToRemove = 0;
                        if (removeAllBiomassIsPermitted && (fractionToRemove > 0.0))
                        { // assuming that 5% is left behind
                            fractionToRemove = 0.95;
                        }

                        fractionToRemove = fractionHarvestable * fractionToRemove;
                        fractionToRemove = Math.Min(1.0, fractionToRemove);
                        if (removeAllBiomassIsPermitted)
                        {
                            fractionToResidue = 0.0;
                        }
                        else
                        {
                            if (!fractions.TryGetValue(organ.Name + ".FractionLiveToResidue", out fractionToResidue))
                                fractionToResidue = 0;

                        }

                        fractionToResidue = Math.Min(fractionHarvestable * fractionToResidue, 1.0 - fractionToRemove);

                        (organ as IHasDamageableBiomass).RemoveBiomass(liveToRemove: fractionToRemove, liveToResidue: fractionToResidue);

                        // then get the removal for Dead material
                        if (!fractions.TryGetValue(organ.Name + ".FractionDeadToRemove", out fractionToRemove))
                            fractionToRemove = 0;
                        if (removeAllBiomassIsPermitted && (fractionToRemove > 0.0))
                        { // assuming that 5% is left behind
                            fractionToRemove = 0.95;
                        }

                        fractionToRemove = fractionHarvestable * fractionToRemove;
                        fractionToRemove = Math.Min(1.0, fractionToRemove);
                        if (removeAllBiomassIsPermitted)
                        {
                            fractionToResidue = 0.0;
                        }
                        else
                        {
                            if (!fractions.TryGetValue(organ.Name + ".FractionDeadToResidue", out fractionToResidue))
                                fractionToResidue = 0;
                        }

                        fractionToResidue = Math.Min(fractionHarvestable * fractionToResidue, 1.0 - fractionToRemove);
                        
                        (organ as IHasDamageableBiomass).RemoveBiomass(deadToRemove: fractionToRemove, deadToResidue: fractionToResidue);

                    }
            }
        }

        /// <summary>Gathers the DM and N amounts harvested, to be removed, and to be returned.</summary>
        private void manageDefoliatedBiomass()
        {
            double digestibilityStructural = 0.6;
            double digestibilityNonStrucutural = 0.9;

            double speciesHarvestedWt;
            double speciesHarvestedN;
            double speciesFractionToRemove;

            if (DefoliatedWt > 0.0)
            {
                HarvestedWt = 0.0;
                HarvestedN = 0.0;
                RemovedWt = 0.0;
                RemovedN = 0.0;

                    if(PMFSpecies.AboveGround.Wt > 0.0)
                    {
                        // get the amount harvested (plant stuff removed from plants)
                        speciesHarvestedWt = 0.0;
                        speciesHarvestedN = 0.0;
                        foreach (IOrgan organ in PMFSpecies.FindAllChildren<IOrgan>().OfType<IModel>().ToList())
                        {
                            speciesHarvestedWt += (double)myZone.Get(PMFSpecies.Name + "." + organ.Name + ".Removed.Wt");
                            speciesHarvestedN += (double)myZone.Get(PMFSpecies.Name + "." + organ.Name + ".Removed.N");
                        }

                        HarvestedWt += speciesHarvestedWt;
                        HarvestedN += speciesHarvestedN;

                        // get the DM fraction to be removed
                        if(FractionDMToRemove >= 0.0)
                        {
                            speciesFractionToRemove = FractionDMToRemove;
                        }
                        else
                        { // use digestibility to define the fraction
                            double fracStructural = PMFSpecies.AboveGround.StructuralWt/PMFSpecies.AboveGround.Wt;
                            speciesFractionToRemove = (1.0 - fracStructural)*digestibilityNonStrucutural + fracStructural*digestibilityStructural;
                            speciesFractionToRemove = Math.Min(1.0, Math.Max(0.0, speciesFractionToRemove));
                        }

                        // get the amounts actually removed from field
                        RemovedWt += speciesHarvestedWt * speciesFractionToRemove;
                        RemovedN += speciesHarvestedN * FractionNToRemove;
                }

                // get the amounts to be returned to the field (as residue or dung+urine)
                ReturnedWt = HarvestedWt - RemovedWt;
                ReturnedN = HarvestedN - RemovedN;
                if (ReturnType == ReturnAsTypes.AsDungUrine)
                {
                    if (NDungType == DungNContentTypes.DefineProportion)
                    {
                        NReturnedInDung = ReturnedN * ProportionOfNToDung;
                    }
                    else
                    {
                        NReturnedInDung = Math.Min(ReturnedN, ReturnedWt * 0.4 / CNRatioDung);
                    }

                    NReturnedInDung = Math.Min(NReturnedInDung, ReturnedN);
                    NReturnedInUrine = ReturnedN - NReturnedInDung;
                }
                else
                {
                    NReturnedInDung = 0.0;
                    NReturnedInUrine = 0.0;
                }
            }
        }

        /// <summary>Returns the material not removed off field as residue.</summary>
        private void returnResidues()
        {
            if ((ReturnedWt > 0.0) || (ReturnedN > 0.0))
            {
                PMF.BiomassRemovedType BiomassResidue = new PMF.BiomassRemovedType();
                string[] type = new string[] { "Grass" };
                float[] dltdm = new float[] { (float)(10.0 * ReturnedWt) };
                float[] dltn = new float[] { (float)(10.0 * ReturnedN) };
                float[] dltp = new float[] { 0.0f };
                float[] fraction = new float[] { 1.0f };     // fraction is always 1.0 here

                BiomassResidue.crop_type = "Grass";
                BiomassResidue.dm_type = type;
                BiomassResidue.dlt_crop_dm = dltdm;
                BiomassResidue.dlt_dm_n = dltn;
                BiomassResidue.dlt_dm_p = dltp;
                BiomassResidue.fraction_to_residue = fraction;
                BiomassRemoved.Invoke(BiomassResidue);
            }
        }

        /// <summary>Returns the material not removed off field as dung and urine).</summary>
        private void returnExcreta()
        {
            if ((ReturnedWt > 0.0) || (NReturnedInDung > 0.0))
            {
                PMF.BiomassRemovedType BiomassDung = new PMF.BiomassRemovedType();
                string[] type = new string[] { "RuminantDung_PastureFed" };
                float[] dltdm = new float[] { (float)(10.0 * ReturnedWt) };
                float[] dltn = new float[] { (float)(10.0 * NReturnedInDung) };
                float[] dltp = new float[] { 0.0f };
                float[] fraction = new float[] { 1.0f };     // fraction is always 1.0 here

                BiomassDung.crop_type = "RuminantDung_PastureFed";
                BiomassDung.dm_type = type;
                BiomassDung.dlt_crop_dm = dltdm;
                BiomassDung.dlt_dm_n = dltn;
                BiomassDung.dlt_dm_p = dltp;
                BiomassDung.fraction_to_residue = fraction;
                BiomassRemoved.Invoke(BiomassDung);
            }

            if (NReturnedInUrine > 0.0)
            {
                double[] myUrineDeposition = new double[soilPhysical.Thickness.Length];
                for (int z = 0; z < urineFraction.Length; z++)
                {
                    myUrineDeposition[z] = NReturnedInUrine * 10.0 * urineFraction[z];
                }

                Urea.AddKgHaDelta(SoluteSetterType.Fertiliser, myUrineDeposition);
            }
        }


        // Auxiliary bits and pieces  - - - - - - - - - - - - - - - - - - - - - - - - - - - - - - - - -

        /// <summary>Flag for a positive or negative answer</summary>
        public enum yesNoAnswer
        {
            /// <summary>Positive answer</summary>
            Yes,
            /// <summary>Negative answer</summary>
            No
        }

        /// <summary>Type of defoliation to use</summary>
        public enum DefoliationTypes
        {
            /// <summary>Cut</summary>
            Cut,
            /// <summary>Graze</summary>
            Graze,
            /// <summary>Harvest</summary>
            Harvest
        }

        /// <summary>Flag how defoliations will be triggered</summary>
        public enum DefoliationTriggerTypes
        {
            /// <summary>Setting a fixed interval</summary>
            FixedInterval,
            /// <summary>Setting a target (minimum) inteval</summary>
            TargetInterval,
            /// <summary>Setting a target (minimum) standing biomass</summary>
            TargetStandingBiomass,
            /// <summary>Setting a target (minimum) crop height</summary>
            TargetCropHeight,
            /// <summary>Setting a target phenology stage</summary>
            TargetPhenologyStage
        }

        /// <summary>How the DM amount given is interpreted</summary>
        public enum DefoliateAmountTypes
        {
            /// <summary>Setting a DM amount to remove</summary>
            DMToRemove,
            /// <summary>Setting the residual DM amount</summary>
            ResidualDM,
            /// <summary>Remove according to crop's BiomassdefoliationFractions</summary>
            None_UseDefoliationFractions
        }

        /// <summary>Fraction of defoliated DM to remove from field</summary>
        public enum DMRemovalTypes
        {
            /// <summary>Remove all DM</summary>
            RemoveAll,
            /// <summary>Remove no DM</summary>
            RemoveNone,
            /// <summary>Remove a user-defined fraction</summary>
            UserDefinedFraction,
            /// <summary>Remove a fraction based on plant digestibility</summary>
            BasedOnDigestibility
        }

        /// <summary>Fraction of N in the defoliated material to remove from field</summary>
        public enum NRemovalTypes
        {
            /// <summary>Remove all N</summary>
            RemoveAll,
            /// <summary>Remove no N</summary>
            RemoveNone,
            /// <summary>Remove a user-defined fraction</summary>
            UserDefinedFraction,
            /// <summary>Remove a fraction equal to DM removed</summary>
            ProportionalToDM
        }

        /// <summary>Define how the non-removed material is returned to the field</summary>
        public enum ReturnAsTypes
        {
            /// <summary>Return plant material as residue</summary>
            AsResidue,
            /// <summary>Return meterial as dung and urine</summary>
            AsDungUrine
        }

        /// <summary>Define how the proportion of N in dung is defined</summary>
        public enum DungNContentTypes
        {
            /// <summary>Define the proportion of N returned as dung</summary>
            DefineProportion,
            /// <summary>Define the C:N of dung</summary>
            DefineCNratio
        }

        /// <summary>Options for the period in which mean growth is computed</summary>
        public enum MeanGrowthPeriodTypes
        {
            /// <summary>Compute over a fixed number of days</summary>
            FixedPeriod,
            /// <summary>Compute over the period between defoliations</summary>
            BetweenDefoliations,
            /// <summary>Compute over the period between defoliations but not beyond a maximum</summary>
            BetweenDefoliationsOrMaxPeriod
        }
    }
}
```
        Forages
          Parameters:
            Name                          LiveDigestibility  DeadDigestibility  LiveFractionConsumable  DeadFractionConsumable  LiveMinimumBiomass  DeadMinimumBiomass
            SurfaceOrganicMatter.Residue  0.7                0.3                1                       1                       100                 0
            Lucerne.Leaf                  0.7                0.3                1                       1                       100                 0
            Lucerne.Stem                  0.7                0.3                1                       1                       100                 0
            Lucerne.Shell                 0.7                0.3                1                       1                       100                 0
            Lucerne.TapRoot               0.7                0.3                1                       1                       100                 0
            Lucerne.Root                  0                  0                  0                       0                       0                   0
            Lucerne.Nodule                0                  0                  0                       0                       0                   0
            Lucerne.Grain                 0                  0                  0                       0                       0                   0
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