Simulations: Version=215
  Memo TitlePage
    # The APSIM Pinus Model
  Memo Introduction
    # Pinus Model Notes

    ## Plant Modelling Framework

    The APSIM Pinus model has been developed using the Plant Modelling Framework (PMF) of [#brown_plant_2014] within  APSIM Next Generation [#holzworth_apsim_2014]. This new framework provides a library of plant organ and process submodels that can be coupled, at runtime, to construct a model in much the same way that models can be coupled to construct a simulation. This means that dynamic composition of lower level processes and organ classes (e.g. photosynthesis, Leaf) into larger constructions (e.g. maize, wheat, Pinus) can be achieved by the model developer without additional coding.

    ##Pecularities of Pinus and This Model

    The Pinus model consists of:

    * a phenology model to simulate development through sequential growth phases
    * a collection of organs to simulate the various plant parts
    * an arbitrator to allocate resources (N, biomass) to the various plant organs

    This work builds upon earlier APSIM forest models such as described by [#Huthetal2002],[#zerger_integrating_2001], [#huth_managing_2008], and [#smethurst2020generalized].

    Pinus is a reasonably straight forward perennial crop to model. This model has been set up for simulation of even-aged plantations (transplanted seedlings) or native forests (also assumed to start the simulation as a transplanted seedling, but in practice it would be sown from naturally distributed seed). Plants grow in accordance with available resources and conditions, which in this version of the model are temperature, radiation, available soil water, and available soil nitrogen. Leaf, branch and roots senesce, remain attached for some time, then detach to produce litter. Above-ground biomass is the main target of production, which is made up of organs that develop from default partitioniing targets that is modified daily due to organ demand. Forest managers also deal with tree size, which are set in the model as a function of aboveground biomass. During model development, we found that Pinus model performance (plant or stand development) was particularly sensitive to Leaf lifespan/longevity, specific Leaf area, dead Leaf detachment, partitioning to roots and shoots, mortality and thinning, and weeds (if present).

    There are many Pinus genotypes (species, closely related genera, provenances, families, clones, and hybrids) that can behave differently in response to their growing environment. This build of the Pinus model was calbirated on datasets of three species (_P. radiata_, _P. caribaea_, _P. elliottii_) and F1 and F2 hybrids of (_P. caribaea_, _P. elliottii_).  Many of the genotype are poorly described, but some are probably from early-stage domestication, whiole others are the result of several generations of tree breeding. Early genetic material was mostly selected, for example, for states in Australian from provenance that performed adequately in state of interest, and tree breeding programes for several decades were state-run. During more recent decades, company and collaborative breeding programs have provided the genetic material for planting. A summary of domestication and genetic material of planted _P. radiata_ in Australia and New Zealand is provided in [#burdon2008achievements], [#wu2007successful], and [#johnson2008half]. The implications are that genotypic control of physiological traits is poorly defined, requiring the model to be calibrated for assumed rather than measured differences.

    ##Including a Pinus crop in an APSIM simulation

    There will be a Pinus and/or PinusRotation example simulation available by clicking the "Open an Example" icon available on the second tab displayed when APSIM Next Gen is opened.  This provides a useful demonstration of how to simulate a Pinus crop and provides some useful graphs for viewing model behaviour and performance.

    To include a Pinus crop in a simulation the "Pinus" model needs to be added to the paddock, field or zone in which it is to be grown.  This can be done by (a) right clicking on the "Paddock", selecting "Add" from the drop down menu and then selecting "Pinus" from the list that comes up, or (b) dragging or copying and pasting the model up from the standard toolbox or an example.  A TreeSowing rule or TreeManagement rule needs to be set up to start the crop off.

    This document provides a description of the model, describes the validation and test datasets, and model performance.

    Major Eucalyptus model developments:

    2020-2021

    • Copied the Eucalyptus model and modified it to fit the observed Pinus datasets. The Eucalyptus and Pinus models were expanded (beyond the original Eucaluptus model in APSIM Next Generation) to include an expansion of stem metrics beyond just diameter at breast height (DBH, cm), height (m), and overbark stem volume (Vol, m3/ha). New stem metrics include underbark parameters of stem volume (Volub) and wood density, and basal area (BA, m2/ha) the mean annual increment of overbark and underbark volumes (m3/ha/year).This required partitioning of stem biomass into bark and wood, calculation of bark thickness, and an estimation of volumes overbark and underbark. All stem metrics are empricially calculated rather than process-based. These metrics are known to be	highly effected by stem taper, bark thickness and wood density, which in-turn are highly influenced by site, genetics and management. Few data are available on wood density (underbark, whole tree), so it is included here only as a check that underlying calculations are sensible. Validations of these metrics are included.

    Suggested future developments:

    1. Make SLA a function of stress level
    2. Create a set of functional weeds specifically for use with these forestry models, e.g. N-fixing/non-N-fixing X herbaceous/shrub/tree X tropical/sub-tropical/temperate
    3. Self-thinning rule or process-based mortality
    4. Improve effects of stocking, if necessary. Leaf allocation as a function of aboveground.wt (g/m2) rather than individual tree weight (g/tree) has been included, but further checking of this is required to see if that is all that is needed for a wide range of stockings. Allocation patterns might need to be explicitly related to population.
    5. Waterlogging – I (Philip) would have thought it was important, particularly for some euc and pine genotypes, but so far I haven’t run into a really need for it amongst our current observed datasets.
    6. Soil P (and K) and fertiliser responses
    7. Pruning, thinning and various otehr effects on knot-free wood and other wood quality measures
    8. Geo-locate and interact adjacent plots for predicting area-based metrics like run-on (above- and below-ground), stream flow and wood production
    9. Tree and log size class distributions
    10. Development of outputs for greenhouse accounting (water use, C sequestration, greenhouse gases, biodiversity idiexes)
  Folder Replacements
    Report: EventNames=[Clock].DoReport
      VariableNames:
        [Clock].Today
        //[TreeManagement].Script.CultivarName. as Cultivar
        [Pinus].Age
        [Pinus].Population*10000 as stemsperha
        [Pinus].AboveGround.Wt
        [Pinus].AboveGround.N
        [Pinus].BelowGround.Wt
        [Pinus].Leaf.Dead.Wt
        [Pinus].Leaf.Live.Wt
        [Pinus].Leaf.Live.NConc
        [Pinus].Leaf.Wt
        [Pinus].Branch.Live.Wt
        [Pinus].Branch.Dead.Wt
        [Pinus].Branch.Wt
        [Pinus].Leaf.Detached.Wt
        [Pinus].Stem.Live.Wt
        [Pinus].Total.N
        [Pinus].Leaf.Live.NConc
        [Pinus].Cone.Live.NConc
        [Pinus].Branch.Live.NConc
        [Pinus].Stem.Live.NConc
        [Pinus].CoarseRoot.Live.NConc
        [Pinus].CoarseRoot.Live.Wt
        [Pinus].FineRoot.Live.NConc
        [Pinus].Leaf.Live.N*10 as LiveFoliarN
        [Pinus].Leaf.N
        [Pinus].Leaf.N*10 as TotalFoliarN
        [Pinus].Leaf.CoverGreen
        [Pinus].Leaf.SpecificLeafArea
        [Pinus].Leaf.LAI
        [Pinus].LAI
        [Pinus].Leaf.Fn
        [Pinus].Leaf.Fw
        [Pinus].TotalLive.Wt
        ([Pinus].Leaf.Transpiration + [Soil].SoilWater.Es + [MicroClimate].PrecipitationInterception) as ET
        [Pinus].IndividualTreeStemWt
        [Pinus].IndividualTreeLiveWt
        [Pinus].Stem.DBH
        [Pinus].Stem.Ht
        [Pinus].RootShootRatio
        [Pinus].Stem.Vol
        [Pinus].Stem.MAI
        [Pinus].Stem.BA
        [Pinus].Stem.BarkThickness
        [Pinus].Stem.BarkWt
        [Pinus].Stem.BAub
        [Pinus].Stem.DBHub
        [Pinus].Stem.MAIub
        [Pinus].Stem.VolBark
        [Pinus].Stem.Volub
        [Pinus].Stem.WoodDensity
        [Pinus].Stem.BarkDensity
        [Pinus].Stem.WoodWt
        [Pinus].Stem.Wt
        [Pinus].Stem.Live.Wt
        [Pinus].FineRoot.Wt
        [Pinus].CoarseRoot.Wt
        [Pinus].Cone.Wt
        [Pinus].TotalWoodBark.Wt
        //(([Soil].Water.Volumetric[2])+([Soil].Water.Volumetric[3]))/2 as SW30
        //(([Soil].Water.Volumetric[2])+([Soil].Water.Volumetric[3]))/2 as SW30
        //(([Soil].Water.Volumetric[9])+([Soil].Water.Volumetric[10]))/2 as SW600
        sum ([SoilWater].PAWmm) as PAWmmTotal
        [Soil].Water.MM[1] as SWmmD1
        [SoilWater].Evaporation
        [SoilWater].Drainage
        [SoilWater].Flux[1]
        [SoilWater].Flow[1]
        [SoilWater].Infiltration
        [SoilWater].LateralFlow[1]
        [SoilWater].LateralOutflow
        [SoilWater].Runoff
        [MicroClimate].PrecipitationInterception
        [Pinus].FineRoot.WaterUptake
        [Soil].Water.Volumetric[1] as SWD1
        [Soil].Water.Volumetric[2] as SWD2
        [Soil].Water.Volumetric[3] as SWD3
        [Soil].Water.Volumetric[4] as SWD4
        //[Soil].Water.Volumetric[5] as SWD5
        //[Soil].Water.Volumetric[6] as SWD6
        //[Soil].Water.Volumetric[7] as SWD7
        //[Soil].Water.Volumetric[8] as SWD8
        sum([Soil].Water.MM) as SWmmTotal
        //[Soil].NO3ppm
        //[Soil].NH4ppm
        //[Soil].NO3.kgha
        [Soil].NH4.ppm[1]
        [Soil].NO3.ppm[1]
        ([Soil].NO3.ppm + [Soil].NH4.ppm) as MineralNppm
        //sum ([Soil].NH4.kgha) as NH4Nkgpha
        //sum ([Soil].NO3.kgha) as NO3Nkgpha
        (sum ([Soil].NH4.kgha)+ sum ([Soil].NO3.kgha)) as MineralNTotalkgpha
        //([Soil].NO3.kgha[1]*1000000/14)/([Soil].Water.Volumetric[1]*1000000) as NO3mMD1
        //([Soil].NO3.kgha[2]*1000000/14)/([Soil].Water.Volumetric[2]*1000000) as NO3mMD2
        //([Soil].NO3.kgha[3]*1000000/14)/([Soil].Water.Volumetric[3]*1000000) as NO3mMD3
        //([Soil].NH4.kgha[1]*1000000/14)/([Soil].Water.Volumetric[1]*1000000) as NH4mMD1
        //([Soil].NH4.kgha[2]*1000000/14)/([Soil].Water.Volumetric[2]*1000000) as NH4mMD2
        //([Soil].NH4.kgha[3]*1000000/14)/([Soil].Water.Volumetric[3]*1000000) as NH4mMD3
        [Irrigation].IrrigationApplied
        [Weather].Rain
        [Pinus].Leaf.HeightFunction
    Report SensibilityReport: EventNames=[Clock].EndOfWeek
      VariableNames:
        [Clock].Today
        [Pinus].Leaf.CoverGreen
        [Pinus].LAI
        [Pinus].Age
        [Pinus].Stem.DBH
        [Pinus].Stem.Ht
        [Pinus].Stem.Vol
        [Pinus].Stem.MAI
        [MicroClimate].SurfaceRS
        [Pinus].Leaf.SenescenceRate
    Report HarvestReport: EventNames=[Pinus].Harvesting
      VariableNames:
        [Clock].Today
        [Pinus].Stem.DBH
        [Pinus].Stem.Ht
        [Pinus].RootShootRatio
        [Pinus].Stem.Vol
        [Pinus].Stem.MAI
        [Pinus].Stem.BA
        [Pinus].Stem.BarkThickness
        [Pinus].Stem.BarkWt
        [Pinus].Stem.BAub
        [Pinus].Stem.DBHub
        [Pinus].Stem.MAIub
        [Pinus].Stem.VolBark
        [Pinus].Stem.Volub
        [Pinus].Stem.WoodDensity
    Report AnnualReport: EventNames=[Clock].EndOfYear
      VariableNames:
        [Clock].Today
        sum of ([Nutrient].MineralisedN[1]+[Nutrient].MineralisedN[2]+[Nutrient].MineralisedN[3]+[Nutrient].MineralisedN[4]) from [Clock].StartOfYear to [Clock].EndOfYear as NNMkgphaTop4DepthsAnnual
  DataStore
    ExcelInput Observed: FileNames=[Observed.xlsx]; SheetNames=[Observed]
    PredictedObserved: PredictedTableName=Report; ObservedTableName=Observed; FieldNameUsedForMatch=SimulationName; FieldName2UsedForMatch=SimulationID; FieldName3UsedForMatch=Clock.Today; AllColumns=false
  Folder Validation
    Memo ValidationIntro
      Validation datasets have been included to assist with validation during model development. Validation datasets cover a range of environmental (soil and climate) conditions, management options (populations, nitrogen rates, irrigation) and genetic backgrounds (different regions, provenence, clones). These datasets have been grouped and ordered alphebetically by climatic zone, country and site. Currently, all temperate data are for _P. radiata_, but a range of tropical and sub-tropical genpotypes are included. Graphs of model performance are provided for stocking, canopy development, biomass production, stem metrics, and soil water.

      Observed data are shown compared to predictions, with statistics for model skill.

      The following map shows the location of sites used in this validation.
    Folder Combined Validation
      Memo
        These graphs are for the combined datasets of _Temperate_ and _Tropical and SubTropical_ climatic zones.

        Graphs from individual sites, particularly temporal trends of observed and predicted values, are available but
        currently disabled. If you wish to view these graphs, please download the validation from GitHub, run it, and
        enable those graphs and-or add others.

        Two sites are simulated to ages beyond when there was a reasonable expectation of satisfactory model skill, due to very low stocking being reached where allocation patterns would probably not have been simulated correctly (Puruki site) or due to not correctly predicting disease-induced loss of tree vigor (IMPAC site). However, all data have bene included  in these OvP graphs.

        Many of these simualtions for stem metrics could be further improved by better specifying allometric relations between biomass and tree size, which we know are highly environment-by-genotype specific, but what is provided here is a minimal range of genotypes that were needed to achieve the level of model skill currenlty shown.
    Folder Temperate
      Memo
        These are the Temperate datasets.
      Folder BFG
        Memo
          These data are for an experiment with fertilizer, irrigation and fertigation treatments established in a 10-year-old _P. radiata_ plantation near Canberra, Australia. The experiment was officially entitled Biology of Forest Growth (BFG) as if focused on improving the physiogical understanding of  growth of this species in a somewhat common Australian environment.

          Numerous publications about this experiment reported on its management, tree growth, biomass components, phenology, climate, and soils. Many of these publications were produced in a special issue of Forest Ecology and Management (Volume 52, Issues 1–4, September 1992) several from which data have been sourced for developing the APSIM Pimus model: [#benson1992biology], [#benson1992dynamics], [#crane1992accumulation], [#cremer1992relations], [#khanna1992effects], [#kirschbaum1999cenw], [#mcmurtrie1992using], [#myers1992site], [#raison1992biology], [#raison1992dynamicsI], [#raison1992dynamicsII], [#raison1990effects], and [#snowdon1992effects]. A later thesis [#pongracic2001influence] and paper [#waterworth2007effects] also provided data. Many of these data and addition data were also provided by Keryn Paul (CSIRO), which we greatly apprecaited.
        Experiment BF
          Factors
            Factor G: Specification=[Management]
              Operations C
                1973-12-31  [TreeThinning].Script.DoThin(0.05);
                1974-12-31  [TreeThinning].Script.DoThin(0.05);
                1975-12-31  [TreeThinning].Script.DoThin(0.05);
                1976-12-31  [TreeThinning].Script.DoThin(0.05);
                1977-12-31  [TreeThinning].Script.DoThin(0.05);
                1978-12-31  [TreeThinning].Script.DoThin(0.05);
                1979-12-31  [TreeThinning].Script.DoThin(0.05);
                1980-12-31  [TreeThinning].Script.DoThin(0.05);
                1981-12-31  [TreeThinning].Script.DoThin(0.05);
                1982-12-31  [TreeThinning].Script.DoThin(0.01);
                1983-06-15  [TreeThinning].Script.DoThin(0.00);
                1989-04-03  [TreeThinning].Script.DoThin(0.563);
                1973-06-15  [Fertiliser].Apply(amount: 20, type: "NH4N", 0)
                // 1983-06-14  [Soil].SoilWater.Reset()
              Operations F
                1973-12-31  [TreeThinning].Script.DoThin(0.05);
                1974-12-31  [TreeThinning].Script.DoThin(0.05);
                1975-12-31  [TreeThinning].Script.DoThin(0.05);
                1976-12-31  [TreeThinning].Script.DoThin(0.05);
                1977-12-31  [TreeThinning].Script.DoThin(0.05);
                1978-12-31  [TreeThinning].Script.DoThin(0.05);
                1979-12-31  [TreeThinning].Script.DoThin(0.05);
                1980-12-31  [TreeThinning].Script.DoThin(0.05);
                1981-12-31  [TreeThinning].Script.DoThin(0.05);
                1982-12-31  [TreeThinning].Script.DoThin(0.05);
                1983-06-15  [TreeThinning].Script.DoThin(0.00);
                1985-06-15  [TreeThinning].Script.DoThin(0.068);
                1986-06-15  [TreeThinning].Script.DoThin(0.029);
                1987-08-27  [TreeThinning].Script.DoThin(0.015);
                1988-04-03  [TreeThinning].Script.DoThin(0.032);
                1989-04-03  [TreeThinning].Script.DoThin(0.46);
                1973-06-15  [Fertiliser].Apply(amount: 20, type: "NH4N", 0)
                1983-09-28  [Fertiliser].Apply(amount: 200, type: "NH4N", 0)
                1983-11-18  [Fertiliser].Apply(amount: 200, type: "NH4N", 0)
                // 1983-06-14  [Soil].SoilWater.Reset()
              Operations I
                1973-12-31  [TreeThinning].Script.DoThin(0.05);
                1974-12-31  [TreeThinning].Script.DoThin(0.05);
                1975-12-31  [TreeThinning].Script.DoThin(0.05);
                1976-12-31  [TreeThinning].Script.DoThin(0.05);
                1977-12-31  [TreeThinning].Script.DoThin(0.05);
                1978-12-31  [TreeThinning].Script.DoThin(0.05);
                1979-12-31  [TreeThinning].Script.DoThin(0.05);
                1980-12-31  [TreeThinning].Script.DoThin(0.00);
                1981-12-31  [TreeThinning].Script.DoThin(0.00);
                1982-12-31  [TreeThinning].Script.DoThin(0.00);
                1983-06-15  [TreeThinning].Script.DoThin(0.00);
                1987-08-27  [TreeThinning].Script.DoThin(0.014);
                1988-04-03  [TreeThinning].Script.DoThin(0.014);
                1989-04-03  [TreeThinning].Script.DoThin(0.555);
                1973-06-15  [Fertiliser].Apply(amount: 20, type: "NH4N", 0)
                1983-08-25  [AutomaticIrrigation].Script.TurnOn()
                2003-12-31  [AutomaticIrrigation].Script.TurnOff()
                // 1983-06-14  [Soil].SoilWater.Reset()
              Operations IFP
                1973-12-31  [TreeThinning].Script.DoThin(0.05);
                1974-12-31  [TreeThinning].Script.DoThin(0.05);
                1975-12-31  [TreeThinning].Script.DoThin(0.05);
                1976-12-31  [TreeThinning].Script.DoThin(0.05);
                1977-12-31  [TreeThinning].Script.DoThin(0.05);
                1978-12-31  [TreeThinning].Script.DoThin(0.05);
                1979-12-31  [TreeThinning].Script.DoThin(0.01);
                1980-12-31  [TreeThinning].Script.DoThin(0.00);
                1981-12-31  [TreeThinning].Script.DoThin(0.00);
                1982-12-31  [TreeThinning].Script.DoThin(0.00);
                1989-04-03  [TreeThinning].Script.DoThin(0.462);
                1973-06-15  [Fertiliser].Apply(amount: 20, type: "NH4N", 0)
                1983-06-28  [Fertiliser].Apply(amount: 200, type: "NH4N", 0)
                1983-11-18  [Fertiliser].Apply(amount: 200, type: "NH4N", 0)
                1983-08-25  [AutomaticIrrigation].Script.TurnOn()
                2003-12-31  [AutomaticIrrigation].Script.TurnOff()
                // 1983-06-14  [Soil].SoilWater.Reset()
          Simulation BFG
            Clock: Start=1973-05-01; End=2001-12-31
            Weather: FileName=BFG1900-2020 SiloDD BFG and Uriara rain.met
            MicroClimate: a_interception=0; b_interception=0; c_interception=0.59; d_interception=0; SoilHeatFluxFraction=0.1; MinimumHeightDiffForNewLayer=0; NightInterceptionFraction=0; ReferenceHeight=2
            SoilArbitrator Soil Arbitrator
            Summary
            Zone Plantation: Area=1; Slope=5; AspectAngle=0; Altitude=50
              Soil SoilBFG: ASCOrder=NA; ASCSubOrder=NA; SoilType=Sand; Site=30395_43104; NearestTown=HALL; Region=South Eastern Highlands; State=ACT; NaturalVegetation=Cleared, non-native vegetation, buildings; ApsoilNumber=9999; Latitude=-35.33; Longitude=148.92; LocationAccuracy=+- 90m; YearOfSampling=2020; Comments=Landuse is Plantation forestry
                DataSource=Soil and Landscape Grid of Australia. This soil parameter file was automatically generated from the GSM National Surfaces using pedotransfer functions.
                Physical
                  Thickness  BD     AirDry  LL15  DUL   SAT
                  100        1.457  0.02    0.06  0.23  0.4
                  200        1.6    0.02    0.06  0.23  0.35
                  200        1.68   0.02    0.1   0.24  0.33
                  300        1.75   0.05    0.18  0.25  0.31
                  300        1.7    0.06    0.18  0.24  0.28
                  300        1.7    0.06    0.18  0.23  0.23
                  300        1.7    0.06    0.18  0.22  0.23
                  300        1.7    0.06    0.18  0.22  0.23
                  SoilCrop PinusSoil: LL=[0.06, 0.06, 0.06, 0.07, 0.08, 0.08, 0.08, 0.08]; KL=[0.07, 0.07, 0.05, 0.02, 0.01, 0.005, 0.005, 0.005]; XF=[1, 1, 1, 0.5, 0.3, 0.3, 0.3, 0.3]
                Water: Thickness=[100, 100, 250, 150, 200, 200, 500, 500]; InitialValues=[0.06, 0.06, 0.1, 0.18, 0.18, 0.18, 0.18, 0.18]; FilledFromTop=false
                WaterBalance SoilWater: SummerDate=1-nov; SummerU=4; SummerCona=2; WinterDate=1-apr; WinterU=4; WinterCona=2; DiffusConst=140; DiffusSlope=50; Salb=0.13; CN2Bare=20; CNRed=10; CNCov=0.8; PSIDul=-100; Thickness=[100, 200, 200, 300, 300, 300, 300, 300]; SWCON=[0.9, 0.9, 0.9, 0.2, 0.05, 0.02, 0.01, 0.001]
                Organic: FOMCNRatio=40; CarbonUnits=Total
                  Thickness  Carbon  SoilCNRatio  FBiom  FInert  FOM
                  100        3.1     15           0.03   0.1     475.475
                  100        2       16           0.02   0.2     303.176
                  250        1       18           0.01   0.3     193.314
                  150        0.01    20           0.01   1       123.262
                  200        0.01    23           0.01   1       67.6477
                  200        0.01    23           0.01   1       37.1259
                  500        0.01    23           0.01   1       37.126
                  500        0.01    23           0.01   1       37.126
                Chemical: Thickness=[100, 100, 250, 150, 200, 200, 500, 500]; PH=[5.7, 5.6, 5.5, 5.4, 5.4, 5.42226, 5.422, 5.422]; PHUnits=Water
                Nutrient
                Solute NO3: Thickness=[100, 100, 250, 150, 200, 200, 500, 500]; InitialValues=[5, 2, 1, 0, 0, 0, 0, 0]; InitialValuesUnits=ppm; WaterTableConcentration=0; D0=0; DepthConstant=0; MaxDepthSoluteAccessible=0; RunoffEffectivenessAtMovingSolute=0; MaxEffectiveRunoff=0
                Solute NH4: same as Validation.Temperate.BFG.BF.BFG.Plantation.SoilBFG.NO3
                Solute Urea: Thickness=[100, 100, 250, 150, 200, 200, 500, 500]; InitialValues=[0, 0, 0, 0, 0, 0, 0, 0]; InitialValuesUnits=kg/ha; WaterTableConcentration=0; D0=0; DepthConstant=0; MaxDepthSoluteAccessible=0; RunoffEffectivenessAtMovingSolute=0; MaxEffectiveRunoff=0
                SoilTemperature CERESSoilTemperature: InteractionsPerDay=8
              Irrigation
              Fertiliser
              SurfaceOrganicMatter: InitialResidueName=Pinus; InitialResidueType=Eucalyptus; InitialResidueMass=0; InitialStandingFraction=0; InitialCPR=0; InitialCNR=0
              Manager TreeSowingRule
                RowSpace = 2.71
                RowWidth = 3.7
                CultivarName = BFG
                SowingDate = 06/16/1973 00:00:00
```csharp
using Models.Soils;
using System;
using Models.Core;
using Models.PMF;
namespace Models
{
    [Serializable] 
    [System.Xml.Serialization.XmlInclude(typeof(Model))]
    public class Script : Model
    {
        [Link] Plant Plant;
        [Link] Clock Clock;

        [Description("Spacing (m) between plants within rows")]
        public double RowSpace { get; set; }
        [Description("Spacing (m) between rows")]
        public double RowWidth { get; set; }

        [Description("Cultivar")]
        [Display(Type=DisplayType.CultivarName)]
        public string CultivarName { get; set; }
        [Description("Sowing Date")]
        public DateTime SowingDate { get; set; }

        [EventSubscribe("DoManagement")]
        private void OnDoManagement(object sender, EventArgs e)
        {
            double PlantPopulation = 1 / (RowWidth * RowSpace);

            if (Clock.Today.Date == SowingDate)
                Plant.Sow(population: PlantPopulation, 
                    cultivar: CultivarName, 
                    depth: 100, 
                    rowSpacing: 150);
            //Plant.Sow(... Contains the following arguements:
            //Population  double  Required  Seeds sowing/m2
            //Cultivar    string  Required  "NameOfCultivar"
            //Depth       double  Optional  Depth (mm) seed sown.   Default is 100mm 
            //MaxCover    double  Optional  Proportion (0-1) of the ground row crop will cover.   Default is 1.0
            //BudNumber   double  Optional  Number of mainstems per seed sown.  Default is 1.0
            //RowSpacing  double  Optional  Spaceing (mm) between drill rows when crop is sown.  Default is 150mm
            //CropClass   string  Optional  Crop class to instantiate when crop is sown.  Default is "Plant"
        }
    }
}
```
              Manager TreeThinning
```csharp
using APSIM.Core;
using Models.Soils;
using System.Xml.Serialization;
using Models.PMF;
using Models.Core;
using System.Collections.Generic;
using System;
using Newtonsoft.Json;
using Models.PMF.Interfaces;

namespace Models
{
    [Serializable] 
    [System.Xml.Serialization.XmlInclude(typeof(Model))]
    public class Script : Model, IStructureDependency
    {
        [Link] private Plant Pinus;
        [Link] private Clock Clock;
        
        public IStructure Structure { private get; set; }


        
        [EventSubscribe("StartOfSimulation")]
        private void OnSimulationCommencing(object sender, EventArgs e)
        {
            
        }
        
        public void DoThin(double ThinFr)
        {
            //Set up  array of remove fractions to send with Cut method.  Each member in the array corresponds to an organ in the same order they are set up in.

                //Harvest with manager specified removal fractions
                Pinus.structure?.DoThin(ThinFr);
                var Leaf =   Structure.FindChild<IHasDamageableBiomass>("Leaf", relativeTo: (INodeModel)Pinus);
                var Stem =   Structure.FindChild<IHasDamageableBiomass>("Stem", relativeTo: (INodeModel)Pinus);
                var Branch =   Structure.FindChild<IHasDamageableBiomass>("Branch", relativeTo: (INodeModel)Pinus);
                var FineRoot =   Structure.FindChild<IHasDamageableBiomass>("FineRoot", relativeTo: (INodeModel)Pinus);
                var CoarseRoot =   Structure.FindChild<IHasDamageableBiomass>("CoarseRoot", relativeTo: (INodeModel)Pinus);
                Leaf.RemoveBiomass(liveToRemove: 0, deadToRemove: 0.0, liveToResidue: ThinFr, deadToResidue: 0.0);
                Stem.RemoveBiomass(liveToRemove: 0, deadToRemove: 0.0, liveToResidue: ThinFr, deadToResidue: 0.0);
                Branch.RemoveBiomass(liveToRemove: 0, deadToRemove: 0.0, liveToResidue: ThinFr, deadToResidue: 0.0);
                FineRoot.RemoveBiomass(liveToRemove: 0, deadToRemove: 0.0, liveToResidue: ThinFr, deadToResidue: 0.0);
                CoarseRoot.RemoveBiomass(liveToRemove: 0, deadToRemove: 0.0, liveToResidue: ThinFr, deadToResidue: 0.0);

                Pinus.Population = Pinus.Population*(1-ThinFr);
        }
    }
}
```
              Manager TreeThinningFromAboveOrBelow
```csharp
using APSIM.Core;
using Models.Soils;
using Models.Interfaces;
using APSIM.Shared.Utilities;
using System.Xml.Serialization;
using Models.PMF;
using Models.Core;
using System.Collections.Generic;
using System;
using Newtonsoft.Json;
using Models.PMF.Interfaces;

namespace Models
{
    [Serializable] 
    [System.Xml.Serialization.XmlInclude(typeof(Model))]
    public class Script : Model, IStructureDependency
    {
        [Link] private Plant Pinus;
        [Link] private Clock Clock;
        
        public IStructure Structure { private get; set; }



        [EventSubscribe("StartOfSimulation")]
        private void OnSimulationCommencing(object sender, EventArgs e)
        {
            
        }
        
        public void DoThin(double ThinFr)
        {
            //Set up  array of remove fractions to send with Cut method.  Each member in the array corresponds to an organ in the same order they are set up in.
            //Set thinning bias away from average for biomass components (not for population), e.g. 0.5 for thinning from below, and 2 for thinning from above, 
            //i.e. average individual tree size changes

                double ThinBias = 0.5;        

                //Harvest with manager specified removal fractions
                Pinus.structure?.DoThin(ThinFr*ThinBias);
                var Leaf =   Structure.FindChild<IHasDamageableBiomass>("Leaf", relativeTo: (INodeModel)Pinus);
                var Stem =   Structure.FindChild<IHasDamageableBiomass>("Stem", relativeTo: (INodeModel)Pinus);
                var Branch =   Structure.FindChild<IHasDamageableBiomass>("Branch", relativeTo: (INodeModel)Pinus);
                var FineRoot =   Structure.FindChild<IHasDamageableBiomass>("FineRoot", relativeTo: (INodeModel)Pinus);
                var CoarseRoot =   Structure.FindChild<IHasDamageableBiomass>("CoarseRoot", relativeTo: (INodeModel)Pinus);
                Leaf.RemoveBiomass(liveToRemove: 0, deadToRemove: 0.0, liveToResidue: ThinFr*ThinBias, deadToResidue: 0.0);
                Stem.RemoveBiomass(liveToRemove: 0, deadToRemove: 0.0, liveToResidue: ThinFr*ThinBias, deadToResidue: 0.0);
                Branch.RemoveBiomass(liveToRemove: 0, deadToRemove: 0.0, liveToResidue: ThinFr*ThinBias, deadToResidue: 0.0);
                FineRoot.RemoveBiomass(liveToRemove: 0, deadToRemove: 0.0, liveToResidue: ThinFr*ThinBias, deadToResidue: 0.0);
                CoarseRoot.RemoveBiomass(liveToRemove: 0, deadToRemove: 0.0, liveToResidue: ThinFr*ThinBias, deadToResidue: 0.0);

                Pinus.Population = Pinus.Population*(1-ThinFr);
        }
    }
}
```
              Manager AutomaticIrrigation
                allowIrrigation = False
                seasonStart = 1-jan
                seasonEnd = 31-dec
                seasonsAllocation = 2000
                triggerDeficit = 90
                targetDeficit = 98
                returndays = 4
                maximumAmount = 15
                depthPAWC = 400
```csharp
using Newtonsoft.Json;
using APSIM.Shared.Utilities;
using System.Xml.Serialization;
using Models.Soils;
using Models.PMF;
using Models.Core;
using System;
using Models.Interfaces;



        
namespace Models
{
    [Serializable] 
    [System.Xml.Serialization.XmlInclude(typeof(Model))]
    public class Script : Model
    {
        [Link] private ISummary summary;
        [Link] private Irrigation Irrigation;
        [Link] private Clock Clock;
        [Link] private Soil Soil;
        [Link(IsOptional = true)] private IPlant existingCrop;
        private DateTime StartDate;
        private DateTime EndDate;
        private double TopDUL;
        private double TopLL;
        private int nLayers;
        [Link]
        private IPhysical soilPhysical;
        [Link]
        private ISoilWater waterBalance;
        //Communication to other modules
       
        //User inputs from properties tab
        [Description("Turn irrigation on?")]
        public bool allowIrrigation { get; set; }
        [Description("Start of irrigation season (dd-MMM)")]
        public string seasonStart { get; set; }
        [Description("End of irrigation season (dd-MMM)")]
        public string seasonEnd { get; set; }
        [Description("Season allocation (mm)")]
        public double seasonsAllocation { get; set; }
        [Description("Deficit to trigger irrigation (% PAWC)")]
        public double triggerDeficit { get; set; }
        [Description("Deficit to stop irrigaton (% PAWC)")]
        public double targetDeficit { get; set; }
        [Description("Minimum days for irrigation to return")]
        public double returndays { get; set; }
        [Description("Maximum irrigation application (mm/day)")]
        public double maximumAmount { get; set; }
        [Description("Depth to calculate PAWC (mm)")]
        public double depthPAWC { get; set; }

        //Class members
        [JsonIgnore] public double TopSWdeficit { get; set; }
        [JsonIgnore] public double TopSWC { get; set; }
        [JsonIgnore] public double DaysSinceIrrigation { get; set; }
        [JsonIgnore] public double AmountToApply { get; set; }
        [JsonIgnore] public double SeasonAppliedAmount { get; set; }
        
        private bool IrrigationIsAllowed { get; set; }
        private bool SeasonIsOpen { get; set; }
        private bool CropIsActive { get; set; }
        private bool IrrigatorIsAvailable { get; set; }
        private bool SoilIsDry { get; set; }



        public void TurnOn()
        {
        allowIrrigation=true;
        IrrigationIsAllowed=true;
        }
        public void TurnOff()
        {
        allowIrrigation=false;
        IrrigationIsAllowed=false;
        }


        //Calculate static soil variables
        [EventSubscribe("StartOfSimulation")]
        private void OnStartOfSimulation(object sender, EventArgs e)
        {   
            //Set the season dates
            StartDate = DateTime.Parse(seasonStart + "-" + Clock.Today.Year.ToString());
            EndDate = DateTime.Parse(seasonEnd + "-" + Clock.Today.Year.ToString());
            
            //Can we irrigate at all?
            IrrigationIsAllowed = false; 
            if (allowIrrigation)
                IrrigationIsAllowed = true; 

            //Calculate soil water variables
            double depthFromSurface = 0.0;
            double fracLayer = 0.0;
            nLayers = soilPhysical.Thickness.Length;
            for (int layer = 0; layer < nLayers; layer++)
            {
                fracLayer = Math.Min(1.0, (depthPAWC - depthFromSurface) / soilPhysical.Thickness[layer]);
                TopLL += soilPhysical.LL15mm[layer] * fracLayer;
                TopDUL += soilPhysical.DULmm[layer] * fracLayer;
                depthFromSurface += soilPhysical.Thickness[layer];
                if (depthFromSurface >= depthPAWC)
                    layer = nLayers;
            }
        }
             
        //Determine daily requirement for irrigation
        [EventSubscribe("StartOfDay")]
        private void OnStartOfDay(object sender, EventArgs e)
        {
            //Can we irrigate today?          
            SeasonIsOpen = isBetween(Clock.Today, StartDate, EndDate);
            if (!SeasonIsOpen)
                SeasonAppliedAmount = 0;

            //Is there a crop in the ground that needs irrigation?
            CropIsActive = false;
            if ((existingCrop != null) && (existingCrop.IsAlive))
                CropIsActive = true;
            //if ((existingCrop.Phenology.Stage >= 3.0) && (existingCrop.Phenology.Stage < 6.0))
          
            //Is the irrigator available?
            IrrigatorIsAvailable = false;
            DaysSinceIrrigation += 1;
            if (DaysSinceIrrigation >= returndays)
                IrrigatorIsAvailable = true;
          
            //Is the soil dry enough to require irrigation?
            SoilIsDry = false;
            double depthFromSurface = 0.0;
            double fracLayer = 0.0;
            TopSWC = 0.0;
            for (int layer = 0; layer < nLayers; layer++)
            //for (int layer = 0; depthFromSurface < depthPAWC + soilPhysical.Thickness[layer]; layer++)
            {
                fracLayer = Math.Min(1.0, (depthPAWC - depthFromSurface) / soilPhysical.Thickness[layer]);
                TopSWC += waterBalance.SWmm[layer] * fracLayer;
                depthFromSurface += soilPhysical.Thickness[layer];
                if (depthFromSurface >= depthPAWC)
                    layer = nLayers;
            }
            
            TopSWdeficit = TopSWC - TopDUL;
            if (Math.Max(0.0, -TopSWdeficit) >= (TopDUL - TopLL) * (100 - triggerDeficit) / 100)
                SoilIsDry = true;
                
            //Are all the conditions ratifying irrigation
            if (IrrigationIsAllowed && SeasonIsOpen && CropIsActive && IrrigatorIsAvailable && SoilIsDry)
            {
                //Lets bloody well irrigate then!!!!
                AmountToApply = TopDUL * targetDeficit / 100 - TopSWC;
                AmountToApply = Math.Max(0.0, Math.Min(AmountToApply, seasonsAllocation - SeasonAppliedAmount));
                AmountToApply = Math.Min(AmountToApply,maximumAmount);
                Irrigation.Apply(AmountToApply);
                DaysSinceIrrigation = 0;
                SeasonAppliedAmount += AmountToApply;
            }
        }
        
        ///Checks whether theDate is between iniDate and endDate (non-year specific)
        private bool isBetween(DateTime theDay, DateTime iniDate, DateTime endDate)
        {
            bool result = false;
            if (iniDate.DayOfYear < endDate.DayOfYear)
            {
                // period is within one year, ex: summer in the northern hemisphere
                if ((theDay.DayOfYear >= iniDate.DayOfYear) && (theDay.DayOfYear <= endDate.DayOfYear))
                    result = true;
            }
            else
            {
                // period goes over the end of the year, ex: summer in the southern hemisphere
                if ((theDay.DayOfYear >= iniDate.DayOfYear) || (theDay.DayOfYear <= endDate.DayOfYear))
                    result = true;
            }
            
            return result;
        }
    }
}
```
              Operations Management
              Plant Pinus
              Report AnnualReport: EventNames=[Clock].EndOfYear
                VariableNames:
                  [Clock].Today
                  ([Nutrient].MineralisedN[1]+[Nutrient].MineralisedN[2]+[Nutrient].MineralisedN[3])*10 as NNMkg45cmAnnual
              Report: EventNames=[Clock].DoReport
                VariableNames:
                  [Clock].Today
                  //[TreeManagement].Script.CultivarName. as Cultivar
                  [Pinus].Age
                  [Pinus].Population*10000 as stemsperha
                  [Pinus].AboveGround.Wt
                  [Pinus].AboveGround.N
                  [Pinus].BelowGround.Wt
                  [Pinus].Leaf.Dead.Wt
                  [Pinus].Leaf.Live.Wt
                  [Pinus].Leaf.Live.NConc
                  [Pinus].Leaf.Wt
                  [Pinus].Branch.Live.Wt
                  [Pinus].Branch.Dead.Wt
                  [Pinus].Branch.Wt
                  [Pinus].Leaf.Detached.Wt
                  [Pinus].Stem.Live.Wt
                  [Pinus].Total.N
                  [Pinus].Leaf.Live.NConc
                  [Pinus].Cone.Live.NConc
                  [Pinus].Branch.Live.NConc
                  [Pinus].Stem.Live.NConc
                  [Pinus].CoarseRoot.Live.NConc
                  [Pinus].FineRoot.Live.NConc
                  [Pinus].Leaf.Live.N*10 as LiveFoliarN
                  [Pinus].Leaf.N*10 as TotalFoliarN
                  [Pinus].Leaf.CoverGreen
                  [Pinus].Leaf.SpecificLeafArea
                  [Pinus].Leaf.LAI
                  [Pinus].LAI
                  [Pinus].Leaf.Fn
                  [Pinus].Leaf.Fw
                  [Pinus].TotalLive.Wt
                  ([Pinus].Leaf.Transpiration + [Soil].SoilWater.Es + [MicroClimate].PrecipitationInterception) as ET
                  [Pinus].IndividualTreeStemWt
                  [Pinus].IndividualTreeLiveWt
                  [Pinus].Stem.DBH
                  [Pinus].Stem.Ht
                  [Pinus].RootShootRatio
                  [Pinus].Stem.Vol
                  [Pinus].Stem.MAI
                  [Pinus].Stem.BA
                  [Pinus].Stem.BarkThickness
                  [Pinus].Stem.BarkWt
                  [Pinus].Stem.BAub
                  [Pinus].Stem.DBHub
                  [Pinus].Stem.MAIub
                  [Pinus].Stem.VolBark
                  [Pinus].Stem.Volub
                  [Pinus].Stem.WoodDensity
                  [Pinus].Stem.BarkDensity
                  [Pinus].Stem.WoodWt
                  [Pinus].Stem.Wt
                  [Pinus].Stem.Live.Wt
                  [Pinus].FineRoot.Wt
                  [Pinus].CoarseRoot.Wt
                  [Pinus].Cone.Wt
                  [Pinus].TotalWoodBark.Wt
                  //(([Soil].Water.Volumetric[2])+([Soil].Water.Volumetric[3]))/2 as SW30
                  //(([Soil].Water.Volumetric[2])+([Soil].Water.Volumetric[3]))/2 as SW30
                  //(([Soil].Water.Volumetric[9])+([Soil].Water.Volumetric[10]))/2 as SW600
                  sum ([SoilWater].PAWmm) as PAWmmTotal
                  [Soil].Water.MM[1] as SWmmD1
                  [SoilWater].Evaporation[1]
                  [SoilWater].Drainage[1]
                  [SoilWater].Flux[1]
                  [SoilWater].Flow[1]
                  [SoilWater].Infiltration[1]
                  [SoilWater].LateralFlow[1]
                  [SoilWater].LateralOutflow
                  [SoilWater].Runoff[1]
                  [MicroClimate].PrecipitationInterception
                  [Pinus].FineRoot.WaterUptake[1]
                  [Soil].Water.Volumetric[1] as SWD1
                  [Soil].Water.Volumetric[2] as SWD2
                  [Soil].Water.Volumetric[3] as SWD3
                  [Soil].Water.Volumetric[4] as SWD4
                  //[Soil].Water.Volumetric[5] as SWD5
                  //[Soil].Water.Volumetric[6] as SWD6
                  //[Soil].Water.Volumetric[7] as SWD7
                  //[Soil].Water.Volumetric[8] as SWD8
                  sum([Soil].Water.MM) as SWmmTotal
                  //[Soil].NO3ppm
                  //[Soil].NH4ppm
                  //[Soil].NO3.kgha
                  //[Soil].NH4.kgha[1]
                  //[Soil].NO3.kgha[1]
                  ([Soil].NO3.kgha + [Soil].NH4.kgha) as MineralNkgpha
                  sum ([Soil].NH4.kgha) as NH4Nkgpha
                  sum ([Soil].NO3.kgha) as NO3Nkgpha
                  (sum ([Soil].NH4.kgha)+ sum ([Soil].NO3.kgha)) as MineralNTotalkgpha
                  //([Soil].NO3.kgha[1]*1000000/14)/([Soil].Water.Volumetric[1]*1000000) as NO3mMD1
                  //([Soil].NO3.kgha[2]*1000000/14)/([Soil].Water.Volumetric[2]*1000000) as NO3mMD2
                  //([Soil].NO3.kgha[3]*1000000/14)/([Soil].Water.Volumetric[3]*1000000) as NO3mMD3
                  //([Soil].NH4.kgha[1]*1000000/14)/([Soil].Water.Volumetric[1]*1000000) as NH4mMD1
                  //([Soil].NH4.kgha[2]*1000000/14)/([Soil].Water.Volumetric[2]*1000000) as NH4mMD2
                  //([Soil].NH4.kgha[3]*1000000/14)/([Soil].Water.Volumetric[3]*1000000) as NH4mMD3
                  [Irrigation].IrrigationApplied
                  [Weather].Rain
      Folder FSA703A
        Memo
          These data are a plot in operational plantations that were previously managed by Forestry South Australia (FSA). We appreciate the provision of data by Jim O'Hehir. This plot reached an old age relative to many other _P. radiata_ plantations in the world.
        Simulation FSA703A
          Weather: FileName=MtCrawford1900-2021.met
          Clock: Start=1936-07-01; End=1992-07-17
          Summary
          SoilArbitrator Soil Arbitrator
          Zone Plantation: Area=1; Slope=0; AspectAngle=0; Altitude=50
            Soil Farm4Prophet profile No 8 Deep Sandy Loam  Modified for Mount Crawford: SoilType=Other; Site=Generic; State=Generic; Country=Australia; ApsoilNumber=1051; Latitude=-34.928; Longitude=138.602; LocationAccuracy=Regional Soil Type; YearOfSampling=0
              DataSource=Generic soil developed for Farm4Prophet project, adapted from a set of generic soils for SA developed by SARDI Climate Applications in discussion with Dr Anthony Whitbread (CSIRO).
              Comments=Loamy Sand - Soil water properties (BD, CLL, DUL, SAT, AIRDRY) of this soil are based on a generic soil developed as part of Liddicoat C, Hayman P, et al. (2012) Climate change, wheat production and erosion risk in South Australia’s cropping zone: Linking crop simulation modelling to soil landscape mapping, Government of South Australia, through Department of Environment, Water and Natural Resources. http://www.environment.sa.gov.au/files/sharedassets/public/science/soil_and_land/kb-gen-climate-change-wheat-production-and-erosion-risk.pdf (Section 3.3 and Appendix F). These were developed for use with wheat with some level of verification of yield predictions (see report for details).  Other APSIM soil parameters were based on ‘A protocol for the development of soil parameter values for use in APSIM’ by Dalgliesh et al. OC% was estimated based on soil texture and pH set at 7.0. No soil chemical values were estimated. Soil chemical properties may need to be adapted to reflect local conditions and subsoil constraints.
              Physical
                Thickness  BD   AirDry  LL15   DUL    SAT
                100        1.3  0.0435  0.087  0.204  0.459
                100        1.3  0.088   0.11   0.31   0.459
                200        1.3  0.175   0.175  0.33   0.459
                200        1.3  0.18    0.18   0.31   0.459
                200        1.3  0.18    0.18   0.28   0.459
                200        1.3  0.19    0.19   0.25   0.459
                BD, AirDry, LL15, DUL, SAT source: Estimated based on local knowledge
                SoilCrop PinusSoil: LL=[0.087, 0.11, 0.175, 0.18, 0.18, 0.19]; KL=[0.07, 0.07, 0.05, 0.02, 0.01, 0.005]; XF=[1, 1, 1, 0.5, 0.3, 0.3]
              WaterBalance SoilWater: SummerDate=1-Nov; SummerU=6; SummerCona=3.5; WinterDate=1-Apr; WinterU=2; WinterCona=2; DiffusConst=88; DiffusSlope=35; Salb=0.13; CN2Bare=73; CNRed=20; CNCov=0.8; PSIDul=-100; Thickness=[100, 100, 200, 200, 200, 200]; SWCON=[0.5, 0.5, 0.5, 0.5, 0.5, 0.5]
              Organic: FOMCNRatio=40; CarbonUnits=Total
                Thickness  Carbon  SoilCNRatio  FBiom  FInert  FOM
                100        2.5     12           0.035  0.3     390.598
                100        1.7     12           0.02   0.35    289.362
                200        0.8     12           0.02   0.5     158.805
                200        0.3     12           0.015  0.8     87.1541
                200        0.05    12           0.015  1       47.8312
                200        0.05    12           0.015  1       26.2503
              Chemical: Thickness=[100, 100, 200, 200, 200, 200]; PH=[7, 7, 7, 7, 7, 7]; PHUnits=Water
                PH source: Estimated based on local knowledge
              Water: Thickness=[100, 100, 200, 200, 200, 200]; InitialValues=[0.17475, 0.26, 0.29125, 0.2775, 0.255, 0.235]; FilledFromTop=false
              Nutrient
              Solute NO3: Thickness=[100, 100, 200, 200, 200, 200]; InitialValues=[20, 10, 5, 1, 1, 1]; InitialValuesUnits=ppm; WaterTableConcentration=0; D0=0; DepthConstant=0; MaxDepthSoluteAccessible=0; RunoffEffectivenessAtMovingSolute=0; MaxEffectiveRunoff=0
              Solute NH4: same as Validation.Temperate.FSA703A.FSA703A.Plantation.Farm4Prophet profile No 8 Deep Sandy Loam  Modified for Mount Crawford.NO3
              Solute Urea: Thickness=[100, 100, 200, 200, 200, 200]; InitialValues=[0, 0, 0, 0, 0, 0]; InitialValuesUnits=kg/ha; WaterTableConcentration=0; D0=0; DepthConstant=0; MaxDepthSoluteAccessible=0; RunoffEffectivenessAtMovingSolute=0; MaxEffectiveRunoff=0
              SoilTemperature CERESSoilTemperature: InteractionsPerDay=8
            Irrigation
            Fertiliser
            SurfaceOrganicMatter: InitialResidueName=Pinus; InitialResidueType=Eucalyptus; InitialResidueMass=1000; InitialStandingFraction=0; InitialCPR=0; InitialCNR=40
            MicroClimate: a_interception=0; b_interception=1; c_interception=0.45; d_interception=0; SoilHeatFluxFraction=0; MinimumHeightDiffForNewLayer=0; NightInterceptionFraction=0; ReferenceHeight=2
            Plant Pinus
            Manager TreeSowingRule
              RowSpace = 2.67
              RowWidth = 2.67
              CultivarName = BFG
              SowingDate = 07/15/1936 00:00:00
              script: same as in Validation.Temperate.BFG.BF.BFG.Plantation.TreeSowingRule
            Manager TreeThinning: same as Validation.Temperate.BFG.BF.BFG.Plantation.TreeThinning
            Operations Management
              1942-07-15  [TreeThinning].Script.DoThin(0.1107);
              1950-07-15  [TreeThinning].Script.DoThin(0.029718876);
              1952-07-15  [TreeThinning].Script.DoThin(0.171357616);
              1954-07-15  [TreeThinning].Script.DoThin(0);
              1959-07-15  [TreeThinning].Script.DoThin(0.01998002);
              1964-07-15  [TreeThinning].Script.DoThin(0.02039);
              1968-07-15  [TreeThinning].Script.DoThin(0);
              1969-07-15  [TreeThinning].Script.DoThin(0);
              1971-07-15  [TreeThinning].Script.DoThin(0.01769);
              1974-07-15  [TreeThinning].Script.DoThin(0.04449);
              1978-07-15  [TreeThinning].Script.DoThin(0.06208);
              1982-07-15  [TreeThinning].Script.DoThin(0.11111);
              1986-07-15  [TreeThinning].Script.DoThin(0.07580);
              1988-07-15  [TreeThinning].Script.DoThin(0);
              1990-07-15  [TreeThinning].Script.DoThin(0.05324);
              1992-07-15  [TreeThinning].Script.DoThin(0.05775);
            Report: EventNames=[Clock].DoReport
              VariableNames:
                [Clock].Today
                [Pinus].Phenology.CurrentPhase.Name
                [Pinus].Phenology.StageCode
                [Pinus].Root.NSupplyUptake
                [Soil].SoilWater.Eo
                [Soil].SoilWater.Es
                [Soil].SoilWater.Drainage
                [Soil].SoilWater.Runoff
                [Soil].SoilWater.pond
                [Pinus].AboveGround.Wt
                [Pinus].BelowGround.Wt
                [Pinus].Total.Wt
                [Pinus].Leaf.Dead.Wt
                [Pinus].Leaf.Live.Wt
                [Pinus].Stem.Dead.Wt
                [Pinus].Stem.Live.Wt
                [Pinus].Root.Dead.Wt
                [Pinus].Root.Live.Wt
                [Pinus].AboveGround.N
                [Pinus].BelowGround.N
                [Pinus].Total.N
                [Pinus].TotalLive.N
                [Pinus].TotalDead.N
                [Pinus].Leaf.Dead.N
                [Pinus].Leaf.Live.N
                [Pinus].Stem.Dead.N
                [Pinus].Stem.Live.N
                [Pinus].Root.Live.N
                [Pinus].Root.Dead.N
                [Pinus].Leaf.Live.NConc
                [Pinus].Leaf.Dead.NConc
                [Pinus].Stem.Live.NConc
                [Pinus].Root.Live.NConc
                [Pinus].Root.WaterSupply
                [Pinus].Root.WaterUptake
                [Pinus].Leaf.Transpiration
                [Pinus].Leaf.WaterDemand
                [Pinus].Root.Depth
                [Pinus].Leaf.CoverGreen
                [Pinus].Leaf.CoverTotal
                [Pinus].Leaf.CoverDead
                [Pinus].Leaf.LAI
                [Pinus].Leaf.LAIDead
                [Pinus].Leaf.Fn
                [Pinus].Leaf.Fw
                [Pinus].Leaf.Photosynthesis.FT
                [Pinus].Leaf.Photosynthesis.FVPD
                [Pinus].Stem.MinimumNConc
                [Pinus].Root.MinimumNConc
                [Pinus].Stem.MaximumNConc
                [Pinus].Root.MaximumNConc
                [Pinus].TotalLive.Wt
                [Pinus].Stem.Live.StructuralWt
                [Pinus].Stem.Live.StorageWt
                [Pinus].Leaf.SpecificArea
                [Pinus].TotalDead.Wt
                [Soil].Water.MM
                [Soil].NO3.kgha
                [Pinus].Arbitrator.N.TotalPlantDemand
                [Pinus].Leaf.LAIFunction.SpecificLeafArea
                [Pinus].IndividualTreeLiveWt
                [Pinus].Age
                [Pinus].Leaf.Photosynthesis
                [Pinus].Arbitrator.N.TotalPlantSupply
                ([SurfaceOrganicMatter].Wt / 10)  as Litter
            Report AnnualReport: EventNames=[Clock].EndOfYear
              VariableNames:
                [Clock].Today
                ([Nutrient].MineralisedN[1]+[Nutrient].MineralisedN[2]+[Nutrient].MineralisedN[3])*10 as NNMkg45cmAnnual
      Folder FSA704
        Memo
          These data are a plot in operational plantations that were previously managed by Forestry South Australia (FSA). We appreciate the provision of data by Jim O'Hehir. This plot reached an old age relative to many other _P. radiata_ plantations in the world.
        Simulation FSA704
          Weather: FileName=MtCrawford1900-2021.met
          Clock: Start=1936-07-01; End=1980-08-15
          Summary
          SoilArbitrator Soil Arbitrator
          Zone Plantation: Area=1; Slope=0; AspectAngle=0; Altitude=50
            Soil Synthetic Soil Derived from ISRIC SoilGrids: ASCOrder=NA; ASCSubOrder=NA; SoilType=Haplic Luvisols; Site=NA; NearestTown=NA; Region=NA; State=NA; Country=Australia; NaturalVegetation=NA; ApsoilNumber=9999; Latitude=-34.625; Longitude=138.875; LocationAccuracy=+- 250 m; DataSource=ISRIC SoilGrids
              Water: Thickness=[150, 150, 150, 150, 200, 200, 200, 200, 300, 300]; FilledFromTop=true
                InitialValues=[0.14, 0.185, 0.21, 0.21, 0.21, 0.21, 0.21, 0.21, 0.21, 0.21]
              Physical
                Thickness  ParticleSizeSand  ParticleSizeSilt  ParticleSizeClay  BD     AirDry  LL15   DUL    SAT    KS
                150        71.7              10.7              17.7              1.321  0.047   0.14   0.23   0.447  45.247
                150        60                9.5               31                1.368  0.062   0.185  0.273  0.445  9.636
                150        52.5              9                 39.2              1.386  0.07    0.21   0.296  0.448  3.701
                150        51.5              9                 39.8              1.405  0.07    0.21   0.296  0.443  3.492
                200        51.5              9                 39.5              1.419  0.07    0.21   0.296  0.438  3.595
                200        52.5              9                 38.5              1.426  0.07    0.21   0.296  0.432  4.037
                200        53.1              9                 38                1.43   0.07    0.21   0.296  0.43   4.278
                200        53.3              9                 38                1.43   0.07    0.21   0.296  0.43   4.278
                300        53.6              9                 38                1.431  0.07    0.21   0.296  0.43   4.278
                300        53.8              9                 38                1.431  0.07    0.21   0.295  0.43   4.278
                SoilCrop RiceSoil
                  LL=[0.14, 0.185, 0.21, 0.217, 0.227, 0.239, 0.25, 0.261, 0.276, 0.292]
                  KL=[0.06, 0.06, 0.06, 0.055, 0.048, 0.04, 0.032, 0.024, 0.014, 0.003]
                  XF=[1, 1, 1, 1, 1, 1, 1, 1, 1, 1]
                SoilCrop WheatSoil
                  LL=[0.14, 0.185, 0.21, 0.217, 0.227, 0.239, 0.25, 0.261, 0.276, 0.292]
                  KL=[0.06, 0.06, 0.06, 0.055, 0.048, 0.04, 0.032, 0.024, 0.014, 0.003]
                  XF=[1, 1, 1, 1, 1, 1, 1, 1, 1, 1]
                SoilCrop TeffSoil
                  LL=[0.14, 0.185, 0.21, 0.217, 0.227, 0.239, 0.25, 0.261, 0.276, 0.292]
                  KL=[0.06, 0.06, 0.06, 0.055, 0.048, 0.04, 0.032, 0.024, 0.014, 0.003]
                  XF=[1, 1, 1, 1, 1, 1, 1, 1, 1, 1]
                SoilCrop SugarcaneSoil
                  LL=[0.14, 0.185, 0.21, 0.214, 0.22, 0.227, 0.233, 0.24, 0.248, 0.258]
                  KL=[0.06, 0.06, 0.06, 0.057, 0.053, 0.048, 0.044, 0.039, 0.033, 0.027]
                  XF=[1, 1, 1, 1, 1, 1, 1, 1, 1, 1]
                SoilCrop MaizeSoil
                  LL=[0.14, 0.185, 0.21, 0.217, 0.227, 0.239, 0.25, 0.261, 0.276, 0.292]
                  KL=[0.06, 0.06, 0.06, 0.055, 0.048, 0.04, 0.032, 0.024, 0.014, 0.003]
                  XF=[1, 1, 1, 1, 1, 1, 1, 1, 1, 1]
                SoilCrop SoybeanSoil
                  LL=[0.14, 0.185, 0.21, 0.217, 0.227, 0.239, 0.25, 0.261, 0.276, 0.292]
                  KL=[0.06, 0.06, 0.06, 0.055, 0.048, 0.04, 0.032, 0.024, 0.014, 0.003]
                  XF=[1, 1, 1, 1, 1, 1, 1, 1, 1, 1]
                SoilCrop OilPalmSoil
                  LL=[0.14, 0.185, 0.21, 0.214, 0.22, 0.227, 0.233, 0.24, 0.248, 0.258]
                  KL=[0.06, 0.06, 0.06, 0.057, 0.053, 0.048, 0.044, 0.039, 0.033, 0.027]
                  XF=[1, 1, 1, 1, 1, 1, 1, 1, 1, 1]
                SoilCrop CassavaSoil
                  LL=[0.14, 0.185, 0.21, 0.217, 0.227, 0.239, 0.25, 0.261, 0.276, 0.292]
                  KL=[0.06, 0.06, 0.06, 0.055, 0.048, 0.04, 0.032, 0.024, 0.014, 0.003]
                  XF=[1, 1, 1, 1, 1, 1, 1, 1, 1, 1]
                SoilCrop PlantainForageSoil
                  LL=[0.14, 0.185, 0.21, 0.214, 0.22, 0.227, 0.233, 0.24, 0.248, 0.258]
                  KL=[0.06, 0.06, 0.06, 0.057, 0.053, 0.048, 0.044, 0.039, 0.033, 0.027]
                  XF=[1, 1, 1, 1, 1, 1, 1, 1, 1, 1]
                SoilCrop SunflowerSoil
                  LL=[0.14, 0.191, 0.224, 0.232, 0.24, 0.25, 0.26, 0.27, 0.283, 0.295]
                  KL=[0.1, 0.093, 0.084, 0.075, 0.065, 0.053, 0.041, 0.029, 0.015, 0.001]
                  XF=[1, 1, 1, 1, 1, 1, 1, 1, 1, 1]
                SoilCrop CanolaSoil
                  LL=[0.14, 0.185, 0.21, 0.217, 0.227, 0.239, 0.25, 0.261, 0.276, 0.292]
                  KL=[0.06, 0.06, 0.06, 0.055, 0.048, 0.04, 0.032, 0.024, 0.014, 0.003]
                  XF=[1, 1, 1, 1, 1, 1, 1, 1, 1, 1]
                SoilCrop SorghumSoil
                  LL=[0.14, 0.185, 0.21, 0.215, 0.223, 0.231, 0.24, 0.249, 0.259, 0.272]
                  KL=[0.07, 0.07, 0.07, 0.066, 0.06, 0.053, 0.045, 0.039, 0.03, 0.019]
                  XF=[1, 1, 1, 1, 1, 1, 1, 1, 1, 1]
                SoilCrop MilletSoil
                  LL=[0.14, 0.185, 0.21, 0.215, 0.223, 0.231, 0.24, 0.249, 0.259, 0.272]
                  KL=[0.07, 0.07, 0.07, 0.066, 0.06, 0.053, 0.045, 0.039, 0.03, 0.019]
                  XF=[1, 1, 1, 1, 1, 1, 1, 1, 1, 1]
                SoilCrop PeanutSoil
                  LL=[0.14, 0.185, 0.21, 0.21, 0.217, 0.231, 0.246, 0.26, 0.278, 0.294]
                  KL=[0.06, 0.06, 0.06, 0.06, 0.055, 0.045, 0.035, 0.025, 0.012, 0.001]
                  XF=[1, 1, 1, 1, 1, 1, 1, 1, 1, 1]
                SoilCrop BarleySoil
                  LL=[0.14, 0.185, 0.21, 0.216, 0.225, 0.235, 0.245, 0.255, 0.268, 0.283]
                  KL=[0.07, 0.07, 0.07, 0.065, 0.058, 0.049, 0.041, 0.033, 0.023, 0.01]
                  XF=[1, 1, 1, 1, 1, 1, 1, 1, 1, 1]
                SoilCrop CottonSoil
                  LL=[0.14, 0.185, 0.21, 0.21, 0.21, 0.215, 0.224, 0.234, 0.246, 0.26]
                  KL=[0.1, 0.1, 0.1, 0.1, 0.1, 0.094, 0.083, 0.072, 0.058, 0.042]
                  XF=[1, 1, 1, 1, 1, 1, 1, 1, 1, 1]
                SoilCrop OatsSoil
                  LL=[0.14, 0.185, 0.21, 0.217, 0.227, 0.239, 0.25, 0.261, 0.276, 0.292]
                  KL=[0.06, 0.06, 0.06, 0.055, 0.048, 0.04, 0.032, 0.024, 0.014, 0.003]
                  XF=[1, 1, 1, 1, 1, 1, 1, 1, 1, 1]
                SoilCrop ChickpeaSoil
                  LL=[0.14, 0.185, 0.21, 0.21, 0.217, 0.23, 0.243, 0.256, 0.272, 0.291]
                  KL=[0.06, 0.06, 0.06, 0.06, 0.055, 0.046, 0.037, 0.028, 0.016, 0.003]
                  XF=[1, 1, 1, 1, 1, 1, 1, 1, 1, 1]
                SoilCrop MungbeanSoil
                  LL=[0.14, 0.185, 0.21, 0.213, 0.227, 0.244, 0.261, 0.278, 0.294, 0.295]
                  KL=[0.06, 0.06, 0.06, 0.058, 0.048, 0.036, 0.024, 0.012, 0.001, 0]
                  XF=[1, 1, 1, 1, 1, 1, 1, 1, 1, 0]
                SoilCrop Pigeon PeaSoil
                  LL=[0.14, 0.185, 0.21, 0.21, 0.217, 0.231, 0.246, 0.26, 0.278, 0.294]
                  KL=[0.06, 0.06, 0.06, 0.06, 0.055, 0.045, 0.035, 0.025, 0.012, 0.001]
                  XF=[1, 1, 1, 1, 1, 1, 1, 1, 1, 1]
                SoilCrop CowpeaSoil
                  LL=[0.14, 0.185, 0.21, 0.217, 0.227, 0.239, 0.25, 0.261, 0.276, 0.292]
                  KL=[0.06, 0.06, 0.06, 0.055, 0.048, 0.04, 0.032, 0.024, 0.014, 0.003]
                  XF=[1, 1, 1, 1, 1, 1, 1, 1, 1, 1]
                SoilCrop FababeanSoil
                  LL=[0.14, 0.185, 0.21, 0.21, 0.212, 0.222, 0.234, 0.247, 0.262, 0.28]
                  KL=[0.08, 0.08, 0.08, 0.08, 0.079, 0.069, 0.057, 0.046, 0.031, 0.014]
                  XF=[1, 1, 1, 1, 1, 1, 1, 1, 1, 1]
                SoilCrop LucerneSoil
                  LL=[0.14, 0.185, 0.21, 0.21, 0.21, 0.21, 0.21, 0.211, 0.22, 0.231]
                  KL=[0.1, 0.1, 0.1, 0.1, 0.1, 0.1, 0.1, 0.099, 0.089, 0.075]
                  XF=[1, 1, 1, 1, 1, 1, 1, 1, 1, 1]
                SoilCrop LupinSoil
                  LL=[0.14, 0.185, 0.21, 0.217, 0.227, 0.239, 0.25, 0.261, 0.276, 0.292]
                  KL=[0.06, 0.06, 0.06, 0.055, 0.048, 0.04, 0.032, 0.024, 0.014, 0.003]
                  XF=[1, 1, 1, 1, 1, 1, 1, 1, 1, 1]
                SoilCrop LentilSoil
                  LL=[0.14, 0.185, 0.21, 0.217, 0.227, 0.239, 0.25, 0.261, 0.276, 0.292]
                  KL=[0.06, 0.06, 0.06, 0.055, 0.048, 0.04, 0.032, 0.024, 0.014, 0.003]
                  XF=[1, 1, 1, 1, 1, 1, 1, 1, 1, 1]
                SoilCrop TriticaleSoil
                  LL=[0.14, 0.185, 0.216, 0.228, 0.241, 0.257, 0.272, 0.288, 0.296, 0.295]
                  KL=[0.07, 0.07, 0.065, 0.056, 0.045, 0.032, 0.019, 0.006, 0, 0]
                  XF=[1, 1, 1, 1, 1, 1, 1, 1, 0, 0]
                SoilCrop EucalyptusSoil
                  LL=[0.14, 0.185, 0.21, 0.211, 0.211, 0.212, 0.213, 0.214, 0.215, 0.216]
                  KL=[0.08, 0.08, 0.08, 0.079, 0.079, 0.078, 0.077, 0.076, 0.075, 0.074]
                  XF=[1, 1, 1, 1, 1, 1, 1, 1, 1, 1]
                SoilCrop GliricidiaSoil
                  LL=[0.14, 0.185, 0.21, 0.211, 0.213, 0.214, 0.216, 0.218, 0.22, 0.223]
                  KL=[0.08, 0.08, 0.08, 0.079, 0.077, 0.076, 0.074, 0.072, 0.07, 0.068]
                  XF=[1, 1, 1, 1, 1, 1, 1, 1, 1, 1]
                SoilCrop PinusSoil
                  LL=[0.14, 0.185, 0.21, 0.217, 0.227, 0.239, 0.25, 0.261, 0.276, 0.292]
                  KL=[0.06, 0.06, 0.06, 0.055, 0.048, 0.04, 0.032, 0.024, 0.014, 0.003]
                  XF=[1, 1, 1, 1, 1, 1, 1, 1, 1, 1]
              WaterBalance SoilWater: SummerDate=1-nov; SummerU=6; SummerCona=6; WinterDate=1-apr; WinterU=2; WinterCona=2; DiffusConst=20220.89; DiffusSlope=-8.84; Salb=0.13; CN2Bare=68; CNRed=20; CNCov=0; DischargeWidth=5; CatchmentArea=10; PSIDul=-100; Thickness=[150, 150, 150, 150, 200, 200, 200, 200, 300, 300]
                SWCON=[0.422, 0.234, 0.133, 0.13, 0.108, 0.122, 0.129, 0.129, 0.091, 0.091]
              Organic: FOMCNRatio=40; CarbonUnits=Total
                Thickness  Carbon  SoilCNRatio  FBiom  FInert  FOM
                150        3       12           0.04   0.1     48.5152
                150        2       12           0.031  0.2     38.7402
                150        1       12           0.014  0.3     30.9347
                150        0.68    12           0.01   0.4     24.7018
                200        0.583   12           0.01   0.5     18.2996
                200        0.577   12           0.01   0.6     13.5566
                200        0.54    12           0.01   1       10.043
                200        0.473   12           0.01   1       7.44005
                300        0.389   12           0.01   1       4.74398
                300        0.288   12           0.01   1       3.0249
              Chemical: Thickness=[150, 150, 150, 150, 200, 200, 200, 200, 300, 300]; PH=[6.87, 7.1, 7.28, 7.42, 7.53, 7.58, 7.6, 7.6, 7.6, 7.6]; PHUnits=Water
              Nutrient
              Solute NO3: Thickness=[150, 150, 150, 150, 200, 200, 200, 200, 300, 300]; InitialValues=[0, 0, 0, 0, 0, 0, 0, 0, 0, 0]; InitialValuesUnits=ppm; WaterTableConcentration=0; D0=0; DepthConstant=0; MaxDepthSoluteAccessible=0; RunoffEffectivenessAtMovingSolute=0; MaxEffectiveRunoff=0
              Solute NH4: same as Validation.Temperate.FSA704.FSA704.Plantation.Synthetic Soil Derived from ISRIC SoilGrids.NO3
              Solute Urea: Thickness=[150, 150, 150, 150, 200, 200, 200, 200, 300, 300]; InitialValues=[0, 0, 0, 0, 0, 0, 0, 0, 0, 0]; InitialValuesUnits=kg/ha; WaterTableConcentration=0; D0=0; DepthConstant=0; MaxDepthSoluteAccessible=0; RunoffEffectivenessAtMovingSolute=0; MaxEffectiveRunoff=0
              SoilTemperature Temperature: InteractionsPerDay=8
            Irrigation
            Fertiliser
            SurfaceOrganicMatter: InitialResidueName=Pinus; InitialResidueType=Eucalyptus; InitialResidueMass=1000; InitialStandingFraction=0; InitialCPR=0; InitialCNR=40
            MicroClimate: a_interception=0; b_interception=1; c_interception=0.45; d_interception=0; SoilHeatFluxFraction=0; MinimumHeightDiffForNewLayer=0; NightInterceptionFraction=0; ReferenceHeight=2
            Plant Pinus
            Manager TreeSowingRule: same as Validation.Temperate.FSA703A.FSA703A.Plantation.TreeSowingRule
            Manager Fertilise on fixed dates
              FertiliserType = NH4N
              FertiliserDates = 24-aug
              Amount = 10
              AmountType = False
```csharp
using Models.Soils;
using System;
using Models.Core;
using Models.PMF;
using APSIM.Shared.Utilities;
namespace Models
{
    [Serializable]
    public class Script : Model
    {
        [Link] Clock Clock;
        [Link] Fertiliser Fertiliser;
        
        [Separator("A component to apply fertiliser on one or more dates on every year of the simulation")]

        [Description("Type of fertiliser to apply? ")] 
        [Display(Type = DisplayType.FertiliserType)]public string FertiliserType { get; set; }

        [Description("Enter the fertilisation dates as dd-mmm with comma separation (any year information entered will be ignored): ")] 
        public string[] FertiliserDates { get; set; } 

        [Description("Amount of fertiliser to be applied (kg /ha)")] 
        public double Amount { get; set; }

        [Description("Is the above amount to be applied each time? (yes/ticked)? Or is it the total annual amount across all dates (no/unticked)")] 
        public bool AmountType { get; set; }
        
        [EventSubscribe("DoManagement")]
        private void OnDoManagement(object sender, EventArgs e)
        {
            foreach (string ddMMM in FertiliserDates)
            {
                if (DateUtilities.DatesEqual(ddMMM, Clock.Today))
                {
                    if (AmountType)
                        Fertiliser.Apply(amount: Amount, type: FertiliserType);
                    else
                        Fertiliser.Apply(amount: Amount / FertiliserDates.Length, type: FertiliserType);
                }
            }
        }
    }
}
```
            Manager TreeThinning: same as Validation.Temperate.BFG.BF.BFG.Plantation.TreeThinning
            Operations Management
              1948-05-15  [TreeThinning].Script.DoThin(0.02429);
              1952-05-15  [TreeThinning].Script.DoThin(0.30015);
              1955-05-15  [TreeThinning].Script.DoThin(0.01255);
              1957-05-15  [TreeThinning].Script.DoThin(0.47881);
              1959-05-15  [TreeThinning].Script.DoThin(0.02642);
              1964-05-15  [TreeThinning].Script.DoThin(0.33403);
              1966-05-15  [TreeThinning].Script.DoThin(0.04075);
              1969-05-15  [TreeThinning].Script.DoThin(0.30392);
              1976-05-15  [TreeThinning].Script.DoThin(0.31455);
              1981-05-15  [TreeThinning].Script.DoThin(0.36301);
              1994-05-15  [TreeThinning].Script.DoThin(0.43011);
            Report: same as Validation.Temperate.FSA703A.FSA703A.Plantation.Report
            Report AnnualReport: EventNames=[Clock].EndOfYear
              VariableNames:
                [Clock].Today
                ([Nutrient].MineralisedN[1]+[Nutrient].MineralisedN[2]+[Nutrient].MineralisedN[3])*10 as NNMkg45cmAnnual
      Folder Puruki
        Memo
          These data are from one plot at a highly productive site in New Zealand. Studies at the site included physiology and growth, nutrition, soils and hydrology, which were published. This site was of particular interest for this validation because it had high nutrient availability and high rainfall, and it was well-published. Publications drawn on were [#rijkse1974soils], [#beets1987puruki], [#beets1987uptake], [#beets1987specific], [#beets1987accumulation], [#dyck1987nitrogen], [#beets1996carbon], [#parfitt_nitrogen_2006], [#kimberley2007national], [#oliver2004variation], [#beets2007root], [#beets2011planted], [#beets2018carbon], Beets et al (2018 Puruki field trip - a productive ex-pasture site DOI:10.13140/RG.2.2.16726.50243), [#garrett2019national], and [#beets2020soil].
        Experiment Puruk
          Factors
            Factor i: Specification=[Operations]
              Operations Inviolate
                1973-07-15  [TreeThinning].Script.DoThin(0.05);
                1975-07-15  [TreeThinning].Script.DoThin(0.11);
                1976-07-15  [TreeThinning].Script.DoThin(0.02);
                1977-07-15  [TreeThinning].Script.DoThin(0.003);
                1978-07-15  [TreeThinning].Script.DoThin(0.00);
                1979-07-15  [TreeThinning].Script.DoThin(0.01);
                1980-07-15  [TreeThinning].Script.DoThin(0.003);
                1981-07-15  [TreeThinning].Script.DoThin(0.016);
                1982-07-15  [TreeThinning].Script.DoThin(0.067);
                1983-07-15  [TreeThinning].Script.DoThin(0.060);
                1984-07-15  [TreeThinning].Script.DoThin(0.021);
                1985-07-15  [TreeThinning].Script.DoThin(0.037);
                1985-07-15  [TreeThinning].Script.DoThin(0.00);
              Operations Tahi
                1973-07-15  [TreeThinning].Script.DoThin(0.05);
                1975-07-15  [TreeThinning].Script.DoThin(0.113);
                1976-07-15  [TreeThinning].Script.DoThin(0.005);
                1977-07-15  [TreeThinning].Script.DoThin(0);
                1978-07-15  [TreeThinning].Script.DoThin(0.005);
                1979-07-15  [TreeThinning].Script.DoThin(0);
                1979-07-15  [TreeThinning].Script.DoThin(0.746);
                1980-07-15  [TreeThinning].Script.DoThin(0);
                1981-07-15  [TreeThinning].Script.DoThin(0);
                1982-07-15  [TreeThinning].Script.DoThin(0);
                1983-07-14  [TreeThinning].Script.DoThin(0);
                1983-07-15  [TreeThinning].Script.DoThin(0.679);
                1984-07-15  [TreeThinning].Script.DoThin(0.019);
                1985-07-15  [TreeThinning].Script.DoThin(0);
          Simulation Puruki
            Weather: FileName=Puruki1971-2020.met
            Clock: Start=1973-05-01; End=1999-07-16
            Summary
            SoilArbitrator Soil Arbitrator
            Zone Plantation: Area=1; Slope=0; AspectAngle=0; Altitude=50
              Soil SynthSoilPuruki: ASCOrder=NA; ASCSubOrder=NA; SoilType=Aluandic Andosols; Site=NA; NearestTown=NA; Region=NA; State=NA; Country=New Zealand; NaturalVegetation=NA; ApsoilNumber=9999; Latitude=-38.375; Longitude=176.125; LocationAccuracy=+- 250 m; YearOfSampling=2019; DataSource=ISRIC SoilGrids
                Physical
                  Thickness  ParticleSizeSand  ParticleSizeSilt  ParticleSizeClay  BD     AirDry  LL15   DUL    SAT
                  80         38.7              33.7              27.7              0.589  0.096   0.288  0.46   0.615
                  110        37                31.5              31.5              0.61   0.093   0.28   0.439  0.58
                  90         35.8              29.2              34.8              0.5    0.093   0.28   0.433  0.565
                  120        35.2              27.8              36.2              0.79   0.093   0.28   0.428  0.555
                  200        35.2              27.3              37.2              0.82   0.092   0.278  0.421  0.545
                  110        35.8              27.8              37.8              0.9    0.091   0.273  0.41   0.535
                  290        36                27.9              37.9              0.9    0.09    0.27   0.405  0.53
                  200        36                27.7              37.7              0.9    0.09    0.27   0.405  0.53
                  90         36                27.5              37.5              0.9    0.09    0.27   0.405  0.53
                  110        36                27.2              37.1              0.9    0.09    0.27   0.405  0.53
                  SoilCrop PinusSoil
                    LL=[0.288, 0.28, 0.28, 0.28, 0.278, 0.273, 0.27, 0.27, 0.27, 0.27]
                    KL=[0.06, 0.06, 0.06, 0.055, 0.048, 0.04, 0.032, 0.024, 0.014, 0.003]
                    XF=[1, 1, 1, 1, 1, 0.9, 0.4, 0.1, 0.05, 0.01]
                Water: Thickness=[80, 110, 90, 120, 200, 110, 290, 200, 90, 110]; FilledFromTop=false
                  InitialValues=[0.3912, 0.3754, 0.3718, 0.3688, 0.3638, 0.3552, 0.351, 0.351, 0.351, 0.351]
                WaterBalance SoilWater: SummerDate=1-nov; SummerU=6; SummerCona=6; WinterDate=1-apr; WinterU=2; WinterCona=2; DiffusConst=599.26; DiffusSlope=12.09; Salb=0.13; CN2Bare=65; CNRed=20; CNCov=20; PSIDul=-100; Thickness=[80, 110, 90, 120, 200, 110, 290, 200, 90, 110]; SWCON=[0.9, 0.9, 0.8, 0.8, 0.8, 0.7, 0.6, 0.5, 0.4, 0.3]
                Organic: FOMCNRatio=40; CarbonUnits=Total
                  Thickness  Carbon  SoilCNRatio  FBiom  FInert  FOM
                  80         7.5     15           0.03   0.05    24.2576
                  110        6.5     15           0.03   0.1     19.3701
                  90         3.5     14           0.03   0.2     15.4673
                  120        2       14           0.02   0.2     12.3509
                  200        1       14           0.02   0.2     9.14978
                  110        0.7     14           0.02   0.2     6.77832
                  290        0.4     14           0.02   0.2     5.02151
                  200        0.4     14           0.01   0.2     3.72002
                  90         0.2     13           0.01   0.2     2.37199
                  110        0.1     13           0.01   0.2     1.51245
                Chemical: Thickness=[80, 110, 90, 120, 200, 110, 290, 200, 90, 110]; PH=[5, 5.4, 5.8, 5.8, 6, 5.8, 6.5, 6.7, 6.4, 6.4]; PHUnits=Water
                Nutrient
                Solute NO3: Thickness=[80, 110, 90, 120, 200, 110, 290, 200, 90, 110]; InitialValues=[20, 10, 5, 2, 0, 0, 0, 0, 0, 0]; InitialValuesUnits=ppm; WaterTableConcentration=0; D0=0; DepthConstant=0; MaxDepthSoluteAccessible=0; RunoffEffectivenessAtMovingSolute=0; MaxEffectiveRunoff=0
                Solute NH4: same as Validation.Temperate.Puruki.Puruk.Puruki.Plantation.SynthSoilPuruki.NO3
                Solute Urea: Thickness=[80, 110, 90, 120, 200, 110, 290, 200, 90, 110]; InitialValues=[0, 0, 0, 0, 0, 0, 0, 0, 0, 0]; InitialValuesUnits=kg/ha; WaterTableConcentration=0; D0=0; DepthConstant=0; MaxDepthSoluteAccessible=0; RunoffEffectivenessAtMovingSolute=0; MaxEffectiveRunoff=0
                SoilTemperature CERESSoilTemperature: InteractionsPerDay=8
              Fertiliser
              Irrigation
              SurfaceOrganicMatter: InitialResidueName=Pinus; InitialResidueType=pasture; InitialResidueMass=1000; InitialStandingFraction=0; InitialCPR=0; InitialCNR=40
              MicroClimate: a_interception=0; b_interception=1; c_interception=0.45; d_interception=0; SoilHeatFluxFraction=0; MinimumHeightDiffForNewLayer=0; NightInterceptionFraction=0; ReferenceHeight=2
              Manager NinputsNonSymbioticRainRhizosphere
                FertiliserType = NH4N
                FertiliserDates = 24-sep
                Amount = 0
                AmountType = True
                script: same as in Validation.Temperate.FSA704.FSA704.Plantation.Fertilise on fixed dates
              Manager TreeSowingRule
                RowSpace = 1.8
                RowWidth = 2.4
                CultivarName = GF7
                SowingDate = 06/16/1973 00:00:00
                script: same as in Validation.Temperate.BFG.BF.BFG.Plantation.TreeSowingRule
              Manager TreeThinning: same as Validation.Temperate.BFG.BF.BFG.Plantation.TreeThinning
              Operations Management
              Report: same as Validation.Temperate.FSA703A.FSA703A.Plantation.Report
              Plant Pinus
              Report AnnualReport: EventNames=[Clock].EndOfYear
                VariableNames:
                  [Clock].Today
                  ([Nutrient].MineralisedN[1]+[Nutrient].MineralisedN[2]+[Nutrient].MineralisedN[3])*10 as NNMkg45cmAnnual
      Folder TowerHill
        Memo
          These data are from an experiment with ferilizer on very shallow soils with moderate rainfall. Substantial rates of accumulated N applications changed the C-N dynamics of the site and stand growth. Data were reported in [#neilsen1992growth]  and [#neilsen1998implications], and some details were checked in the original files with permission of the current manager of the site (Sustainable Timber Tasmania).
        Experiment TowerHil
          Factors
            Factor l: Specification=[Management]
              Operations C
                1963-07-15  [TreeThinning].Script.DoThin(0.10);
                1964-07-15  [TreeThinning].Script.DoThin(0.10);
                1965-07-15  [TreeThinning].Script.DoThin(0.10);
                1966-07-15  [TreeThinning].Script.DoThin(0.10);
                1967-07-15  [TreeThinning].Script.DoThin(0.10);
                1968-07-15  [TreeThinning].Script.DoThin(0.10);
                1969-07-15  [TreeThinning].Script.DoThin(0.06);
                1970-07-15  [TreeThinning].Script.DoThin(0.06);
                1971-07-15  [TreeThinning].Script.DoThin(0.05);
                1972-07-15  [TreeThinning].Script.DoThin(0.03);
                1973-07-15  [TreeThinning].Script.DoThin(0.03);
              Operations N
                1963-07-15  [TreeThinning].Script.DoThin(0.10);
                1964-07-15  [TreeThinning].Script.DoThin(0.10);
                1965-07-15  [TreeThinning].Script.DoThin(0.10);
                1966-07-15  [TreeThinning].Script.DoThin(0.10);
                1967-07-15  [TreeThinning].Script.DoThin(0.10);
                1968-07-15  [TreeThinning].Script.DoThin(0.10);
                1969-07-15  [TreeThinning].Script.DoThin(0.06);
                1970-07-15  [TreeThinning].Script.DoThin(0.06);
                1971-07-15  [TreeThinning].Script.DoThin(0.05);
                1972-07-15  [TreeThinning].Script.DoThin(0.03);
                1973-07-15  [TreeThinning].Script.DoThin(0.03);
                1978-05-31  [Fertiliser].Apply(amount: 116.6, type: "UreaN", 0);
                1979-05-31  [Fertiliser].Apply(amount: 116.6, type: "UreaN", 0);
                1980-05-31  [Fertiliser].Apply(amount: 116.6, type: "UreaN", 0);
                1981-05-31  [Fertiliser].Apply(amount: 116.6, type: "UreaN", 0);
                1982-05-31  [Fertiliser].Apply(amount: 116.6, type: "UreaN", 0);
                1983-05-31  [Fertiliser].Apply(amount: 116.6, type: "UreaN", 0);
                1984-05-31  [Fertiliser].Apply(amount: 116.6, type: "UreaN", 0);
                1985-05-31  [Fertiliser].Apply(amount: 116.6, type: "UreaN", 0);
                1986-05-31  [Fertiliser].Apply(amount: 116.6, type: "UreaN", 0);
                1987-05-31  [Fertiliser].Apply(amount: 106, type: "NH4N", 0);
                1988-05-31  [Fertiliser].Apply(amount: 106, type: "NH4N", 0);
                1989-05-31  [Fertiliser].Apply(amount: 106, type: "NH4N", 0);
                1990-05-31  [Fertiliser].Apply(amount: 106, type: "NH4N", 0);
          Simulation TowerHill
            Weather: FileName=TowerHill1900-2020SiloDataDrillModified.met
            Clock: Start=1962-05-01; End=1996-06-15
            Summary
            SoilArbitrator Soil Arbitrator
            Zone Plantation: Area=1; Slope=0; AspectAngle=0; Altitude=50
              Soil SynthSoilTowerHill: ASCOrder=NA; ASCSubOrder=NA; SoilType=Loam over Silty Clay Loam; Site=37835_41892; NearestTown=FINGAL; Region=Ben Lomond; State=Tasmania; NaturalVegetation=Unknown; ApsoilNumber=9999; Latitude=-41.53; Longitude=147.91; LocationAccuracy=+- 90m; YearOfSampling=2020; Comments=Landuse is Production forestry
                DataSource=Soil and Landscape Grid of Australia. This soil parameter file was automatically generated from the GSM National Surfaces using pedotransfer functions.
                Physical
                  Thickness  BD       AirDry     LL15  DUL   SAT
                  150        1.10997  0.084849   0.12  0.28  0.32
                  150        1.22277  0.0709009  0.12  0.28  0.32
                  150        1.26144  0.0694074  0.12  0.28  0.32
                  150        1.27389  0.0668064  0.2   0.28  0.32
                  200        1.29472  0.0670742  0.24  0.27  0.29
                  200        1.31838  0.0682572  0.24  0.27  0.28
                  SoilCrop PinusSoil: LL=[0.15, 0.15, 0.15, 0.2, 0.24, 0.24]; KL=[0.06, 0.05, 0.01, 0.01, 0.01, 0.01]; XF=[1, 1, 0, 0, 0, 0]
                WaterBalance SoilWater: SummerDate=1-nov; SummerU=4; SummerCona=4; WinterDate=1-apr; WinterU=2; WinterCona=2; DiffusConst=80.1935; DiffusSlope=29.01; Salb=0.13; CN2Bare=60; CNRed=20; CNCov=0; PSIDul=-100; Thickness=[150, 150, 150, 150, 200, 200]; SWCON=[0.5, 0.5, 0.31656, 0.250234, 0.197591, 0.20995]
                Water: Thickness=[150, 150, 150, 150, 200, 200]; InitialValues=[0.28, 0.28, 0.248, 0.2, 0.24, 0.24]; FilledFromTop=true
                Organic: FOMCNRatio=40; CarbonUnits=Total
                  Thickness  Carbon  SoilCNRatio  FBiom    FInert  FOM
                  150        3.9     19           0.02     0.4     475.475
                  150        2.6     19           0.02     0.6     303.176
                  150        0.01    20           0.01404  1       193.314
                  150        0.01    18           0.01     1       123.262
                  200        0.01    18           0.01     1       67.6477
                  200        0.01    18           0.01     1       37.1259
                Chemical: Thickness=[150, 150, 150, 150, 200, 200]; PH=[5.29731, 5.25219, 5.28237, 5.35428, 5.46188, 5.53903]; PHUnits=Water
                Nutrient
                Solute NO3: Thickness=[150, 150, 150, 150, 200, 200]; InitialValues=[0, 0, 0, 0, 0, 0]; InitialValuesUnits=ppm; WaterTableConcentration=0; D0=0; DepthConstant=0; MaxDepthSoluteAccessible=0; RunoffEffectivenessAtMovingSolute=0; MaxEffectiveRunoff=0
                Solute NH4: same as Validation.Temperate.TowerHill.TowerHil.TowerHill.Plantation.SynthSoilTowerHill.NO3
                Solute Urea: Thickness=[150, 150, 150, 150, 200, 200]; InitialValues=[0, 0, 0, 0, 0, 0]; InitialValuesUnits=kg/ha; WaterTableConcentration=0; D0=0; DepthConstant=0; MaxDepthSoluteAccessible=0; RunoffEffectivenessAtMovingSolute=0; MaxEffectiveRunoff=0
                SoilTemperature CERESSoilTemperature: InteractionsPerDay=8
              Irrigation
              Fertiliser
              SurfaceOrganicMatter: InitialResidueName=Pinus; InitialResidueType=Eucalyptus; InitialResidueMass=1000; InitialStandingFraction=0; InitialCPR=0; InitialCNR=40
              MicroClimate: a_interception=0; b_interception=1; c_interception=0.45; d_interception=0; SoilHeatFluxFraction=0; MinimumHeightDiffForNewLayer=0; NightInterceptionFraction=0; ReferenceHeight=2
              Manager TreeSowingRule
                RowSpace = 2.4384
                RowWidth = 2.7432
                CultivarName = TowerHill
                SowingDate = 06/16/1962 00:00:00
                script: same as in Validation.Temperate.BFG.BF.BFG.Plantation.TreeSowingRule
              Manager TreeThinning: same as Validation.Temperate.BFG.BF.BFG.Plantation.TreeThinning
              Operations Management
              Report: same as Validation.Temperate.FSA703A.FSA703A.Plantation.Report
              Plant Pinus
              Report AnnualReport: EventNames=[Clock].EndOfYear
                VariableNames:
                  [Clock].Today
                  ([Nutrient].MineralisedN[1]+[Nutrient].MineralisedN[2]+[Nutrient].MineralisedN[3])*10 as NNMkg45cmAnnual
      Folder GraphsOvP
        Memo
          Test! These observed versus predicted graphs include all validation datasets and timesteps within a site for which observed data were available.
      Folder SilverCr
        Memo
          These data are from two plots of contrasting thinning regimes in a reasonably high rainfall area of Gippsland, Victoria, Australia. These plots were of particular interest for this validation because there are published biomass and N content data at reasonably old ages, i.e. 20 and 24 years. Publications drawn on were [#BAKER1983205], [#BAKER198541] and [#BAKER1985309].
        Experiment SilverCr
          Factors
            CompositeFactor PradII
              Specifications:
                [Clock]
                [Weather]
                [Soil]
                [TreeSowingRule]
                [Management]
              Clock: Start=1956-05-01; End=1981-07-16
              Weather: FileName=SilverCreekPradII.met
              Soil Synthetic Soil Derived from ISRIC SoilGrids1: ASCOrder=NA; ASCSubOrder=NA; SoilType=Haplic Cambisols; Site=NA; NearestTown=NA; Region=NA; State=NA; Country=Australia; NaturalVegetation=NA; ApsoilNumber=9999; Latitude=-38.375; Longitude=146.125; LocationAccuracy=+- 250 m; YearOfSampling=2019; DataSource=ISRIC SoilGrids
                Water: Thickness=[50, 150, 300, 100, 200, 200, 200, 200, 300, 300]; FilledFromTop=true
                  InitialValues=[0.232, 0.235, 0.245, 0.255, 0.258, 0.253, 0.25, 0.25, 0.25, 0.25]
                Physical
                  Thickness  ParticleSizeSand  ParticleSizeSilt  ParticleSizeClay  Rocks  BD     AirDry  LL15   DUL    SAT    KS
                  50         55.7              20                24.7              0      0.929  0.077   0.232  0.378  0.573  20.088
                  150        51.5              19                30                0      1.058  0.078   0.235  0.361  0.535  10.821
                  300        47                17.5              35.5              0      1.134  0.082   0.245  0.361  0.518  5.717
                  100        45                16.5              38.5              0      1.168  0.085   0.255  0.367  0.512  4.037
                  200        44                16                40.3              0      1.194  0.086   0.258  0.365  0.508  3.295
                  200        44                16                40.8              0      1.21   0.084   0.253  0.355  0.502  3.11
                  200        44                16                40.9              0      1.219  0.083   0.25   0.35   0.499  3.056
                  200        44                16                40.7              0      1.22   0.083   0.25   0.35   0.497  3.128
                  300        44                16                40.5              0      1.221  0.083   0.25   0.35   0.494  3.22
                  300        44                16                40.2              0      1.223  0.083   0.25   0.35   0.491  3.334
                  Rocks source: Calculated
                  SoilCrop PinusSoil
                    LL=[0.27, 0.27, 0.27, 0.28, 0.28, 0.28, 0.28, 0.29, 0.29, 0.29]
                    KL=[0.05, 0.05, 0.04, 0.04, 0.04, 0.04, 0.03, 0.02, 0.02, 0.02]
                    XF=[1, 1, 1, 1, 1, 1, 0, 0, 0, 0]
                WaterBalance SoilWater: SummerDate=1-nov; SummerU=6; SummerCona=6; WinterDate=1-apr; WinterU=2; WinterCona=2; DiffusConst=4195.86; DiffusSlope=2.75; Salb=0.13; CN2Bare=73; CNRed=20; CNCov=0; Thickness=[50, 150, 300, 100, 200, 200, 200, 200, 300, 300]
                  SWCON=[0.312, 0.245, 0.177, 0.145, 0.099, 0.092, 0.09, 0.092, 0.067, 0]
                Organic: FOMCNRatio=40; CarbonUnits=Total
                  Thickness  Carbon  SoilCNRatio  FBiom  FInert  FOM
                  50         7.46    26.1         0.06   0.05    1000
                  150        4.9     23.1         0.04   0.1     500
                  300        2.77    23.1         0.02   0.2     200
                  100        1.39    23.1         0.01   0.3     100
                  200        1.39    23.1         0.01   0.4     50
                  200        1.39    23.1         0.01   1       10.2
                  200        0.2     23.1         0.01   1       7.5
                  200        0.05    23.1         0.01   1       5.6
                  300        0.02    23.1         0.01   1       3.6
                  300        0.01    23.1         0.01   1       2.3
                Chemical: PHUnits=Water
                  Thickness  PH  CEC
                  50         6   22.95605
                  150        6   18.9845
                  300        6   18.1963
                  100        6   17.94525
                  200        6   17.8031
                  200        6   17.70485
                  200        6   17.60105
                  200        6   17.5162
                  300        6   17.42
                  300        6   17.2904
                  CEC source: Calculated
                Nutrient
                Solute NO3: Thickness=[50, 150, 300, 100, 200, 200, 200, 200, 300, 300]; InitialValues=[20, 10, 5, 2, 1, 0, 0, 0, 0, 0]; InitialValuesUnits=ppm; WaterTableConcentration=0; D0=0; DepthConstant=0; MaxDepthSoluteAccessible=0; RunoffEffectivenessAtMovingSolute=0; MaxEffectiveRunoff=0
                Solute NH4: same as Validation.Temperate.SilverCr.SilverCr.Factors.PradII.Synthetic Soil Derived from ISRIC SoilGrids1.NO3
                Solute Urea: Thickness=[50, 150, 300, 100, 200, 200, 200, 200, 300, 300]; InitialValues=[0, 0, 0, 0, 0, 0, 0, 0, 0, 0]; InitialValuesUnits=kg/ha; WaterTableConcentration=0; D0=0; DepthConstant=0; MaxDepthSoluteAccessible=0; RunoffEffectivenessAtMovingSolute=0; MaxEffectiveRunoff=0
                SoilTemperature Temperature: InteractionsPerDay=8
              Manager TreeSowingRule
                RowSpace = 1.979
                RowWidth = 3
                CultivarName = BFGCorrImpSCsla
                SowingDate = 06/15/1956 00:00:00
                script: same as in Validation.Temperate.BFG.BF.BFG.Plantation.TreeSowingRule
              Operations Management
                1958-06-15  [TreeThinning].Script.DoThin(0.10);
                1966-06-15  [TreeThinning].Script.DoThin(0.40);
                1976-06-15  [TreeThinning].Script.DoThin(0.3293);
            CompositeFactor PradV
              Specifications:
                [Clock]
                [Weather]
                [Soil]
                [TreeSowingRule]
                [Management]
              Clock: Start=1960-05-01; End=1981-07-16
              Weather: FileName=SilverCreekPradV.met
              Soil Synthetic Soil Derived from ISRIC SoilGrids: ASCOrder=NA; ASCSubOrder=NA; SoilType=Haplic Luvisols; Site=NA; NearestTown=NA; Region=NA; State=NA; Country=Australia; NaturalVegetation=NA; ApsoilNumber=9999; Latitude=-38.375; Longitude=146.375; LocationAccuracy=+- 250 m; YearOfSampling=2019; DataSource=ISRIC SoilGrids
                Water: Thickness=[50, 150, 300, 100, 200, 200, 200, 200, 300, 300]; FilledFromTop=true
                  InitialValues=[0.21, 0.22, 0.233, 0.237, 0.237, 0.233, 0.23, 0.23, 0.23, 0.23]
                Physical
                  Thickness  ParticleSizeSand  ParticleSizeSilt  ParticleSizeClay  Rocks  BD     AirDry  LL15   DUL    SAT    KS
                  50         60.3              18.7              21.5              0      0.941  0.07    0.21   0.352  0.568  29.005
                  150        55.5              17.5              27                0      1.069  0.073   0.22   0.343  0.53   15.325
                  300        51.5              16.5              32                0      1.118  0.077   0.233  0.348  0.518  8.58
                  100        50.5              15.5              34                0      1.136  0.079   0.237  0.353  0.512  6.804
                  200        49.8              15                35.2              0      1.151  0.079   0.237  0.351  0.51   5.885
                  200        49.2              15                35.8              0      1.163  0.077   0.233  0.342  0.51   5.554
                  200        49                15.1              35.9              0      1.171  0.077   0.23   0.338  0.509  5.458
                  200        49                15.3              35.7              0      1.174  0.077   0.23   0.34   0.507  5.586
                  300        49                15.6              35.5              0      1.178  0.077   0.23   0.342  0.505  5.75
                  300        49                15.8              35.2              0      1.183  0.077   0.23   0.345  0.501  5.954
                  Rocks source: Calculated
                  SoilCrop PinusSoil
                    LL=[0.23, 0.23, 0.23, 0.23, 0.23, 0.23, 0.23, 0.23, 0.23, 0.23]
                    KL=[0.05, 0.05, 0.04, 0.04, 0.04, 0.03, 0.03, 0.02, 0.02, 0.02]
                    XF=[1, 1, 1, 1, 1, 1, 1, 0, 0, 0]
                WaterBalance SoilWater: SummerDate=1-nov; SummerU=6; SummerCona=6; WinterDate=1-apr; WinterU=2; WinterCona=2; DiffusConst=4250.62; DiffusSlope=3.11; Salb=0.13; CN2Bare=73; CNRed=20; CNCov=0; Thickness=[50, 150, 300, 100, 200, 200, 200, 200, 300, 300]
                  SWCON=[0.349, 0.283, 0.218, 0.196, 0.143, 0.131, 0.128, 0.133, 0.099, 0.105]
                Organic: FOMCNRatio=40; CarbonUnits=Total
                  Thickness  Carbon  SoilCNRatio  FBiom  FInert  FOM
                  50         8       22           0.06   0.25    1000
                  150        6       22           0.04   0.35    7.5
                  300        5       22           0.02   0.45    1
                  100        3       22           0.01   0.55    1
                  200        2       22           0.01   1       1
                  200        1       22           0.01   1       1
                  200        0.2     22           0.01   1       1
                  200        0.05    22           0.01   1       1
                  300        0.02    22           0.01   1       1
                  300        0.01    22           0.01   1       1
                Chemical: PHUnits=Water
                  Thickness  PH   CEC
                  50         6    21.95085
                  150        6    18.276
                  300        6    17.77475
                  100        6    17.40925
                  200        6    17.1135
                  200        6    16.9185
                  200        6    16.7518
                  200        6    16.6489
                  300        6.1  16.5348
                  300        6.1  16.38265
                  CEC source: Calculated
                Nutrient
                Solute NO3: same as Validation.Temperate.SilverCr.SilverCr.Factors.PradII.Synthetic Soil Derived from ISRIC SoilGrids1.NO3
                Solute NH4: same as Validation.Temperate.SilverCr.SilverCr.Factors.PradII.Synthetic Soil Derived from ISRIC SoilGrids1.NO3
                Solute Urea: same as Validation.Temperate.SilverCr.SilverCr.Factors.PradII.Synthetic Soil Derived from ISRIC SoilGrids1.Urea
                SoilTemperature Temperature: InteractionsPerDay=8
              Manager TreeSowingRule
                RowSpace = 1.979
                RowWidth = 3
                CultivarName = BFGCorrImpSCsla
                SowingDate = 06/15/1960 00:00:00
                script: same as in Validation.Temperate.BFG.BF.BFG.Plantation.TreeSowingRule
              Operations Management
                1962-06-15  [TreeThinning].Script.DoThin(0.10);
                1964-06-15  [TreeThinning].Script.DoThin(0.07646);
                1978-11-15  [TreeThinning].Script.DoThin(0.05);
          Simulation SilverCrBase
            Clock: Start=1973-05-01; End=1999-07-16
            Weather: FileName=SilverCreekPradII.met
            Summary
            SoilArbitrator Soil Arbitrator
            Zone Plantation: Area=1; Slope=0; AspectAngle=0; Altitude=50
              Fertiliser
              SurfaceOrganicMatter: InitialResidueName=Pinus; InitialResidueType=pasture; InitialResidueMass=1000; InitialStandingFraction=0; InitialCPR=0; InitialCNR=40
              MicroClimate: a_interception=0; b_interception=1; c_interception=0.45; d_interception=0; SoilHeatFluxFraction=0; MinimumHeightDiffForNewLayer=0; NightInterceptionFraction=0; ReferenceHeight=2
              Manager TreeSowingRule
                RowSpace = 1.8
                RowWidth = 2.4
                CultivarName = BFGCorrImpSCsla
                SowingDate = 06/16/1973 00:00:00
                script: same as in Validation.Temperate.BFG.BF.BFG.Plantation.TreeSowingRule
              Manager TreeThinning: same as Validation.Temperate.BFG.BF.BFG.Plantation.TreeThinning
              Operations Management
              Report: same as Validation.Temperate.FSA703A.FSA703A.Plantation.Report
              Plant Pinus
              Report AnnualReport: EventNames=[Clock].EndOfYear
                VariableNames:
                  [Clock].Today
                  ([Nutrient].MineralisedN[1]+[Nutrient].MineralisedN[2]+[Nutrient].MineralisedN[3])*10 as NNMkg45cmAnnual
              Soil SynthSoilPuruki1: ASCOrder=NA; ASCSubOrder=NA; SoilType=Aluandic Andosols; Site=NA; NearestTown=NA; Region=NA; State=NA; Country=New Zealand; NaturalVegetation=NA; ApsoilNumber=9999; Latitude=-38.375; Longitude=176.125; LocationAccuracy=+- 250 m; YearOfSampling=2019; DataSource=ISRIC SoilGrids
                Physical
                  Thickness  ParticleSizeSand  ParticleSizeSilt  ParticleSizeClay  Rocks     BD     AirDry  LL15   DUL    SAT
                  80         38.7              33.7              27.7              0.149724  0.589  0.096   0.288  0.46   0.615
                  110        37                31.5              31.5              0.189859  0.61   0.093   0.28   0.439  0.58
                  90         35.8              29.2              34.8              0.251188  0.5    0.093   0.28   0.433  0.565
                  120        35.2              27.8              36.2              0.149757  0.79   0.093   0.28   0.428  0.555
                  200        35.2              27.3              37.2              0.15139   0.82   0.092   0.278  0.421  0.545
                  110        35.8              27.8              37.8              0.128879  0.9    0.091   0.273  0.41   0.535
                  290        36                27.9              37.9              0.13702   0.9    0.09    0.27   0.405  0.53
                  200        36                27.7              37.7              0.13702   0.9    0.09    0.27   0.405  0.53
                  90         36                27.5              37.5              0.13702   0.9    0.09    0.27   0.405  0.53
                  110        36                27.2              37.1              0.13702   0.9    0.09    0.27   0.405  0.53
                  Rocks source: Calculated
                  SoilCrop PinusSoil
                    LL=[0.35, 0.35, 0.35, 0.35, 0.35, 0.35, 0.35, 0.35, 0.35, 0.35]
                    KL=[0.05, 0.04, 0.04, 0.03, 0.03, 0.02, 0.02, 0.024, 0.014, 0.003]
                    XF=[1, 0.9, 0.8, 0.7, 0, 0, 0, 0, 0, 0]
                  SoilCrop EucalyptusSoil: same as Validation.Temperate.SilverCr.SilverCr.SilverCrBase.Plantation.SynthSoilPuruki1.Physical.PinusSoil
                  SoilCrop SCRUMSoil: same as Validation.Temperate.SilverCr.SilverCr.SilverCrBase.Plantation.SynthSoilPuruki1.Physical.PinusSoil
                  SoilCrop ChicorySoil: same as Validation.Temperate.SilverCr.SilverCr.SilverCrBase.Plantation.SynthSoilPuruki1.Physical.PinusSoil
                  SoilCrop BarleySoil: same as Validation.Temperate.SilverCr.SilverCr.SilverCrBase.Plantation.SynthSoilPuruki1.Physical.PinusSoil
                Water: Thickness=[80, 110, 90, 120, 200, 110, 290, 200, 90, 110]; FilledFromTop=false
                  InitialValues=[0.3912, 0.3754, 0.3718, 0.3688, 0.3638, 0.34698, 0.3024, 0.2781, 0.27405, 0.27081]
                WaterBalance SoilWater: SummerDate=1-nov; SummerU=6; SummerCona=6; WinterDate=1-apr; WinterU=2; WinterCona=2; DiffusConst=599.26; DiffusSlope=12.09; Salb=0.13; CN2Bare=65; CNRed=20; CNCov=20; PSIDul=-100; Thickness=[80, 110, 90, 120, 200, 110, 290, 200, 90, 110]; SWCON=[0.9, 0.9, 0.8, 0.8, 0.8, 0.7, 0.6, 0.6, 0.6, 0.6]
                Organic: FOMCNRatio=40; CarbonUnits=Total
                  Thickness  Carbon  SoilCNRatio  FBiom  FInert  FOM
                  80         7       10           0.06   0.1     2000
                  110        6       10           0.05   0.2     1000
                  90         3       10           0.04   0.3     500
                  120        2       10           0.02   0.4     200
                  200        1       10           0.02   0.5     100
                  110        0.5     10           0.02   1       50
                  290        0.2     10           0.02   1       10
                  200        0.2     10           0.01   1       3.7
                  90         0.2     10           0.01   1       2.4
                  110        0.2     10           0.01   1       1.5
                Chemical: PHUnits=Water
                  Thickness  PH   CEC
                  80         5    26.8638
                  110        5.4  25.5145
                  90         5.8  19.5652
                  120        5.8  16.5238
                  200        6    14.5408
                  110        5.8  14.0662
                  290        6.5  13.4313
                  200        6.7  13.3779
                  90         6.4  12.8745
                  110        6.4  12.5427
                  CEC source: Calculated
                Nutrient
                Solute NO3: same as Validation.Temperate.Puruki.Puruk.Puruki.Plantation.SynthSoilPuruki.NO3
                Solute NH4: same as Validation.Temperate.Puruki.Puruk.Puruki.Plantation.SynthSoilPuruki.NO3
                Solute Urea: same as Validation.Temperate.Puruki.Puruk.Puruki.Plantation.SynthSoilPuruki.Urea
                SoilTemperature CERESSoilTemperature: InteractionsPerDay=8
                CERESSoilTemperature Temperature
              Irrigation
    Folder Tropical and SubTropical
      Memo
        These are the Tropical and SubTropical datasets.
      Folder Australia
        Memo
          These are the Australian sites of the Tropical and SubTropical datasets.

          Data come from sites of Forestry Plantations Queensland (FPQ; [#dieters2007productivity]) and Hancocks Queensland Plantations (HQP).
        Folder FPQBeerwah
          Memo
            These data are from a genetics experiment in south-east Queensland described by [#dieters2007productivity]. Four genotypes are compared: _P. elliottii_ var. elliottii (PEE), _P. caribaea_ var. hondurensis (PCH), the F1 hybrid, and the F2 hybrid. As only stem metrics were provided in the paper, genotypes were not calibrated for biomass components and other physiological attributes.
          Experiment FPQBeerwah
            Factors
              Factor _
                CompositeFactor PEE: Specifications=[Management]
                  Operations Management
                    1987-10-16  [TreeThinning].Script.DoThin(0.07);
                    1988-10-16  [TreeThinning].Script.DoThin(0.01);
                    1989-10-16  [TreeThinning].Script.DoThin(0.01);
                    1987-06-16  [Fertiliser].Apply(amount: 0, type: "NH4N", 0);
                    1988-06-16  [Fertiliser].Apply(amount: 0, type: "NH4N", 0);
                    1989-06-16  [Fertiliser].Apply(amount: 0, type: "NH4N", 0);
                    1990-06-16  [Fertiliser].Apply(amount: 0, type: "NH4N", 0);
                    1995-06-16  [Fertiliser].Apply(amount: 0, type: "NH4N", 0);
                CompositeFactor PCH
                  Specifications:
                    [Management]
                    [TreeSowingRule]
                  Operations Management
                    // 1987-06-01  [TreeSowingRule].Script.CultivarName=caribaea
                    1987-10-16  [TreeThinning].Script.DoThin(0.1);
                    1988-10-16  [TreeThinning].Script.DoThin(0.055);
                    1989-10-16  [TreeThinning].Script.DoThin(0.02);
                    1987-06-16  [Fertiliser].Apply(amount: 50, type: "NH4N", 0);
                    1988-06-16  [Fertiliser].Apply(amount: 50, type: "NH4N", 0);
                    1989-06-16  [Fertiliser].Apply(amount: 50, type: "NH4N", 0);
                    1990-06-16  [Fertiliser].Apply(amount: 50, type: "NH4N", 0);
                    1995-06-16  [Fertiliser].Apply(amount: 50, type: "NH4N", 0);
                  Manager TreeSowingRule
                    RowSpace = 2.7
                    RowWidth = 4
                    CultivarName = caribaea
                    SowingDate = 06/01/1987 00:00:00
                    script: same as in Validation.Temperate.BFG.BF.BFG.Plantation.TreeSowingRule
                CompositeFactor F1
                  Specifications:
                    [Management]
                    [TreeSowingRule]
                  Operations Management
                    // 1987-06-01  [TreeSowingRule].Script.CultivarName=elliottiiXcaribaeaF1
                    1987-10-16  [TreeThinning].Script.DoThin(0.06);
                    1988-10-16  [TreeThinning].Script.DoThin(0.03);
                    1989-10-16  [TreeThinning].Script.DoThin(0.02);
                    1987-06-16  [Fertiliser].Apply(amount: 50, type: "NH4N", 0);
                    1988-06-16  [Fertiliser].Apply(amount: 50, type: "NH4N", 0);
                    1989-06-16  [Fertiliser].Apply(amount: 50, type: "NH4N", 0);
                    1990-06-16  [Fertiliser].Apply(amount: 50, type: "NH4N", 0);
                    1995-06-16  [Fertiliser].Apply(amount: 50, type: "NH4N", 0);
                  Manager TreeSowingRule
                    RowSpace = 2.7
                    RowWidth = 4
                    CultivarName = elliottiiXcaribaeaF1
                    SowingDate = 06/01/1987 00:00:00
                    script: same as in Validation.Temperate.BFG.BF.BFG.Plantation.TreeSowingRule
                CompositeFactor F2
                  Specifications:
                    [Management]
                    [TreeSowingRule]
                  Operations Management
                    // 1987-06-01  [TreeSowingRule].Script.CultivarName=elliottiiXcaribaeaF2
                    1987-10-16  [TreeThinning].Script.DoThin(0.01);
                    1988-10-16  [TreeThinning].Script.DoThin(0.008);
                    1989-10-16  [TreeThinning].Script.DoThin(0.006);
                    1987-06-16  [Fertiliser].Apply(amount: 50, type: "NH4N", 0);
                    1988-06-16  [Fertiliser].Apply(amount: 50, type: "NH4N", 0);
                    1989-06-16  [Fertiliser].Apply(amount: 50, type: "NH4N", 0);
                    1990-06-16  [Fertiliser].Apply(amount: 50, type: "NH4N", 0);
                    1995-06-16  [Fertiliser].Apply(amount: 50, type: "NH4N", 0);
                  Manager TreeSowingRule
                    RowSpace = 2.7
                    RowWidth = 4
                    CultivarName = elliottiiXcaribaeaF2
                    SowingDate = 06/01/1987 00:00:00
                    script: same as in Validation.Temperate.BFG.BF.BFG.Plantation.TreeSowingRule
            Simulation Beerwah
              Weather: FileName=Beerwah1900-2020.met
              Clock: Start=1987-05-01; End=2002-06-01
              Summary
              SoilArbitrator Soil Arbitrator
              Zone Plantation: Area=1; Slope=0; AspectAngle=0; Altitude=50
                Soil SynthSoilBeerwah: ASCOrder=NA; ASCSubOrder=NA; SoilType=Silty Loam over Clay Loam; Site=20243_47964; NearestTown=BEERWAH; Region=South Eastern Queensland; State=Queensland; NaturalVegetation=Unknown; ApsoilNumber=9999; Latitude=-26.87; Longitude=152.97; LocationAccuracy=+- 90m; YearOfSampling=2020; Comments=Landuse is Perennial horticulture
                  DataSource=Soil and Landscape Grid of Australia. This soil parameter file was automatically generated from the GSM National Surfaces using pedotransfer functions.
                  Water: Thickness=[150, 150, 150, 150, 200, 200, 200, 200]; FilledFromTop=false
                    InitialValues=[0.279139, 0.266389, 0.265043, 0.265794, 0.265643, 0.264622, 0.263219, 0.261589]
                  Physical
                    Thickness  BD       AirDry     LL15      DUL       SAT
                    150        1.25208  0.0541788  0.162536  0.308289  0.458068
                    150        1.34502  0.0542106  0.162632  0.292328  0.432175
                    150        1.38226  0.0556643  0.166993  0.289556  0.423406
                    150        1.40097  0.0567805  0.170342  0.289657  0.419248
                    200        1.41671  0.0576396  0.172919  0.288824  0.41582
                    200        1.43256  0.0581705  0.174511  0.28715   0.411867
                    200        1.44842  0.0583321  0.174996  0.285275  0.407139
                    200        1.46446  0.058248   0.174744  0.2833    0.401844
                    SoilCrop PinusSoil: LL=[0.163, 0.163, 0.167, 0.17, 0.173, 0.175, 0.175, 0.175]; KL=[0.04, 0.03, 0.01, 0.01, 0.01, 0.01, 0.01, 0.01]; XF=[1, 1, 1, 1, 1, 1, 0, 0]
                  WaterBalance SoilWater: SummerDate=1-nov; SummerU=6; SummerCona=6; WinterDate=1-apr; WinterU=4; WinterCona=2.5; DiffusConst=94.3321; DiffusSlope=33.5231; Salb=0.14; CN2Bare=78; CNRed=20; CNCov=0; PSIDul=-100; Thickness=[150, 150, 150, 150, 200, 200, 200, 200]
                    SWCON=[0.462859, 0.423014, 0.385671, 0.363243, 0.292728, 0.276762, 0.271523, 0.273779]
                  Organic: FOMCNRatio=40; CarbonUnits=Total
                    Thickness  Carbon    SoilCNRatio  FBiom    FInert    FOM
                    150        2.1837    13.6         0.04     0.35      373.091
                    150        1.45624   13.6         0.03106  0.45      270.533
                    150        1.03427   13.6         0.01404  0.6       196.167
                    150        0.812067  13.6         0.01     0.829979  142.243
                    200        0.59339   13.6         0.01     0.995145  92.6626
                    200        0.417785  13.6         0.01     1         60.364
                    200        0.335608  13.6         0.01     1         39.3235
                    200        0.318412  13.6         0.01     1         25.6168
                  Chemical: Thickness=[150, 150, 150, 150, 200, 200, 200, 200]; PHUnits=Water
                    PH=[5.22051, 5.23205, 5.25025, 5.25302, 5.2577, 5.26963, 5.28913, 5.31387]
                  Nutrient
                  Solute NO3: Thickness=[150, 150, 150, 150, 200, 200, 200, 200]; InitialValues=[10, 5, 2, 0, 0, 0, 0, 0]; InitialValuesUnits=ppm; WaterTableConcentration=0; D0=0; DepthConstant=0; MaxDepthSoluteAccessible=0; RunoffEffectivenessAtMovingSolute=0; MaxEffectiveRunoff=0
                  Solute NH4: same as Validation.Tropical and SubTropical.Australia.FPQBeerwah.FPQBeerwah.Beerwah.Plantation.SynthSoilBeerwah.NO3
                  Solute Urea: Thickness=[150, 150, 150, 150, 200, 200, 200, 200]; InitialValues=[0, 0, 0, 0, 0, 0, 0, 0]; InitialValuesUnits=kg/ha; WaterTableConcentration=0; D0=0; DepthConstant=0; MaxDepthSoluteAccessible=0; RunoffEffectivenessAtMovingSolute=0; MaxEffectiveRunoff=0
                  SoilTemperature CERESSoilTemperature: InteractionsPerDay=8
                Irrigation
                Fertiliser
                SurfaceOrganicMatter: InitialResidueName=Pinus; InitialResidueType=Eucalyptus; InitialResidueMass=1000; InitialStandingFraction=0; InitialCPR=0; InitialCNR=40
                MicroClimate: a_interception=0; b_interception=1; c_interception=0.45; d_interception=0; SoilHeatFluxFraction=0; MinimumHeightDiffForNewLayer=0; NightInterceptionFraction=0; ReferenceHeight=2
                Plant Pinus
                Manager TreeSowingRule
                  RowSpace = 2.7
                  RowWidth = 4
                  CultivarName = elliottiiQLD
                  SowingDate = 06/01/1987 00:00:00
                  script: same as in Validation.Temperate.BFG.BF.BFG.Plantation.TreeSowingRule
                Manager TreeThinning: same as Validation.Temperate.BFG.BF.BFG.Plantation.TreeThinning
                Operations Management
                Report: same as Validation.Temperate.FSA703A.FSA703A.Plantation.Report
                Report AnnualReport: EventNames=[Clock].EndOfYear
                  VariableNames:
                    [Clock].Today
                    ([Nutrient].MineralisedN[1]+[Nutrient].MineralisedN[2]+[Nutrient].MineralisedN[3])*10 as NNMkg45cmAnnual
        Folder FPQToolara
          Memo: same as Validation.Tropical and SubTropical.Australia.FPQBeerwah.Memo
          Experiment FPQToolara
            Factors
              Factor _
                CompositeFactor PEE: Specifications=[Management]
                  Operations Management
                    1987-10-16  [TreeThinning].Script.DoThin(0.005);
                    1988-10-16  [TreeThinning].Script.DoThin(0.01);
                    1989-10-16  [TreeThinning].Script.DoThin(0.005);
                    1987-06-16  [Fertiliser].Apply(amount: 50, type: "NH4N", 0);
                    1988-06-16  [Fertiliser].Apply(amount: 50, type: "NH4N", 0);
                    1989-06-16  [Fertiliser].Apply(amount: 50, type: "NH4N", 0);
                    1990-06-16  [Fertiliser].Apply(amount: 50, type: "NH4N", 0);
                    1995-06-16  [Fertiliser].Apply(amount: 50, type: "NH4N", 0);
                CompositeFactor PCH
                  Specifications:
                    [Management]
                    [TreeSowingRule]
                  Operations Management
                    // 1987-06-01  [TreeSowingRule].Script.CultivarName=caribaea
                    1987-10-16  [TreeThinning].Script.DoThin(0.1);
                    1988-10-16  [TreeThinning].Script.DoThin(0.005);
                    1989-10-16  [TreeThinning].Script.DoThin(0.021);
                    1987-06-16  [Fertiliser].Apply(amount: 50, type: "NH4N", 0);
                    1988-06-16  [Fertiliser].Apply(amount: 50, type: "NH4N", 0);
                    1989-06-16  [Fertiliser].Apply(amount: 50, type: "NH4N", 0);
                    1990-06-16  [Fertiliser].Apply(amount: 50, type: "NH4N", 0);
                    1995-06-16  [Fertiliser].Apply(amount: 50, type: "NH4N", 0);
                  Manager TreeSowingRule: same as Validation.Tropical and SubTropical.Australia.FPQBeerwah.FPQBeerwah.Factors._.PCH.TreeSowingRule
                CompositeFactor F1
                  Specifications:
                    [Management]
                    [TreeSowingRule]
                  Operations Management
                    // 1987-06-01  [TreeSowingRule].Script.CultivarName=elliottiiXcaribaeaF1
                    1987-10-16  [TreeThinning].Script.DoThin(0.08);
                    1988-10-16  [TreeThinning].Script.DoThin(0.05);
                    1989-10-16  [TreeThinning].Script.DoThin(0.02);
                    1987-06-16  [Fertiliser].Apply(amount: 50, type: "NH4N", 0);
                    1988-06-16  [Fertiliser].Apply(amount: 50, type: "NH4N", 0);
                    1989-06-16  [Fertiliser].Apply(amount: 50, type: "NH4N", 0);
                    1990-06-16  [Fertiliser].Apply(amount: 50, type: "NH4N", 0);
                    1995-06-16  [Fertiliser].Apply(amount: 50, type: "NH4N", 0);
                  Manager TreeSowingRule: same as Validation.Tropical and SubTropical.Australia.FPQBeerwah.FPQBeerwah.Factors._.F1.TreeSowingRule
                CompositeFactor F2
                  Specifications:
                    [Management]
                    [TreeSowingRule]
                  Operations Management
                    // 1987-06-01  [TreeSowingRule].Script.CultivarName=elliottiiXcaribaeaF2
                    1987-10-16  [TreeThinning].Script.DoThin(0.05);
                    1988-10-16  [TreeThinning].Script.DoThin(0.05);
                    1989-10-16  [TreeThinning].Script.DoThin(0.014);
                    1987-06-16  [Fertiliser].Apply(amount: 50, type: "NH4N", 0);
                    1988-06-16  [Fertiliser].Apply(amount: 50, type: "NH4N", 0);
                    1989-06-16  [Fertiliser].Apply(amount: 50, type: "NH4N", 0);
                    1990-06-16  [Fertiliser].Apply(amount: 50, type: "NH4N", 0);
                    1995-06-16  [Fertiliser].Apply(amount: 50, type: "NH4N", 0);
                  Manager TreeSowingRule: same as Validation.Tropical and SubTropical.Australia.FPQBeerwah.FPQBeerwah.Factors._.F2.TreeSowingRule
            Simulation Toolara
              Weather: FileName=Toolara1900-2020.met
              Clock: Start=1987-05-01; End=2002-06-01
              Summary
              SoilArbitrator Soil Arbitrator
              Zone Plantation: Area=1; Slope=0; AspectAngle=0; Altitude=50
                Soil SynthSoilToolara: ASCOrder=NA; ASCSubOrder=NA; SoilType=Loam over Clay; Site=19295_47796; NearestTown=COOLOOLA COVE; Region=South Eastern Queensland; State=Queensland; NaturalVegetation=Unknown; ApsoilNumber=9999; Latitude=-26.08; Longitude=152.83; LocationAccuracy=+- 90m; YearOfSampling=2020; Comments=Landuse is Plantation forestry
                  DataSource=Soil and Landscape Grid of Australia. This soil parameter file was automatically generated from the GSM National Surfaces using pedotransfer functions.
                  Water: Thickness=[150, 150, 150, 150, 200, 200, 200, 200]; FilledFromTop=true
                    InitialValues=[0.337704, 0.319881, 0.326693, 0.335173, 0.338399, 0.337774, 0.335686, 0.332804]
                  Physical
                    Thickness  BD       AirDry     LL15      DUL       SAT       KS
                    150        1.31512  0.0642931  0.192879  0.337704  0.444822  23.8418
                    150        1.41118  0.0651603  0.195481  0.319881  0.419367  12.7234
                    150        1.44913  0.0706181  0.211854  0.326693  0.414053  6.04346
                    150        1.46438  0.0746769  0.224031  0.335173  0.413501  3.77357
                    200        1.47886  0.0761238  0.228371  0.338399  0.410105  3.19131
                    200        1.49377  0.0760732  0.228219  0.337774  0.404968  3.16358
                    200        1.50719  0.0757821  0.227346  0.335686  0.40023   3.17636
                    200        1.51959  0.0754308  0.226292  0.332804  0.395878  3.17854
                    SoilCrop PinusSoil
                      LL=[0.171282, 0.170413, 0.174307, 0.176906, 0.178485, 0.179019, 0.178527, 0.177351]
                      KL=[0.06, 0.06, 0.0596733, 0.05502, 0.04802, 0.04002, 0.03202, 0.02402]
                      XF=[1, 1, 1, 1, 1, 1, 1, 1]
                  WaterBalance SoilWater: SummerDate=1-nov; SummerU=6; SummerCona=6; WinterDate=1-apr; WinterU=4; WinterCona=2.5; DiffusConst=96.2857; DiffusSlope=36.3755; Salb=0.13; CN2Bare=78; CNRed=20; CNCov=0; DischargeWidth=10; CatchmentArea=6904.83; PSIDul=-100; Thickness=[150, 150, 150, 150, 200, 200, 200, 200]
                    SWCON=[0.427792, 0.355505, 0.268757, 0.218818, 0.16841, 0.175767, 0.181632, 0.18486]
                  Organic: FOMCNRatio=40; CarbonUnits=Total
                    Thickness  Carbon    SoilCNRatio  FBiom    FInert    FOM
                    150        2.50112   14           0.04     0.161755  373.091
                    150        1.47912   14           0.03106  0.274329  270.533
                    150        0.840168  14           0.01404  0.483422  196.167
                    150        0.508193  14           0.01     0.793116  142.243
                    200        0.3882    14           0.01     0.994342  92.6626
                    200        0.367427  14           0.01     1         60.364
                    200        0.345794  14           0.01     1         39.3235
                    200        0.31528   14           0.01     1         25.6168
                  Chemical: Thickness=[150, 150, 150, 150, 200, 200, 200, 200]; PHUnits=Water
                    PH=[5.36999, 5.408, 5.50579, 5.59192, 5.634, 5.64048, 5.62691, 5.60121]
                  Nutrient
                  Solute NO3: Thickness=[150, 150, 150, 150, 200, 200, 200, 200]; InitialValues=[0, 0, 0, 0, 0, 0, 0, 0]; InitialValuesUnits=ppm; WaterTableConcentration=0; D0=0; DepthConstant=0; MaxDepthSoluteAccessible=0; RunoffEffectivenessAtMovingSolute=0; MaxEffectiveRunoff=0
                  Solute NH4: same as Validation.Tropical and SubTropical.Australia.FPQToolara.FPQToolara.Toolara.Plantation.SynthSoilToolara.NO3
                  Solute Urea: same as Validation.Tropical and SubTropical.Australia.FPQBeerwah.FPQBeerwah.Beerwah.Plantation.SynthSoilBeerwah.Urea
                  SoilTemperature CERESSoilTemperature: InteractionsPerDay=8
                Irrigation
                Fertiliser
                SurfaceOrganicMatter: InitialResidueName=Pinus; InitialResidueType=Eucalyptus; InitialResidueMass=1000; InitialStandingFraction=0; InitialCPR=0; InitialCNR=40
                MicroClimate: a_interception=0; b_interception=1; c_interception=0.45; d_interception=0; SoilHeatFluxFraction=0; MinimumHeightDiffForNewLayer=0; NightInterceptionFraction=0; ReferenceHeight=2
                Plant Pinus
                Manager TreeSowingRule: same as Validation.Tropical and SubTropical.Australia.FPQBeerwah.FPQBeerwah.Beerwah.Plantation.TreeSowingRule
                Manager TreeThinning: same as Validation.Temperate.BFG.BF.BFG.Plantation.TreeThinning
                Operations Management
                  1987-06-01  [TreeSowingRule].Script.CultivarName=elliottiiQLD
                  1987-10-16  [TreeThinning].Script.DoThin(0.1);
                  1988-10-16  [TreeThinning].Script.DoThin(0.005);
                  1989-10-16  [TreeThinning].Script.DoThin(0.021);
                  1987-06-16  [Fertiliser].Apply(amount: 50, type: "NH4N", 0);
                  1988-06-16  [Fertiliser].Apply(amount: 50, type: "NH4N", 0);
                  1989-06-16  [Fertiliser].Apply(amount: 50, type: "NH4N", 0);
                  1990-06-16  [Fertiliser].Apply(amount: 50, type: "NH4N", 0);
                  1995-06-16  [Fertiliser].Apply(amount: 50, type: "NH4N", 0);
                Report: same as Validation.Temperate.FSA703A.FSA703A.Plantation.Report
                Report AnnualReport: EventNames=[Clock].EndOfYear
                  VariableNames:
                    [Clock].Today
                    ([Nutrient].MineralisedN[1]+[Nutrient].MineralisedN[2]+[Nutrient].MineralisedN[3])*10 as NNMkg45cmAnnual
        Folder FPQTuan
          Memo: same as Validation.Tropical and SubTropical.Australia.FPQBeerwah.Memo
          Experiment FPQTuan
            Factors
              Factor _
                CompositeFactor PEE: Specifications=[Management]
                  Operations Management
                    1987-10-16  [TreeThinning].Script.DoThin(0.07);
                    1988-10-16  [TreeThinning].Script.DoThin(0.055);
                    1989-10-16  [TreeThinning].Script.DoThin(0.01);
                    1987-06-16  [Fertiliser].Apply(amount: 50, type: "NH4N", 0);
                    1988-06-16  [Fertiliser].Apply(amount: 50, type: "NH4N", 0);
                    1989-06-16  [Fertiliser].Apply(amount: 50, type: "NH4N", 0);
                    1990-06-16  [Fertiliser].Apply(amount: 50, type: "NH4N", 0);
                    1995-06-16  [Fertiliser].Apply(amount: 50, type: "NH4N", 0);
                CompositeFactor PCH
                  Specifications:
                    [Management]
                    [TreeSowingRule]
                  Operations Management
                    // 1987-06-01  [TreeSowingRule].Script.CultivarName=caribaea
                    1987-10-16  [TreeThinning].Script.DoThin(0.1);
                    1988-10-16  [TreeThinning].Script.DoThin(0.015);
                    1989-10-16  [TreeThinning].Script.DoThin(0.024);
                    1987-06-16  [Fertiliser].Apply(amount: 50, type: "NH4N", 0);
                    1988-06-16  [Fertiliser].Apply(amount: 50, type: "NH4N", 0);
                    1989-06-16  [Fertiliser].Apply(amount: 50, type: "NH4N", 0);
                    1990-06-16  [Fertiliser].Apply(amount: 50, type: "NH4N", 0);
                    1995-06-16  [Fertiliser].Apply(amount: 50, type: "NH4N", 0);
                  Manager TreeSowingRule: same as Validation.Tropical and SubTropical.Australia.FPQBeerwah.FPQBeerwah.Factors._.PCH.TreeSowingRule
                CompositeFactor F1
                  Specifications:
                    [Management]
                    [TreeSowingRule]
                  Operations Management
                    // 1987-06-01  [TreeSowingRule].Script.CultivarName=elliottiiXcaribaeaF1
                    1987-10-16  [TreeThinning].Script.DoThin(0.16);
                    1988-10-16  [TreeThinning].Script.DoThin(0.09);
                    1989-10-16  [TreeThinning].Script.DoThin(0.025);
                    1987-06-16  [Fertiliser].Apply(amount: 50, type: "NH4N", 0);
                    1988-06-16  [Fertiliser].Apply(amount: 50, type: "NH4N", 0);
                    1989-06-16  [Fertiliser].Apply(amount: 50, type: "NH4N", 0);
                    1990-06-16  [Fertiliser].Apply(amount: 50, type: "NH4N", 0);
                    1995-06-16  [Fertiliser].Apply(amount: 50, type: "NH4N", 0);
                  Manager TreeSowingRule: same as Validation.Tropical and SubTropical.Australia.FPQBeerwah.FPQBeerwah.Factors._.F1.TreeSowingRule
                CompositeFactor F2
                  Specifications:
                    [Management]
                    [TreeSowingRule]
                  Operations Management
                    // 1987-06-01  [TreeSowingRule].Script.CultivarName=elliottiiXcaribaeaF2
                    1987-10-16  [TreeThinning].Script.DoThin(0.01);
                    1988-10-16  [TreeThinning].Script.DoThin(0.068);
                    1989-10-16  [TreeThinning].Script.DoThin(0.015);
                    1987-06-16  [Fertiliser].Apply(amount: 50, type: "NH4N", 0);
                    1988-06-16  [Fertiliser].Apply(amount: 50, type: "NH4N", 0);
                    1989-06-16  [Fertiliser].Apply(amount: 50, type: "NH4N", 0);
                    1990-06-16  [Fertiliser].Apply(amount: 50, type: "NH4N", 0);
                    1995-06-16  [Fertiliser].Apply(amount: 50, type: "NH4N", 0);
                  Manager TreeSowingRule: same as Validation.Tropical and SubTropical.Australia.FPQBeerwah.FPQBeerwah.Factors._.F2.TreeSowingRule
            Simulation Tuan
              Weather: FileName=Tuan1900-2020.met
              Clock: Start=1987-05-01; End=2002-06-01
              Summary
              SoilArbitrator Soil Arbitrator
              Zone Plantation: Area=1; Slope=0; AspectAngle=0; Altitude=50
                Soil SynthSoilTuan: ASCOrder=NA; ASCSubOrder=NA; SoilType=Sand over Loam; Site=18755_47796; NearestTown=MARYBOROUGH; Region=South Eastern Queensland; State=Queensland; NaturalVegetation=Unknown; ApsoilNumber=9999; Latitude=-25.63; Longitude=152.83; LocationAccuracy=+- 90m; YearOfSampling=2020; Comments=Landuse is Plantation forestry
                  DataSource=Soil and Landscape Grid of Australia. This soil parameter file was automatically generated from the GSM National Surfaces using pedotransfer functions.
                  Water: Thickness=[150, 150, 150, 150, 200, 200, 200, 200]; FilledFromTop=true
                    InitialValues=[0.262001, 0.239265, 0.221437, 0.209516, 0.208627, 0.211686, 0.211759, 0.2093]
                  Physical
                    Thickness  BD       AirDry     LL15      DUL       SAT       KS
                    150        1.31449  0.0429487  0.128846  0.262001  0.426258  126.473
                    150        1.38404  0.0407813  0.122344  0.239265  0.407031  95.7111
                    150        1.42234  0.0390138  0.117041  0.221437  0.396996  76.7809
                    150        1.44461  0.0378516  0.113555  0.209516  0.391249  66.5495
                    200        1.45824  0.0386871  0.116061  0.208627  0.388474  56.4577
                    200        1.46914  0.0400426  0.120128  0.211686  0.38629   49.2038
                    200        1.48098  0.0404494  0.121348  0.211759  0.383007  46.3486
                    200        1.49384  0.0401147  0.120344  0.2093    0.378839  46.122
                    SoilCrop PinusSoil
                      LL=[0.136835, 0.129359, 0.123271, 0.118834, 0.120506, 0.123792, 0.124243, 0.122481]
                      KL=[0.06, 0.06, 0.0596733, 0.05502, 0.04802, 0.04002, 0.03202, 0.02402]
                      XF=[1, 1, 1, 1, 1, 1, 1, 1]
                  WaterBalance SoilWater: SummerDate=1-nov; SummerU=6; SummerCona=6; WinterDate=1-apr; WinterU=4; WinterCona=2.5; DiffusConst=144.733; DiffusSlope=37.7632; Salb=0.19; CN2Bare=70; CNRed=20; CNCov=0; DischargeWidth=10; CatchmentArea=2887.2; PSIDul=-100; Thickness=[150, 150, 150, 150, 200, 200, 200, 200]
                    SWCON=[0.56274, 0.537919, 0.513376, 0.495891, 0.430569, 0.416322, 0.411128, 0.412221]
                  Organic: FOMCNRatio=40; CarbonUnits=Total
                    Thickness  Carbon    SoilCNRatio  FBiom    FInert    FOM
                    150        2.79908   14           0.04     0.266296  373.091
                    150        1.98983   14           0.03106  0.374964  270.533
                    150        1.3314    14           0.01404  0.561564  196.167
                    150        0.906433  14           0.01     0.822206  142.243
                    200        0.718376  14           0.01     0.993658  92.6626
                    200        0.653842  14           0.01     1         60.364
                    200        0.604744  14           0.01     1         39.3235
                    200        0.556608  14           0.01     1         25.6168
                  Chemical: Thickness=[150, 150, 150, 150, 200, 200, 200, 200]; PHUnits=Water
                    PH=[5.23294, 5.24324, 5.27704, 5.30044, 5.3332, 5.36686, 5.39029, 5.40631]
                  Nutrient
                  Solute NO3: same as Validation.Tropical and SubTropical.Australia.FPQToolara.FPQToolara.Toolara.Plantation.SynthSoilToolara.NO3
                  Solute NH4: same as Validation.Tropical and SubTropical.Australia.FPQToolara.FPQToolara.Toolara.Plantation.SynthSoilToolara.NO3
                  Solute Urea: same as Validation.Tropical and SubTropical.Australia.FPQBeerwah.FPQBeerwah.Beerwah.Plantation.SynthSoilBeerwah.Urea
                  SoilTemperature CERESSoilTemperature: InteractionsPerDay=8
                Irrigation
                Fertiliser
                SurfaceOrganicMatter: InitialResidueName=Pinus; InitialResidueType=Eucalyptus; InitialResidueMass=1000; InitialStandingFraction=0; InitialCPR=0; InitialCNR=40
                MicroClimate: a_interception=0; b_interception=1; c_interception=0.45; d_interception=0; SoilHeatFluxFraction=0; MinimumHeightDiffForNewLayer=0; NightInterceptionFraction=0; ReferenceHeight=2
                Plant Pinus
                Manager TreeSowingRule: same as Validation.Tropical and SubTropical.Australia.FPQBeerwah.FPQBeerwah.Beerwah.Plantation.TreeSowingRule
                Manager TreeThinning: same as Validation.Temperate.BFG.BF.BFG.Plantation.TreeThinning
                Operations Management
                Report: same as Validation.Temperate.FSA703A.FSA703A.Plantation.Report
                Report AnnualReport: EventNames=[Clock].EndOfYear
                  VariableNames:
                    [Clock].Today
                    ([Nutrient].MineralisedN[1]+[Nutrient].MineralisedN[2]+[Nutrient].MineralisedN[3])*10 as NNMkg45cmAnnual
        Folder HQP248
          Memo
            These data were kindly provided by Hancock Queensland Plantations (HQPlantations, HQP) from Experiment 248 MBR, which was established to determine the most appropriate taxa (including stock production systems) and site preparation prescription(s) for use on wet sites in south-east Queensland. As the model was not designed to simulate various details of each treatment, only one of the best performing treatment was simulated (Experiment 248MBR, Treatment F1-Container-LargeMound).
          Simulation HQP248
            Weather: FileName=Tuan1900-2020.met
            Clock: Start=2000-03-01; End=2015-12-31
            Summary
            SoilArbitrator Soil Arbitrator
            Zone Plantation: Area=1; Slope=0; AspectAngle=0; Altitude=50
              Soil SynthSoil321GYMR1: ASCOrder=NA; ASCSubOrder=NA; SoilType=Sand over Loam; Site=18755_47796; NearestTown=MARYBOROUGH; Region=South Eastern Queensland; State=Queensland; NaturalVegetation=Unknown; ApsoilNumber=9999; Latitude=-25.63; Longitude=152.83; LocationAccuracy=+- 90m; YearOfSampling=2020; Comments=Landuse is Plantation forestry
                DataSource=Soil and Landscape Grid of Australia. This soil parameter file was automatically generated from the GSM National Surfaces using pedotransfer functions.
                Water: Thickness=[150, 150, 150, 150, 200, 200, 200, 200]; FilledFromTop=true
                  InitialValues=[0.262001, 0.239265, 0.221437, 0.209516, 0.208627, 0.211686, 0.160452, 0.120344]
                Physical: same as Validation.Tropical and SubTropical.Australia.FPQTuan.FPQTuan.Tuan.Plantation.SynthSoilTuan.Physical
                WaterBalance SoilWater: SummerDate=1-nov; SummerU=6; SummerCona=6; WinterDate=1-apr; WinterU=4; WinterCona=2.5; DiffusConst=144.733; DiffusSlope=37.7632; Salb=0.19; CN2Bare=50; CNRed=20; CNCov=0; PSIDul=-100; Thickness=[150, 150, 150, 150, 200, 200, 200, 200]
                  SWCON=[0.8, 0.7, 0.6, 0.5, 0.430569, 0.416322, 0.411128, 0.412221]
                Organic: FOMCNRatio=40; CarbonUnits=Total
                  Thickness  Carbon  SoilCNRatio  FBiom    FInert  FOM
                  150        1.43    20           0.04     0.1     373.091
                  150        0.7     20           0.03106  0.2     270.533
                  150        0.5     20           0.01404  0.4     196.167
                  150        0.2     20           0.01     0.7     142.243
                  200        0.1     20           0.01     1       92.6626
                  200        0.05    20           0.01     1       60.364
                  200        0.05    20           0.01     1       39.3235
                  200        0.01    20           0.01     1       25.6168
                Chemical: Thickness=[150, 150, 150, 150, 200, 200, 200, 200]; PHUnits=Water
                  PH=[5.53, 5.53, 5.53, 5.30044, 5.3332, 5.36686, 5.39029, 5.40631]
                Nutrient
                Solute NO3: same as Validation.Tropical and SubTropical.Australia.FPQToolara.FPQToolara.Toolara.Plantation.SynthSoilToolara.NO3
                Solute NH4: same as Validation.Tropical and SubTropical.Australia.FPQToolara.FPQToolara.Toolara.Plantation.SynthSoilToolara.NO3
                Solute Urea: same as Validation.Tropical and SubTropical.Australia.FPQBeerwah.FPQBeerwah.Beerwah.Plantation.SynthSoilBeerwah.Urea
                SoilTemperature CERESSoilTemperature: InteractionsPerDay=8
              Irrigation
              Fertiliser
              SurfaceOrganicMatter: InitialResidueName=Pinus; InitialResidueType=Eucalyptus; InitialResidueMass=1000; InitialStandingFraction=0; InitialCPR=0; InitialCNR=40
              MicroClimate: a_interception=0; b_interception=1; c_interception=0.45; d_interception=0; SoilHeatFluxFraction=0; MinimumHeightDiffForNewLayer=0; NightInterceptionFraction=0; ReferenceHeight=2
              Plant Pinus
              Manager TreeSowingRule
                RowSpace = 2.4
                RowWidth = 5
                CultivarName = elliottiiXcaribaeaF1
                SowingDate = 03/15/2000 00:00:00
                script: same as in Validation.Temperate.BFG.BF.BFG.Plantation.TreeSowingRule
              Manager TreeThinning: same as Validation.Temperate.BFG.BF.BFG.Plantation.TreeThinning
              Operations Management
                2000-04-06  [Fertiliser].Apply(amount: 23, type: "NH4N", 0);
              Report: same as Validation.Temperate.FSA703A.FSA703A.Plantation.Report
              Report AnnualReport: EventNames=[Clock].EndOfYear
                VariableNames:
                  [Clock].Today
                  ([Nutrient].MineralisedN[1]+[Nutrient].MineralisedN[2]+[Nutrient].MineralisedN[3])*10 as NNMkg45cmAnnual
        Folder HQP251
          Memo
            These data were kindly provided by Hancock Queensland Plantations (HQPlantations) from Experiment 251 MBR, which was established to investigate the impact of various 2R site preparation methods at a high-mounded first rotation (1R) site with hard-setting soil in south-east Queensland. As the model was not designed to simulate various details of each treatment, only one of the best performing treatments was simulated (Experiment 251MBR, Treatment F1-MB6).
          Simulation HQP251
            Weather: FileName=Tuan1900-2020.met
            Clock: Start=2002-05-15; End=2015-12-31
            Summary
            SoilArbitrator Soil Arbitrator
            Zone Plantation: Area=1; Slope=0; AspectAngle=0; Altitude=50
              Soil SynthSoil321GYMR1: ASCOrder=NA; ASCSubOrder=NA; SoilType=Sand over Loam; Site=18755_47796; NearestTown=MARYBOROUGH; Region=South Eastern Queensland; State=Queensland; NaturalVegetation=Unknown; ApsoilNumber=9999; Latitude=-25.63; Longitude=152.83; LocationAccuracy=+- 90m; YearOfSampling=2020; Comments=Landuse is Plantation forestry
                DataSource=Soil and Landscape Grid of Australia. This soil parameter file was automatically generated from the GSM National Surfaces using pedotransfer functions.
                Water: Thickness=[150, 150, 150, 150, 200, 200, 200, 200]; FilledFromTop=true
                  InitialValues=[0.262001, 0.239265, 0.221437, 0.209516, 0.208627, 0.211686, 0.160452, 0.120344]
                Physical: same as Validation.Tropical and SubTropical.Australia.FPQTuan.FPQTuan.Tuan.Plantation.SynthSoilTuan.Physical
                WaterBalance SoilWater: same as Validation.Tropical and SubTropical.Australia.HQP248.HQP248.Plantation.SynthSoil321GYMR1.SoilWater
                Organic: FOMCNRatio=40; CarbonUnits=Total
                  Thickness  Carbon  SoilCNRatio  FBiom    FInert    FOM
                  150        1.43    25           0.04     0.266296  373.091
                  150        0.7     25           0.03106  0.374964  270.533
                  150        0.5     25           0.01404  0.561564  196.167
                  150        0.2     25           0.01     0.822206  142.243
                  200        0.1     25           0.01     1         92.6626
                  200        0.05    25           0.01     1         60.364
                  200        0.05    25           0.01     1         39.3235
                  200        0.01    25           0.01     1         25.6168
                Chemical: same as Validation.Tropical and SubTropical.Australia.HQP248.HQP248.Plantation.SynthSoil321GYMR1.Chemical
                Nutrient
                Solute NO3: same as Validation.Tropical and SubTropical.Australia.FPQToolara.FPQToolara.Toolara.Plantation.SynthSoilToolara.NO3
                Solute NH4: same as Validation.Tropical and SubTropical.Australia.FPQToolara.FPQToolara.Toolara.Plantation.SynthSoilToolara.NO3
                Solute Urea: same as Validation.Tropical and SubTropical.Australia.FPQBeerwah.FPQBeerwah.Beerwah.Plantation.SynthSoilBeerwah.Urea
                SoilTemperature CERESSoilTemperature: InteractionsPerDay=8
              Irrigation
              Fertiliser
              SurfaceOrganicMatter: InitialResidueName=Pinus; InitialResidueType=Eucalyptus; InitialResidueMass=1000; InitialStandingFraction=0; InitialCPR=0; InitialCNR=40
              MicroClimate: a_interception=0; b_interception=1; c_interception=0.45; d_interception=0; SoilHeatFluxFraction=0; MinimumHeightDiffForNewLayer=0; NightInterceptionFraction=0; ReferenceHeight=2
              Plant Pinus
              Manager TreeSowingRule
                RowSpace = 2.1
                RowWidth = 6
                CultivarName = caribaea
                SowingDate = 06/01/2002 00:00:00
                script: same as in Validation.Temperate.BFG.BF.BFG.Plantation.TreeSowingRule
              Manager TreeThinning: same as Validation.Temperate.BFG.BF.BFG.Plantation.TreeThinning
              Operations Management
                2002-06-01  [Fertiliser].Apply(amount: 0, type: "NH4N", 0);
                2003-06-01  [TreeThinning].Script.DoThin(0.0214);
              Report: same as Validation.Temperate.FSA703A.FSA703A.Plantation.Report
              Report AnnualReport: EventNames=[Clock].EndOfYear
                VariableNames:
                  [Clock].Today
                  ([Nutrient].MineralisedN[1]+[Nutrient].MineralisedN[2]+[Nutrient].MineralisedN[3])*10 as NNMkg45cmAnnual
        Folder HQP321R1
          Memo
            These data were kindly provided by Hancock Queensland Plantations (HQPlantations) from Experiment 321GYM, which was established to:(1) examine the impacts of slash management, fertilization and cover crops on tree growth and nutrient status; (2) quantify the effects on soil properties; and (3) contribute to the CIFOR international network of long term experiments designed to identify and develop sustainable inter-rotation management practices. Early results were reported in [#simpson2000effects]. Data here are reported only for the first rotation (1R) to age 29.4 years.
          Simulation HQP321R1
            Weather: FileName=Toolara1900-2020.met
            Clock: Start=1966-07-01; End=1995-12-10
            Summary
            SoilArbitrator Soil Arbitrator
            Zone Plantation: Area=1; Slope=0; AspectAngle=0; Altitude=50
              Soil SynthSoil321GYMR1: same as Validation.Tropical and SubTropical.Australia.HQP251.HQP251.Plantation.SynthSoil321GYMR1
              Irrigation
              Fertiliser
              SurfaceOrganicMatter: InitialResidueName=Pinus; InitialResidueType=Eucalyptus; InitialResidueMass=1000; InitialStandingFraction=0; InitialCPR=0; InitialCNR=40
              MicroClimate: a_interception=0; b_interception=1; c_interception=0.45; d_interception=0; SoilHeatFluxFraction=0; MinimumHeightDiffForNewLayer=0; NightInterceptionFraction=0; ReferenceHeight=2
              Plant Pinus
              Manager TreeSowingRule
                RowSpace = 2.7
                RowWidth = 3
                CultivarName = elliottiiQLD
                SowingDate = 07/15/1966 00:00:00
                script: same as in Validation.Temperate.BFG.BF.BFG.Plantation.TreeSowingRule
              Manager TreeThinning: same as Validation.Temperate.BFG.BF.BFG.Plantation.TreeThinning
              Operations Management
                1982-02-16  [TreeThinning].Script.DoThin(0.4498);
              Report: same as Validation.Temperate.FSA703A.FSA703A.Plantation.Report
              Report AnnualReport: EventNames=[Clock].EndOfYear
                VariableNames:
                  [Clock].Today
                  ([Nutrient].MineralisedN[1]+[Nutrient].MineralisedN[2]+[Nutrient].MineralisedN[3])*10 as NNMkg45cmAnnual
        Folder HQP321R2
          Memo
            These data were kindly provided by Hancock Queensland Plantations (HQPlantations) from Experiment 321GYM, which was established to:(1) examine the impacts of slash management, fertilization and cover crops on tree growth and nutrient status; (2) quantify the effects on soil properties; and (3) contribute to the CIFOR international network of long term experiments designed to identify and develop sustainable inter-rotation management practices. Early results were reported in [#simpson2000effects]. Data here are reported only for one of the best performing treatments of the second rotation (2R) to age 8 years (Experiment 321GYM, Treatement BL2-TWC).
          Simulation HQP321GYMBL2TWC
            Weather: FileName=Toolara1900-2020.met
            Clock: Start=1996-05-01; End=2003-06-01
            Summary
            SoilArbitrator Soil Arbitrator
            Zone Plantation: Area=1; Slope=0; AspectAngle=0; Altitude=50
              Soil SynthSoil321GYMR1: same as Validation.Tropical and SubTropical.Australia.HQP251.HQP251.Plantation.SynthSoil321GYMR1
              Irrigation
              Fertiliser
              SurfaceOrganicMatter: InitialResidueName=Pinus; InitialResidueType=Eucalyptus; InitialResidueMass=1000; InitialStandingFraction=0; InitialCPR=0; InitialCNR=40
              MicroClimate: a_interception=0; b_interception=1; c_interception=0.45; d_interception=0; SoilHeatFluxFraction=0; MinimumHeightDiffForNewLayer=0; NightInterceptionFraction=0; ReferenceHeight=2
              Plant Pinus
              Manager TreeSowingRule
                RowSpace = 3
                RowWidth = 3
                CultivarName = elliottiiXcaribaeaF1
                SowingDate = 05/15/1996 00:00:00
                script: same as in Validation.Temperate.BFG.BF.BFG.Plantation.TreeSowingRule
              Manager TreeThinning: same as Validation.Temperate.BFG.BF.BFG.Plantation.TreeThinning
              Operations Management
                1997-05-01  [TreeThinning].Script.DoThin(0.01);
                1999-08-30  [TreeThinning].Script.DoThin(0.369);
              Report: same as Validation.Temperate.FSA703A.FSA703A.Plantation.Report
              Report AnnualReport: EventNames=[Clock].EndOfYear
                VariableNames:
                  [Clock].Today
                  ([Nutrient].MineralisedN[1]+[Nutrient].MineralisedN[2]+[Nutrient].MineralisedN[3])*10 as NNMkg45cmAnnual
        Folder HQP350
          Memo
            These data were kindly provided by Hancock Queensland Plantations (HQPlantations) from Experiment 350GYM, which was established to assess the relative benefits, both short-term and long-term, of major factors and their interactions on PEE x PCH hybrid plantations when grown on an average site in the Maryborough district. Data here are reported only for one of the best performing treatments (Experiment 350GYM, Treatment High-FWC).
          Simulation HQP350
            Weather: FileName=Toolara1900-2020.met
            Clock: Start=1999-04-21; End=2007-06-21
            Summary
            SoilArbitrator Soil Arbitrator
            Zone Plantation: Area=1; Slope=0; AspectAngle=0; Altitude=50
              Soil SynthSoil350GYMHighFWC: ASCOrder=NA; ASCSubOrder=NA; SoilType=Sand over Loam; Site=18755_47796; NearestTown=MARYBOROUGH; Region=South Eastern Queensland; State=Queensland; NaturalVegetation=Unknown; ApsoilNumber=9999; Latitude=-25.63; Longitude=152.83; LocationAccuracy=+- 90m; YearOfSampling=2020; Comments=Landuse is Plantation forestry
                DataSource=Soil and Landscape Grid of Australia. This soil parameter file was automatically generated from the GSM National Surfaces using pedotransfer functions.
                Water: Thickness=[150, 150, 150, 150, 200, 200, 200, 200]; FilledFromTop=true
                  InitialValues=[0.262001, 0.239265, 0.221437, 0.209516, 0.208627, 0.211686, 0.160452, 0.120344]
                Physical: same as Validation.Tropical and SubTropical.Australia.FPQTuan.FPQTuan.Tuan.Plantation.SynthSoilTuan.Physical
                WaterBalance SoilWater: same as Validation.Tropical and SubTropical.Australia.HQP248.HQP248.Plantation.SynthSoil321GYMR1.SoilWater
                Organic: FOMCNRatio=40; CarbonUnits=Total
                  Thickness  Carbon  SoilCNRatio  FBiom    FInert    FOM
                  150        1.7     22           0.04     0.266296  373.091
                  150        1       22           0.03106  0.374964  270.533
                  150        0.5     22           0.01404  0.561564  196.167
                  150        0.2     22           0.01     0.822206  142.243
                  200        0.1     22           0.01     1         92.6626
                  200        0.05    25           0.01     1         60.364
                  200        0.05    25           0.01     1         39.3235
                  200        0.01    25           0.01     1         25.6168
                Chemical: same as Validation.Tropical and SubTropical.Australia.HQP248.HQP248.Plantation.SynthSoil321GYMR1.Chemical
                Nutrient
                Solute NO3: same as Validation.Tropical and SubTropical.Australia.FPQToolara.FPQToolara.Toolara.Plantation.SynthSoilToolara.NO3
                Solute NH4: same as Validation.Tropical and SubTropical.Australia.FPQToolara.FPQToolara.Toolara.Plantation.SynthSoilToolara.NO3
                Solute Urea: same as Validation.Tropical and SubTropical.Australia.FPQBeerwah.FPQBeerwah.Beerwah.Plantation.SynthSoilBeerwah.Urea
                SoilTemperature CERESSoilTemperature: InteractionsPerDay=8
              Irrigation
              Fertiliser
              SurfaceOrganicMatter: InitialResidueName=Pinus; InitialResidueType=Eucalyptus; InitialResidueMass=1000; InitialStandingFraction=0; InitialCPR=0; InitialCNR=40
              MicroClimate: a_interception=0; b_interception=1; c_interception=0.45; d_interception=0; SoilHeatFluxFraction=0; MinimumHeightDiffForNewLayer=0; NightInterceptionFraction=0; ReferenceHeight=2
              Plant Pinus
              Manager TreeSowingRule
                RowSpace = 2.4
                RowWidth = 5
                CultivarName = elliottiiXcaribaeaF1
                SowingDate = 05/05/1999 00:00:00
                script: same as in Validation.Temperate.BFG.BF.BFG.Plantation.TreeSowingRule
              Manager TreeThinning: same as Validation.Temperate.BFG.BF.BFG.Plantation.TreeThinning
              Operations Management
                1999-07-21  [Fertiliser].Apply(amount: 22.6, type: "NH4N", 0);
                1999-12-20  [TreeThinning].Script.DoThin(0.017);
                2002-03-02  [TreeThinning].Script.DoThin(0.012);
                2003-07-27  [TreeThinning].Script.DoThin(0.006);
                2006-06-20  [TreeThinning].Script.DoThin(0.005);
                2007-06-20  [TreeThinning].Script.DoThin(0.000);
              Report: same as Validation.Temperate.FSA703A.FSA703A.Plantation.Report
              Report AnnualReport: EventNames=[Clock].EndOfYear
                VariableNames:
                  [Clock].Today
                  ([Nutrient].MineralisedN[1]+[Nutrient].MineralisedN[2]+[Nutrient].MineralisedN[3])*10 as NNMkg45cmAnnual
        Folder GraphsOvP
          Memo
            Test! These observed versus predicted graphs include all validation datasets and timesteps within a site for which observed data were available.
      Folder USA
        Memo
          These are the USA sites of the Tropical and SubTropical datasets.
        Folder IMPAC
          Memo
            These data are from an experiment with ferilizer and herbicide treatments and both _P. taeda_ and P.elliottii_ near Gainesville, north-central Florida, USA. As nutrients other than N were probably limiting in some treatments, which the the model couold not be expected to simulate, only the high input treatment was simualted.

            Numerous publications report on this experiment: [#jokela2000effects], [#vogel2011long], [#martin2004developmental], [#gonzalez2012modeling], [#jokela2010twenty], [#subedi2019sustained], [#jokela2004production], and [#gonzalez2016regional]. A consolidated dataset was kindly provided by Eric Jokela and Jason Vogel, University of Florida.
          Experiment IMPAC
            Factors
              Factor L: Specification=[Management]
                CompositeFactor F1H1: Specifications=[Management]
                  Operations F1H1
                    1987-01-01  [TreeThinning].Script.DoThin(0.058);
                    1988-01-01  [TreeThinning].Script.DoThin(0.000);
                    1989-01-01  [TreeThinning].Script.DoThin(0.000);
                    1990-01-01  [TreeThinning].Script.DoThin(0.000);
                    1992-01-01  [TreeThinning].Script.DoThin(0.009);
                    1993-01-01  [TreeThinning].Script.DoThin(0.000);
                    1994-01-01  [TreeThinning].Script.DoThin(0.000);
                    1996-01-01  [TreeThinning].Script.DoThin(0.018);
                    1997-01-01  [TreeThinning].Script.DoThin(0.018);
                    1998-01-01  [TreeThinning].Script.DoThin(0.019);
                    1999-01-01  [TreeThinning].Script.DoThin(0.0);
                    2001-01-01  [TreeThinning].Script.DoThin(0.0);
                    2005-01-01  [TreeThinning].Script.DoThin(0.18895);
                    2008-01-01  [TreeThinning].Script.DoThin(0.116);
                    1983-01-30  [Fertiliser].Apply(amount: 36, type: "NH4N", 0);
                    1984-01-30  [Fertiliser].Apply(amount: 36, type: "NH4N", 0);
                    1985-01-30  [Fertiliser].Apply(amount: 36, type: "NH4N", 0);
                    1986-01-30  [Fertiliser].Apply(amount: 36, type: "NH4N", 0);
                    1987-01-30  [Fertiliser].Apply(amount: 36, type: "NH4N", 0);
                    1988-01-30  [Fertiliser].Apply(amount: 36, type: "NH4N", 0);
                    1989-01-30  [Fertiliser].Apply(amount: 36, type: "NH4N", 0);
                    1990-01-30  [Fertiliser].Apply(amount: 36, type: "NH4N", 0);
                    1990-01-30  [Fertiliser].Apply(amount: 36, type: "NH4N", 0);
                    1991-01-30  [Fertiliser].Apply(amount: 36, type: "NH4N", 0);
                    1992-01-30  [Fertiliser].Apply(amount: 36, type: "NH4N", 0);
                    1993-01-30  [Fertiliser].Apply(amount: 36, type: "NH4N", 0);
                    1998-01-30  [Fertiliser].Apply(amount: 242.6, type: "NH4N", 0);
                    1999-01-30  [Fertiliser].Apply(amount: 242.6, type: "NH4N", 0);
                    2000-01-30  [Fertiliser].Apply(amount: 242.6, type: "NH4N", 0);
              Factor S: Specification=[Management]
                CompositeFactor F1H1: Specifications=[Management]
                  Operations F1H1
                    1983-01-01  [TreeSowingRule].Script.CultivarName=elliottiiIMPAC
                    1987-01-01  [TreeThinning].Script.DoThin(0.108);
                    1988-01-01  [TreeThinning].Script.DoThin(0.037);
                    1989-01-01  [TreeThinning].Script.DoThin(0.019);
                    1990-01-01  [TreeThinning].Script.DoThin(0.000);
                    1992-01-01  [TreeThinning].Script.DoThin(0.010);
                    1993-01-01  [TreeThinning].Script.DoThin(0.020);
                    1994-01-01  [TreeThinning].Script.DoThin(0.020);
                    1996-01-01  [TreeThinning].Script.DoThin(0.021);
                    1997-01-01  [TreeThinning].Script.DoThin(0.011);
                    1998-01-01  [TreeThinning].Script.DoThin(0.022);
                    1999-01-01  [TreeThinning].Script.DoThin(0.011);
                    2001-01-01  [TreeThinning].Script.DoThin(0.000);
                    2005-01-01  [TreeThinning].Script.DoThin(0.333);
                    2008-01-01  [TreeThinning].Script.DoThin(0.150);
                    1983-01-30  [Fertiliser].Apply(amount: 36, type: "NH4N", 0);
                    1984-01-30  [Fertiliser].Apply(amount: 36, type: "NH4N", 0);
                    1985-01-30  [Fertiliser].Apply(amount: 36, type: "NH4N", 0);
                    1986-01-30  [Fertiliser].Apply(amount: 36, type: "NH4N", 0);
                    1987-01-30  [Fertiliser].Apply(amount: 36, type: "NH4N", 0);
                    1988-01-30  [Fertiliser].Apply(amount: 36, type: "NH4N", 0);
                    1989-01-30  [Fertiliser].Apply(amount: 36, type: "NH4N", 0);
                    1990-01-30  [Fertiliser].Apply(amount: 36, type: "NH4N", 0);
                    1990-01-30  [Fertiliser].Apply(amount: 36, type: "NH4N", 0);
                    1991-01-30  [Fertiliser].Apply(amount: 36, type: "NH4N", 0);
                    1992-01-30  [Fertiliser].Apply(amount: 36, type: "NH4N", 0);
                    1993-01-30  [Fertiliser].Apply(amount: 36, type: "NH4N", 0);
                    1998-01-30  [Fertiliser].Apply(amount: 242.6, type: "NH4N", 0);
                    1999-01-30  [Fertiliser].Apply(amount: 242.6, type: "NH4N", 0);
                    2000-01-30  [Fertiliser].Apply(amount: 242.6, type: "NH4N", 0);
            Simulation IMPAC
              Weather: FileName=IMPAC1981-2020.met
              Clock: Start=1982-12-15; End=2008-01-16
              Summary
              SoilArbitrator Soil Arbitrator
              Zone Plantation: Area=1; Slope=0; AspectAngle=0; Altitude=50
                SurfaceOrganicMatter: InitialResidueName=Pinus; InitialResidueType=Eucalyptus; InitialResidueMass=1000; InitialStandingFraction=0; InitialCPR=0; InitialCNR=40
                Soil SynthSoilIMPAC: ASCOrder=NA; ASCSubOrder=NA; SoilType=Sand; Site=NA; NearestTown=NA; Region=NA; State=NA; Country=United States of America; NaturalVegetation=NA; ApsoilNumber=9999; Latitude=29.875; Longitude=-82.375; LocationAccuracy=+- 250 m; YearOfSampling=2019; DataSource=ISRIC SoilGrids
                  Physical
                    Thickness  ParticleSizeSand  ParticleSizeSilt  ParticleSizeClay  BD     AirDry  LL15   DUL    SAT
                    150        83.7              12                5                 1.161  0.033   0.098  0.182  0.485
                    150        81.5              12                6.5               1.306  0.032   0.095  0.172  0.44
                    150        79.5              11.8              8.8               1.385  0.034   0.103  0.177  0.417
                    150        78.5              11.2              10.2              1.409  0.036   0.107  0.178  0.413
                    200        77.2              11                11.8              1.437  0.038   0.115  0.184  0.405
                    200        75.8              11                13.2              1.467  0.042   0.125  0.193  0.395
                    200        74.6              10.9              14.5              1.482  0.044   0.131  0.199  0.39
                    200        73.8              10.7              15.5              1.483  0.044   0.133  0.201  0.39
                    300        72.8              10.5              16.8              1.484  0.045   0.136  0.204  0.39
                    300        71.6              10.2              18.2              1.485  0.046   0.139  0.207  0.39
                    SoilCrop PinusSoil
                      LL=[0.098, 0.095, 0.103, 0.107, 0.115, 0.125, 0.131, 0.133, 0.136, 0.139]
                      KL=[0.06, 0.06, 0.059, 0.053, 0.044, 0.034, 0.023, 0.012, 0.001, 0]
                      XF=[1, 0.97, 0.831, 0.814, 0.786, 0.744, 0, 0, 0, 0]
                  WaterBalance SoilWater: SummerDate=1-may; SummerU=6; SummerCona=6; WinterDate=1-oct; WinterU=4; WinterCona=2.5; DiffusConst=10743.42; DiffusSlope=0.56; Salb=0.16; CN2Bare=68; CNRed=20; CNCov=0; PSIDul=-100; Thickness=[150, 150, 150, 150, 200, 200, 200, 200, 300, 300]; SWCON=[0.8, 0.7, 0.7, 0.6, 0.7, 0.7, 0.7, 0.7, 0.7, 0.7]
                  Water: Thickness=[150, 150, 150, 150, 200, 200, 200, 200, 300, 300]; FilledFromTop=true
                    InitialValues=[0.182, 0.172, 0.177, 0.178, 0.184, 0.193, 0.199, 0.201, 0.204, 0.1599]
                  Organic: FOMCNRatio=40; CarbonUnits=Total
                    Thickness  Carbon  SoilCNRatio  FBiom  FInert  FOM
                    150        1.08    23           0.05   0.1     84.9016
                    150        0.8     23           0.04   0.2     67.7953
                    150        0.5     23           0.03   0.3     54.1356
                    150        0.3     23           0.01   0.6     43.2282
                    200        0.3     24           0.01   1       32.0242
                    200        0.2     24           0.01   1       23.7241
                    200        0.01    24           0.01   1       17.5753
                    200        0.01    24           0.01   1       13.0201
                    300        0.01    24           0.01   1       8.30197
                    300        0.01    24           0.01   1       5.29357
                  Chemical: Thickness=[150, 150, 150, 150, 200, 200, 200, 200, 300, 300]; PH=[4.1, 4.1, 4, 4, 4, 4, 4, 4, 4, 4]; PHUnits=Water
                  Nutrient
                  Solute NO3: Thickness=[150, 150, 150, 150, 200, 200, 200, 200, 300, 300]; InitialValues=[10, 5, 2, 1, 0, 0, 0, 0, 0, 0]; InitialValuesUnits=ppm; WaterTableConcentration=0; D0=0; DepthConstant=0; MaxDepthSoluteAccessible=0; RunoffEffectivenessAtMovingSolute=0; MaxEffectiveRunoff=0
                  Solute NH4: same as Validation.Tropical and SubTropical.USA.IMPAC.IMPAC.IMPAC.Plantation.SynthSoilIMPAC.NO3
                  Solute Urea: same as Validation.Temperate.FSA704.FSA704.Plantation.Synthetic Soil Derived from ISRIC SoilGrids.Urea
                  SoilTemperature CERESSoilTemperature: InteractionsPerDay=8
                Fertiliser
                Irrigation
                MicroClimate: a_interception=0; b_interception=1; c_interception=0.45; d_interception=0; SoilHeatFluxFraction=0; MinimumHeightDiffForNewLayer=0; NightInterceptionFraction=0; ReferenceHeight=2
                Plant Pinus
                Manager TreeSowingRule
                  RowSpace = 1.8
                  RowWidth = 3.6
                  CultivarName = taedaIMPAC
                  SowingDate = 01/15/1983 00:00:00
                  script: same as in Validation.Temperate.BFG.BF.BFG.Plantation.TreeSowingRule
                Manager TreeThinning
```csharp
using APSIM.Core;
using Models.Soils;
using System.Xml.Serialization;
using Models.PMF;
using Models.Core;
using System.Collections.Generic;
using System;
using Newtonsoft.Json;
using Models.PMF.Interfaces;

namespace Models
{
    [Serializable] 
    [System.Xml.Serialization.XmlInclude(typeof(Model))]
    public class Script : Model, IStructureDependency
    {
        [Link] private Plant Pinus;
        [Link] private Clock Clock;
        
        public IStructure Structure { private get; set; }


        
        [EventSubscribe("StartOfSimulation")]
        private void OnSimulationCommencing(object sender, EventArgs e)
        {
            
        }
        
        public void DoThin(double ThinFr)
        {
            //Set up  array of remove fractions to send with Cut method.  Each member in the array corresponds to an organ in the same order they are set up in.

                //Harvest with manager specified removal fractions
                Pinus.structure?.DoThin(ThinFr);
                var Leaf =   Structure.FindChild<IHasDamageableBiomass>("Leaf", relativeTo: (INodeModel)Pinus);
                var Stem =   Structure.FindChild<IHasDamageableBiomass>("Stem", relativeTo: (INodeModel)Pinus);
                var Branch =   Structure.FindChild<IHasDamageableBiomass>("Branch", relativeTo: (INodeModel)Pinus);
                var FineRoot =   Structure.FindChild<IHasDamageableBiomass>("FineRoot", relativeTo: (INodeModel)Pinus);
                var CoarseRoot =   Structure.FindChild<IHasDamageableBiomass>("CoarseRoot", relativeTo: (INodeModel)Pinus);
                Leaf.RemoveBiomass(liveToRemove: 0, deadToRemove: 0.0, liveToResidue: Math.Max(0,ThinFr), deadToResidue: 0.0);
                Stem.RemoveBiomass(liveToRemove: 0, deadToRemove: 0.0, liveToResidue: Math.Max(0,ThinFr), deadToResidue: 0.0);
                Branch.RemoveBiomass(liveToRemove: 0, deadToRemove: 0.0, liveToResidue: Math.Max(0,ThinFr), deadToResidue: 0.0);
                FineRoot.RemoveBiomass(liveToRemove: 0, deadToRemove: 0.0, liveToResidue: Math.Max(0,ThinFr), deadToResidue: 0.0);
                CoarseRoot.RemoveBiomass(liveToRemove: 0, deadToRemove: 0.0, liveToResidue: Math.Max(0,ThinFr), deadToResidue: 0.0);

                Pinus.Population = Pinus.Population*(1-ThinFr);
        }
    }
}
```
                Operations Management
                Report: same as Validation.Temperate.FSA703A.FSA703A.Plantation.Report
                Report AnnualReport: EventNames=[Pinus].Harvesting
                  VariableNames:
                    [Clock].Today
                    sum ([Nutrient].MineralisedN[1]+[Nutrient].MineralisedN[2]+[Nutrient].MineralisedN[3]) from 16-Jun to 14-Jun as NNM45Annual
        Folder SETRES
          Memo
            These data are from an experiment of 2x nutrient and water treatments in _P. taeda_ near Sandhills, North Carolina, USA. As nutrients other than N were probably limiting in some treatments, which the the model couold not be expected to simulate, only the high input treatment was simualted.

            Numerous publications report on this experiment, of which we drew on [#zhao2016maximum], [#landsberg2001applying], [#albaugh2009opportunities], [#albaugh2004long], and [#albaugh1998leaf].
          Experiment SETRE
            Factors
              Factor S: Specification=[Management]
                Operations C
                  1992-02-15  [TreeThinning].Script.DoThin(0.302);
                  1993-02-15  [TreeThinning].Script.DoThin(0.000);
                  1994-02-15  [TreeThinning].Script.DoThin(0.001);
                  1995-02-15  [TreeThinning].Script.DoThin(0.010);
                  1996-02-15  [TreeThinning].Script.DoThin(0.000);
                  1997-02-15  [TreeThinning].Script.DoThin(0.010);
                  1998-02-15  [TreeThinning].Script.DoThin(0.000);
                  1999-02-15  [TreeThinning].Script.DoThin(0.005);
                  2000-02-15  [TreeThinning].Script.DoThin(0.004);
                  2001-02-15  [TreeThinning].Script.DoThin(0.000);
                Operations F
                  1992-02-15  [TreeThinning].Script.DoThin(0.281);
                  1993-02-15  [TreeThinning].Script.DoThin(0.002);
                  1994-02-15  [TreeThinning].Script.DoThin(0.000);
                  1995-02-15  [TreeThinning].Script.DoThin(0.010);
                  1996-02-15  [TreeThinning].Script.DoThin(0.000);
                  1997-02-15  [TreeThinning].Script.DoThin(0.009);
                  1998-02-15  [TreeThinning].Script.DoThin(0.005);
                  1999-02-15  [TreeThinning].Script.DoThin(0.003);
                  2000-02-15  [TreeThinning].Script.DoThin(0.007);
                  2001-02-15  [TreeThinning].Script.DoThin(0.010);
                  1992-03-15  [Fertiliser].Apply(amount: 225, type: "UreaN", 0);
                  1993-05-31  [Fertiliser].Apply(amount: 82, type: "UreaN", 0);
                  1994-05-31  [Fertiliser].Apply(amount: 112, type: "UreaN", 0);
                  1995-05-31  [Fertiliser].Apply(amount: 56, type: "UreaN", 0);
                  1996-05-31  [Fertiliser].Apply(amount: 112, type: "UreaN", 0);
                  1997-05-31  [Fertiliser].Apply(amount: 134, type: "UreaN", 0);
                  1998-05-31  [Fertiliser].Apply(amount: 56, type: "UreaN", 0);
                  1999-05-31  [Fertiliser].Apply(amount: 69, type: "UreaN", 0);
                  2000-05-31  [Fertiliser].Apply(amount: 56, type: "UreaN", 0);
                  2001-05-31  [Fertiliser].Apply(amount: 68, type: "UreaN", 0);
                  2002-05-31  [Fertiliser].Apply(amount: 68, type: "UreaN", 0);
                  2003-05-31  [Fertiliser].Apply(amount: 68, type: "UreaN", 0);
                  2004-05-31  [Fertiliser].Apply(amount: 68, type: "UreaN", 0);
                  2005-05-31  [Fertiliser].Apply(amount: 68, type: "UreaN", 0);
                  2006-05-31  [Fertiliser].Apply(amount: 68, type: "UreaN", 0);
                Operations I
                  1992-02-15  [TreeThinning].Script.DoThin(0.287);
                  1993-02-15  [TreeThinning].Script.DoThin(0.000);
                  1994-02-15  [TreeThinning].Script.DoThin(0.000);
                  1995-02-15  [TreeThinning].Script.DoThin(0.009);
                  1996-02-15  [TreeThinning].Script.DoThin(0.002);
                  1997-02-15  [TreeThinning].Script.DoThin(0.014);
                  1998-02-15  [TreeThinning].Script.DoThin(0.002);
                  1999-02-15  [TreeThinning].Script.DoThin(0.008);
                  2000-02-15  [TreeThinning].Script.DoThin(0.005);
                  2001-02-15  [TreeThinning].Script.DoThin(0.004);
                  1993-04-15  [AutomaticIrrigation].Script.TurnOn()
                Operations FI
                  1992-02-15  [TreeThinning].Script.DoThin(0.308);
                  1993-02-15  [TreeThinning].Script.DoThin(0.002);
                  1994-02-15  [TreeThinning].Script.DoThin(0.003);
                  1995-02-15  [TreeThinning].Script.DoThin(0.010);
                  1996-02-15  [TreeThinning].Script.DoThin(0.004);
                  1997-02-15  [TreeThinning].Script.DoThin(0.010);
                  1998-02-15  [TreeThinning].Script.DoThin(0.000);
                  1999-02-15  [TreeThinning].Script.DoThin(0.010);
                  2000-02-15  [TreeThinning].Script.DoThin(0.000);
                  2001-02-15  [TreeThinning].Script.DoThin(0.003);
                  1992-03-15  [Fertiliser].Apply(amount: 225, type: "UreaN", 0);
                  1993-05-31  [Fertiliser].Apply(amount: 82, type: "UreaN", 0);
                  1994-05-31  [Fertiliser].Apply(amount: 112, type: "UreaN", 0);
                  1995-05-31  [Fertiliser].Apply(amount: 56, type: "UreaN", 0);
                  1996-05-31  [Fertiliser].Apply(amount: 112, type: "UreaN", 0);
                  1997-05-31  [Fertiliser].Apply(amount: 134, type: "UreaN", 0);
                  1998-05-31  [Fertiliser].Apply(amount: 56, type: "UreaN", 0);
                  1999-05-31  [Fertiliser].Apply(amount: 69, type: "UreaN", 0);
                  2000-05-31  [Fertiliser].Apply(amount: 56, type: "UreaN", 0);
                  2001-05-31  [Fertiliser].Apply(amount: 68, type: "UreaN", 0);
                  2002-05-31  [Fertiliser].Apply(amount: 68, type: "UreaN", 0);
                  2003-05-31  [Fertiliser].Apply(amount: 68, type: "UreaN", 0);
                  2004-05-31  [Fertiliser].Apply(amount: 68, type: "UreaN", 0);
                  2005-05-31  [Fertiliser].Apply(amount: 68, type: "UreaN", 0);
                  2006-05-31  [Fertiliser].Apply(amount: 68, type: "UreaN", 0);
                  1993-04-15  [AutomaticIrrigation].Script.TurnOn()
            Simulation SETRES
              Weather: FileName=SETRES1981-2020.met
              Clock: Start=1985-02-01; End=2001-02-15
              Summary
              SoilArbitrator Soil Arbitrator
              Zone Plantation: Area=1; Slope=0; AspectAngle=0; Altitude=50
                Soil SynthSoilSETRES: ASCOrder=NA; ASCSubOrder=NA; SoilType=Haplic Acrisols; Site=NA; NearestTown=NA; Region=NA; State=NA; Country=United States of America; NaturalVegetation=NA; ApsoilNumber=9999; Latitude=34.625; Longitude=-79.375; LocationAccuracy=+- 250 m; YearOfSampling=2019; DataSource=ISRIC SoilGrids
                  Physical
                    Thickness  ParticleSizeSand  ParticleSizeSilt  ParticleSizeClay  BD     AirDry  LL15   DUL    SAT
                    150        62.7              26                11.8              1.372  0.054   0.163  0.271  0.423
                    150        58.5              24.5              17.5              1.55   0.055   0.165  0.253  0.37
                    150        54.8              22.5              22.8              1.596  0.06    0.18   0.257  0.36
                    150        54.2              21.5              24.2              1.599  0.06    0.18   0.256  0.36
                    200        54.5              20.8              25                1.609  0.06    0.18   0.253  0.358
                    200        55.5              20.2              25                1.626  0.06    0.18   0.249  0.353
                    200        56.4              19.6              24.8              1.633  0.06    0.179  0.246  0.35
                    200        57.2              18.8              24.4              1.632  0.059   0.177  0.244  0.35
                    300        58.2              17.8              23.9              1.63   0.058   0.175  0.241  0.35
                    300        59.4              16.6              23.3              1.628  0.057   0.172  0.238  0.35
                    SoilCrop PinusSoil
                      LL=[0.2, 0.2, 0.2, 0.21, 0.21, 0.22, 0.221, 0.231, 0.24, 0.238]
                      KL=[0.06, 0.06, 0.059, 0.053, 0.044, 0.034, 0.023, 0.012, 0.001, 0]
                      XF=[1, 0.97, 0.831, 0.814, 0.786, 0.744, 0.727, 0.732, 0, 0]
                  Water: Thickness=[150, 150, 150, 150, 200, 200, 200, 200, 300, 300]; FilledFromTop=true
                    InitialValues=[0.271, 0.253, 0.257, 0.256, 0.253, 0.249, 0.246, 0.244, 0.2089, 0.172]
                  WaterBalance SoilWater: SummerDate=1-may; SummerU=6; SummerCona=6; WinterDate=1-oct; WinterU=2; WinterCona=2; DiffusConst=1377.5; DiffusSlope=21.17; Salb=0.13; CN2Bare=65; CNRed=20; CNCov=0; PSIDul=-100; Thickness=[150, 150, 150, 150, 200, 200, 200, 200, 300, 300]
                    SWCON=[0.535, 0.501, 0.445, 0.421, 0.36, 0.361, 0.364, 0.367, 0.2, 0.1]
                  Organic: FOMCNRatio=40; CarbonUnits=Total
                    Thickness  Carbon  SoilCNRatio  FBiom  FInert  FOM
                    150        2.078   23           0.02   0.6     60.644
                    150        0.861   22           0.02   0.7     48.4252
                    150        0.53    22           0.02   0.9     38.6683
                    150        0.422   20           0.01   1       30.8773
                    200        0.331   20           0.01   1       22.8745
                    200        0.257   20           0.01   1       16.9458
                    200        0.217   20           0.01   1       12.5538
                    200        0.21    20           0.01   1       9.30006
                    300        0.201   20           0.01   1       5.92998
                    300        0.19    20           0.01   1       3.78112
                  Chemical: Thickness=[150, 150, 150, 150, 200, 200, 200, 200, 300, 300]; PH=[5.2, 5.15, 5.12, 5.18, 5.18, 5.12, 5.1, 5.1, 5.1, 5.1]; PHUnits=Water
                  Nutrient
                  Solute NO3: same as Validation.Temperate.FSA704.FSA704.Plantation.Synthetic Soil Derived from ISRIC SoilGrids.NO3
                  Solute NH4: same as Validation.Temperate.FSA704.FSA704.Plantation.Synthetic Soil Derived from ISRIC SoilGrids.NO3
                  Solute Urea: same as Validation.Temperate.FSA704.FSA704.Plantation.Synthetic Soil Derived from ISRIC SoilGrids.Urea
                  SoilTemperature CERESSoilTemperature: InteractionsPerDay=8
                SurfaceOrganicMatter: InitialResidueName=Pinus; InitialResidueType=Eucalyptus; InitialResidueMass=1000; InitialStandingFraction=0; InitialCPR=0; InitialCNR=40
                Irrigation
                Fertiliser
                MicroClimate: a_interception=0; b_interception=1; c_interception=0.45; d_interception=0; SoilHeatFluxFraction=0; MinimumHeightDiffForNewLayer=0; NightInterceptionFraction=0; ReferenceHeight=2
                Plant Pinus
                Manager TreeSowingRule
                  RowSpace = 2
                  RowWidth = 3
                  CultivarName = taeda
                  SowingDate = 02/15/1985 00:00:00
                  script: same as in Validation.Temperate.BFG.BF.BFG.Plantation.TreeSowingRule
                Manager TreeThinning: same as Validation.Temperate.BFG.BF.BFG.Plantation.TreeThinning
                Manager AutomaticIrrigation
                  allowIrrigation = False
                  seasonStart = 1-jan
                  seasonEnd = 31-dec
                  seasonsAllocation = 1000
                  triggerDeficit = 70
                  targetDeficit = 90
                  returndays = 3
                  maximumAmount = 30
                  depthPAWC = 500
                  script: same as in Validation.Temperate.BFG.BF.BFG.Plantation.AutomaticIrrigation
                Operations Management
                Report: same as Validation.Temperate.FSA703A.FSA703A.Plantation.Report
                Report AnnualReport: EventNames=[Clock].EndOfYear
                  VariableNames:
                    [Clock].Today
                    ([Nutrient].MineralisedN[1]+[Nutrient].MineralisedN[2]+[Nutrient].MineralisedN[3])*10 as NNMkg45cmAnnual
  Folder Sensibility
    Memo
      A series of sensibility tests have been employed to test the behaviour of the model in regions not explicitly included in the previous test set.  Furthermore, these tests explore the emergent behaviour of the model under a range of changing climate, fertility and management scenarios to ensure that simulated patterns agree with expected behaviours.
    Folder MAI in SE Australia
      Memo
        Representative growth rates (MAI) for _P. radiata_ in temperate Australia are up to 30 m3/ha/year of stem wood volume overbark, or more where accessing an aquifer or receiving irrigation. Simulations for 4 sites are presented here to capture a range of environmental conditions.  Climate data has been taken from nearby towns and common soil properties have been used for all sites, with soil properties reflecting a relatively high state of fertility. The peak MAI values for these simulations are 13-29 m3/ha/year at 26 years, i.e. within the range of expectations [#turvey1983soil], and the relativities in relation to rainfall and temperature are also as expected. Rainfall is explored explicitly for the Mount Worth site in the next sensibility test.
      Simulation MountWorth
        Weather: FileName=MountWorth.met
        Clock: Start=1990-01-01; End=2015-12-31
        Summary
        SoilArbitrator Soil Arbitrator
        Zone Plantation: Area=1; Slope=0; AspectAngle=0; Altitude=50
          Soil: Latitude=0; Longitude=0
            Water: Thickness=[100, 300, 600, 1000, 1000, 1000, 1000, 1000]; InitialValues=[0.13, 0.13, 0.13, 0.13, 0.13, 0.13, 0.13, 0.13]; FilledFromTop=false
            Physical
              Thickness  BD    AirDry  LL15  DUL   SAT
              100        1.5   0.01    0.05  0.15  0.18
              300        1.6   0.01    0.05  0.15  0.18
              600        1.68  0.01    0.05  0.15  0.18
              1000       1.75  0.01    0.05  0.15  0.18
              1000       1.7   0.01    0.05  0.15  0.18
              1000       1.7   0.01    0.05  0.15  0.2
              1000       1.7   0.01    0.05  0.15  0.2
              1000       1.7   0.01    0.05  0.15  0.2
              SoilCrop PinusSoil: LL=[0.01, 0.01, 0.01, 0.01, 0.01, 0.01, 0.01, 0.01]; KL=[0.07, 0.07, 0.05, 0.02, 0.02, 0.02, 0.01, 0.01]; XF=[0.9, 0.8, 0.7, 0.6, 0.3, 0, 0, 0]
            WaterBalance SoilWater: SummerDate=1-Nov; SummerU=2; SummerCona=3.5; WinterDate=1-Apr; WinterU=2; WinterCona=3.5; DiffusConst=88; DiffusSlope=35.4; Salb=0.13; CN2Bare=65; CNRed=20; CNCov=0.8; DischargeWidth=0; CatchmentArea=0; PSIDul=-100
              Thickness  SWCON  KLAT
              100        0.9    0
              300        0.9    0
              600        0.9    0
              1000       0.9    0
              1000       0.9    0
              1000       0.9    0
              1000       0.9    0
              1000       0.9    0
            Organic: FOMCNRatio=60; CarbonUnits=Total
              Thickness  Carbon  SoilCNRatio  FBiom  FInert  FOM
              100        3       12           0.03   0.1     0.29407
              300        2       12           0.02   0.2     0.253108
              600        0.5     12           0.02   0.5     0.187507
              1000       0.2     12           0.01   0.9     0.113729
              1000       0.12    12           0.01   0.9     0.06898
              1000       0.1     12           0.01   0.99    0.0418385
              1000       0.1     12           0.01   0.99    0.0253763
              1000       0.1     12           0.01   0.99    0.0153915
            Chemical: Thickness=[100, 300, 600, 1000, 1000, 1000, 1000, 1000]; PH=[5.8, 5.7, 5.7, 5.9, 5.7, 5.7, 5.7, 5.7]; PHUnits=Water
            Nutrient
            Solute NO3: Thickness=[100, 300, 600, 1000, 1000, 1000, 1000, 1000]; InitialValues=[10, 10, 10, 10, 0.01, 0.01, 0.01, 0.01]; InitialValuesUnits=ppm; WaterTableConcentration=0; D0=0; DepthConstant=0; MaxDepthSoluteAccessible=0; RunoffEffectivenessAtMovingSolute=0; MaxEffectiveRunoff=0
            Solute NH4: Thickness=[100, 300, 600, 1000, 1000, 1000, 1000, 1000]; InitialValues=[0.01, 0.01, 0.01, 0.01, 0.01, 0.01, 0.01, 0.01]; InitialValuesUnits=ppm; WaterTableConcentration=0; D0=0; DepthConstant=0; MaxDepthSoluteAccessible=0; RunoffEffectivenessAtMovingSolute=0; MaxEffectiveRunoff=0
            Solute Urea: Thickness=[100, 300, 600, 1000, 1000, 1000, 1000, 1000]; InitialValues=[0, 0, 0, 0, 0, 0, 0, 0]; InitialValuesUnits=kg/ha; WaterTableConcentration=0; D0=0; DepthConstant=0; MaxDepthSoluteAccessible=0; RunoffEffectivenessAtMovingSolute=0; MaxEffectiveRunoff=0
            SoilTemperature Temperature: InteractionsPerDay=8
          Irrigation
          Fertiliser
          MicroClimate: a_interception=0; b_interception=0; c_interception=0.45; d_interception=0; SoilHeatFluxFraction=0; MinimumHeightDiffForNewLayer=0; NightInterceptionFraction=0; ReferenceHeight=2
          Report SensibilityReport: VariableNames=[Clock].Today; EventNames=[Clock].DoReport
          Manager TreeThinning
```csharp
using APSIM.Core;
using Models.Soils;
using System.Xml.Serialization;
using Models.PMF;
using Models.Core;
using System.Collections.Generic;
using System;
using Newtonsoft.Json;
using Models.PMF.Interfaces;

namespace Models
{
    [Serializable] 
    [System.Xml.Serialization.XmlInclude(typeof(Model))]
    public class Script : Model, IStructureDependency
    {
        [Link] private Plant Eucalyptus;
        [Link] private Clock Clock;
        
        public IStructure Structure { private get; set; }


        
        [EventSubscribe("StartOfSimulation")]
        private void OnSimulationCommencing(object sender, EventArgs e)
        {
            
        }
        
        //[EventSubscribe("DoManagement")]
        public void DoThin(double ThinFr)
        {
            //Set up  array of remove fractions to send with Cut method.  Each member in the array corresponds to an organ in the same order they are set up in.

                //Harvest with manager specified removal fractions
                Eucalyptus.structure?.DoThin(ThinFr);
                var Leaf =   Structure.FindChild<IHasDamageableBiomass>("Leaf", relativeTo: (INodeModel)Eucalyptus);
                var Stem =   Structure.FindChild<IHasDamageableBiomass>("Stem", relativeTo: (INodeModel)Eucalyptus);
                var Branch =   Structure.FindChild<IHasDamageableBiomass>("Branch", relativeTo: (INodeModel)Eucalyptus);
                var FineRoot =   Structure.FindChild<IHasDamageableBiomass>("FineRoot", relativeTo: (INodeModel)Eucalyptus);
                var CoarseRoot =   Structure.FindChild<IHasDamageableBiomass>("CoarseRoot", relativeTo: (INodeModel)Eucalyptus);
                Leaf.RemoveBiomass(liveToRemove: 0, deadToRemove: 0.0, liveToResidue: ThinFr, deadToResidue: 0.0);
                Stem.RemoveBiomass(liveToRemove: 0, deadToRemove: 0.0, liveToResidue: ThinFr, deadToResidue: 0.0);
                Branch.RemoveBiomass(liveToRemove: 0, deadToRemove: 0.0, liveToResidue: ThinFr, deadToResidue: 0.0);
                FineRoot.RemoveBiomass(liveToRemove: 0, deadToRemove: 0.0, liveToResidue: ThinFr, deadToResidue: 0.0);
                CoarseRoot.RemoveBiomass(liveToRemove: 0, deadToRemove: 0.0, liveToResidue: ThinFr, deadToResidue: 0.0);

        }
    }
}
```
          Manager TreeTransplantRule
            RowSpace = 2.71
            RowWidth = 3.7
            CultivarName = BFG
            SowingDate = 01/01/1990 00:00:00
            script: same as in Validation.Temperate.BFG.BF.BFG.Plantation.TreeSowingRule
          Plant Pinus
          SurfaceOrganicMatter: InitialResidueName=Pinus; InitialResidueType=Eucalyptus; InitialResidueMass=0; InitialStandingFraction=0; InitialCPR=0; InitialCNR=0
      Simulation Tostaree
        Weather: FileName=Tostaree.met
        Clock: Start=1990-01-01; End=2015-12-31
        Summary
        SoilArbitrator Soil Arbitrator
        Zone Plantation: Area=1; Slope=0; AspectAngle=0; Altitude=50
          Soil: Latitude=0; Longitude=0
            Water: Thickness=[100, 300, 600, 1000, 1000, 1000, 1000, 1000]; InitialValues=[0.13, 0.13, 0.13, 0.13, 0.13, 0.13, 0.13, 0.13]; FilledFromTop=false
            Physical
              Thickness  BD    AirDry  LL15  DUL   SAT
              100        1.5   0.01    0.05  0.15  0.18
              300        1.6   0.01    0.05  0.15  0.18
              600        1.68  0.01    0.05  0.15  0.18
              1000       1.75  0.02    0.05  0.15  0.18
              1000       1.7   0.05    0.05  0.15  0.18
              1000       1.7   0.05    0.05  0.15  0.2
              1000       1.7   0.05    0.05  0.15  0.2
              1000       1.7   0.05    0.05  0.15  0.2
              SoilCrop PinusSoil: LL=[0.05, 0.05, 0.05, 0.05, 0.05, 0.05, 0.05, 0.05]; KL=[0.07, 0.07, 0.05, 0.02, 0.02, 0.02, 0.01, 0.01]; XF=[0.9, 0.8, 0.7, 0.6, 0.3, 0, 0, 0]
            WaterBalance SoilWater: same as Sensibility.MAI in SE Australia.MountWorth.Plantation.Soil.SoilWater
            Organic: same as Sensibility.MAI in SE Australia.MountWorth.Plantation.Soil.Organic
            Chemical: Thickness=[100, 300, 600, 1000, 1000, 1000, 1000, 1000]; PH=[5.8, 5.7, 5.7, 5.9, 5.7, 5.7, 5.7, 5.7]; PHUnits=Water
            Nutrient
            Solute NO3: same as Sensibility.MAI in SE Australia.MountWorth.Plantation.Soil.NO3
            Solute NH4: same as Sensibility.MAI in SE Australia.MountWorth.Plantation.Soil.NH4
            Solute Urea: same as Sensibility.MAI in SE Australia.MountWorth.Plantation.Soil.Urea
            SoilTemperature Temperature: InteractionsPerDay=8
          Irrigation
          Fertiliser
          MicroClimate: a_interception=0; b_interception=0; c_interception=0.45; d_interception=0; SoilHeatFluxFraction=0; MinimumHeightDiffForNewLayer=0; NightInterceptionFraction=0; ReferenceHeight=2
          Manager TreeTransplantRule: same as Sensibility.MAI in SE Australia.MountWorth.Plantation.TreeTransplantRule
          Report SensibilityReport: VariableNames=[Clock].Today; EventNames=[Clock].DoReport
          Manager TreeThinning: same as Sensibility.MAI in SE Australia.MountWorth.Plantation.TreeThinning
          Plant Pinus
          SurfaceOrganicMatter: InitialResidueName=Pinus; InitialResidueType=Eucalyptus; InitialResidueMass=0; InitialStandingFraction=0; InitialCPR=0; InitialCNR=0
      Simulation MountLofty
        Weather: FileName=MountLofty.met
        Clock: Start=1990-01-01; End=2015-12-31
        Summary
        SoilArbitrator Soil Arbitrator
        Zone Plantation: Area=1; Slope=0; AspectAngle=0; Altitude=50
          Soil: same as Sensibility.MAI in SE Australia.Tostaree.Plantation.Soil
          Irrigation
          Fertiliser
          MicroClimate: a_interception=0; b_interception=0; c_interception=0.45; d_interception=0; SoilHeatFluxFraction=0; MinimumHeightDiffForNewLayer=0; NightInterceptionFraction=0; ReferenceHeight=2
          Report SensibilityReport: VariableNames=[Clock].Today; EventNames=[Clock].DoReport
          Manager TreeThinning: same as Sensibility.MAI in SE Australia.MountWorth.Plantation.TreeThinning
          Manager TreeTransplantRule: same as Sensibility.MAI in SE Australia.MountWorth.Plantation.TreeTransplantRule
          Plant Pinus
          SurfaceOrganicMatter: InitialResidueName=Pinus; InitialResidueType=Eucalyptus; InitialResidueMass=0; InitialStandingFraction=0; InitialCPR=0; InitialCNR=0
      Simulation Stockdale
        Weather: FileName=Stockdale.met
        Clock: Start=1990-01-01; End=2015-12-31
        Summary
        SoilArbitrator Soil Arbitrator
        Zone Plantation: same as Sensibility.MAI in SE Australia.Tostaree.Plantation
    Folder Response to Rainfall
      Memo
        LAI and MAI of _P. radiata_ should increase with rainfall. This simulation experiment explores the changes in LAI and MAI with a hypothetical rainfall gradient created for the Mount Worth site (fertile soil and mean annual rainfall 1131 mm) above by multiplying daily rainfall by factors in the range 0.3-1.8, i.e. annual rainfall of 339-2036 mm.  Data from [#specht1972water] show that canopy cover should be almost complete for the wetter sites in this study, and decrease to approximately 50% at the drier sites, which is approxiamtely simulated here.
      Experiment Climate
        Factors
          Factor RainFactor
            Specification=[ClimateController].Script.RainfallMultiplier=0.3, 0.50, 0.7, 1, 1.4, 1.8
        Simulation ResponseToRainfall
          Weather: FileName=MountWorth.met
          Manager ClimateController
            AllowControl = True
            EnableDate = 01/01/1972 00:00:00
            WithinYearControl = False
            ControlStart =
            ControlEnd =
            RainfallMultiplier = 1
            RainfallAddition = 0
            RadiationMultiplier = 1
            RadiationAddition = 0
            MinTMultiplier = 1
            MinTAddition = 0
            MaxTMultiplier = 1
            MaxTAddition = 0
            WindMultiplier = 1
            WindAddition = 0
            VPMultiplier = 1
            VPAddition = 0
```csharp
using Newtonsoft.Json;
using APSIM.Shared.Utilities;
using Models.Interfaces;
using Models.Soils;
using Models.PMF;
using Models.Core;
using System.Xml.Serialization;
using System;
using Models.Soils.Nutrients;
using Models.Climate;

namespace Models
{
    [Serializable]
    public class Script : Model
    {
        // - Links to APSIM models
        [Link] Zone zone;
        [Link] Clock clock;
        [Link] Weather weather;
        [Link] ISummary summary = null;

        // - Paramters for this manager
        [Description("Enable? Set to 'No' to completely disable this manager")] public bool AllowControl { get; set; }

        [Separator("General settings")]
        [Description("Start the climate controls beginning on date (dd/mmm/yyyy): ")] public DateTime EnableDate { get; set; }
        [Description("Implement climate control only during part of the year?")] public bool WithinYearControl { get; set; }
        [Description("Within each year, the first day to start the climate controls is (dd-mmm)")] public string ControlStart { get; set; }
        [Description("Within each year, end last day of climate control is (dd-mmm)")] public string ControlEnd { get; set; }

        [Separator("Rainfall")]
        [Description("Rainfall multiplier (-): ")] public double RainfallMultiplier { get; set; }
        [Description("Rainfall addition (mm): ")] public double RainfallAddition { get; set; }

        [Separator("Radiation")]
        [Description("Radiation multiplier (-): ")] public double RadiationMultiplier { get; set; }
        [Description("Radiation addition (MJ/m2): ")] public double RadiationAddition { get; set; }

        [Separator("Minimum temperature")]
        [Description("Minimum temperature multiplier (-): ")] public double MinTMultiplier { get; set; }
        [Description("Minimum temperature addition (C): ")] public double MinTAddition { get; set; }

        [Separator("Maximum temperature")]
        [Description("Maximum temperature multiplier (-): ")] public double MaxTMultiplier { get; set; }
        [Description("Maximum temperature addition (C): ")] public double MaxTAddition { get; set; }

        [Separator("Wind speed")]
        [Description("Wind speed multiplier (-): ")] public double WindMultiplier { get; set; }
        [Description("Wind speed addition (m/s): ")] public double WindAddition { get; set; }

        [Separator("Vapour pressure")]
        [Description("Vapour pressure multiplier (-): ")] public double VPMultiplier { get; set; }
        [Description("Vapour pressure addition (hPa): ")] public double VPAddition { get; set; }

        [JsonIgnore] public bool DoControl { get; set; }
        [JsonIgnore] public int DoControlInt { get; set; }

        [EventSubscribe("PreparingNewWeatherData")] private void OnDoManagement(object sender, EventArgs e)
        {
            // Check if this manager is enabled
            if ((AllowControl) && (clock.Today >= EnableDate))
            {
                DoControl = true;
                if (WithinYearControl)
                    DoControl = DateUtilities.WithinDates(ControlStart, clock.Today, ControlEnd); 
            }

            if (DoControl)
                DoControlInt = 1;
            else
                DoControlInt = 0;

            if (DoControl)
            {
                // do the weather alterations 
                weather.Rain = RainfallMultiplier * weather.Rain + RainfallAddition;
                weather.Radn = RadiationMultiplier * weather.Radn + RadiationAddition;
                weather.MinT = MinTMultiplier * weather.MinT + MinTAddition;
                weather.MaxT = MaxTMultiplier * weather.MaxT + MaxTAddition;
                weather.Wind = WindMultiplier * weather.Wind + WindAddition;
                weather.VP = VPMultiplier * weather.VP + VPAddition;
            }
        }
    }
}
```
          Clock: Start=1990-01-01; End=2015-12-31
          Summary
          SoilArbitrator Soil Arbitrator
          Zone Plantation: same as Sensibility.MAI in SE Australia.MountWorth.Plantation
    Folder Response to Soil Fertility
      Memo
        Site fertility is an important driver of the pattern of tree growth rates.  As site fertility declines, the long term growth rate (e.g. MAI) should also decrease, and the time to obtaining peak MAI can remain the similar or decrease.  This sensibility test uses the Mount Worth location in Victoria, with soil fertility hypothetically altered to three levels.  As expected, simulated MAI decreased with soil fertility, and there was a decrease in time to peak MAI.
      Experiment Fertility
        DisabledSimNames=[ClimateSiteSamford, ClimateSiteIpswich, ClimateSiteGatton, ClimateSiteDalby]
        Factors
          Factor Level: Specification=[Organic]
            Organic High: FOMCNRatio=60; CarbonUnits=Total
              Thickness  Carbon  SoilCNRatio  FBiom  FInert  FOM
              100        3       12           0.03   0.1     0.29407
              300        2       12           0.02   0.2     0.253108
              600        0.5     12           0.02   1       0.187507
              1000       0.2     12           0.01   1       0.113729
              1000       0.12    12           0.01   1       0.06898
              1000       0.1     12           0.01   1       0.0418385
              1000       0.1     12           0.01   1       0.0253763
              1000       0.1     12           0.01   1       0.0153915
            Organic Medium: FOMCNRatio=60; CarbonUnits=Total
              Thickness  Carbon  SoilCNRatio  FBiom  FInert  FOM
              100        2       15           0.03   0.25    0.29407
              300        1       15           0.02   0.5     0.253108
              600        0.5     15           0.02   1       0.187507
              1000       0.2     15           0.01   1       0.113729
              1000       0.12    15           0.01   1       0.06898
              1000       0.1     15           0.01   1       0.0418385
              1000       0.1     15           0.01   1       0.0253763
              1000       0.1     15           0.01   1       0.0153915
            Organic Low: FOMCNRatio=60; CarbonUnits=Total
              Thickness  Carbon  SoilCNRatio  FBiom  FInert  FOM
              100        1       18           0.03   0.5     0.29407
              300        0.75    18           0.02   0.66    0.253108
              600        0.5     18           0.02   1       0.187507
              1000       0.2     18           0.01   1       0.113729
              1000       0.12    18           0.01   1       0.06898
              1000       0.1     18           0.01   1       0.0418385
              1000       0.1     18           0.01   1       0.0253763
              1000       0.1     18           0.01   1       0.0153915
        Simulation FertilityBase
          Weather: FileName=MountWorth.met
          Clock: Start=1940-01-01; End=2015-12-31
          Summary
          SoilArbitrator Soil Arbitrator
          Zone Plantation: Area=1; Slope=0; AspectAngle=0; Altitude=50
            Soil: Latitude=0; Longitude=0
              Water: Thickness=[100, 300, 600, 1000, 1000, 1000, 1000, 1000]; InitialValues=[0.13, 0.13, 0.13, 0.13, 0.13, 0.13, 0.13, 0.13]; FilledFromTop=false
              Physical: same as Sensibility.MAI in SE Australia.MountWorth.Plantation.Soil.Physical
              WaterBalance SoilWater: same as Sensibility.MAI in SE Australia.MountWorth.Plantation.Soil.SoilWater
              Organic: same as Sensibility.Response to Soil Fertility.Fertility.Factors.Level.High
              Chemical: Thickness=[100, 300, 600, 1000, 1000, 1000, 1000, 1000]; PH=[5.8, 5.7, 5.7, 5.9, 5.7, 5.7, 5.7, 5.7]; PHUnits=Water
              Nutrient
              Solute NO3: same as Sensibility.MAI in SE Australia.MountWorth.Plantation.Soil.NO3
              Solute NH4: same as Sensibility.MAI in SE Australia.MountWorth.Plantation.Soil.NH4
              Solute Urea: same as Sensibility.MAI in SE Australia.MountWorth.Plantation.Soil.Urea
              SoilTemperature Temperature: InteractionsPerDay=8
            Irrigation
            Fertiliser
            MicroClimate: a_interception=0; b_interception=0; c_interception=0.45; d_interception=0; SoilHeatFluxFraction=0; MinimumHeightDiffForNewLayer=0; NightInterceptionFraction=0; ReferenceHeight=2
            Report SensibilityReport: VariableNames=[Clock].Today; EventNames=[Clock].DoReport
            Manager TreeThinning: same as Sensibility.MAI in SE Australia.MountWorth.Plantation.TreeThinning
            Manager TreeTransplantRule
              RowSpace = 2.71
              RowWidth = 3.7
              CultivarName = BFG
              SowingDate = 01/01/1940 00:00:00
              script: same as in Validation.Temperate.BFG.BF.BFG.Plantation.TreeSowingRule
            Plant Pinus
            SurfaceOrganicMatter: InitialResidueName=Pinus; InitialResidueType=Eucalyptus; InitialResidueMass=0; InitialStandingFraction=0; InitialCPR=0; InitialCNR=0
    Folder Reponse to N Fertilizer
      Memo
        Pinus response to rate of N fertiliser are often asymptotic, the plateau of which is determined by other limiting factors. In the sensibility test presented here, an infertile soil at Stockdale, Victoria, Australia, was used as the basis for the simulations _P. radiata_ was fertilised at 3 years of age and stem volume assessed at 26 years of age.

        Operationally, _P. radiata_ plantations in Australia receive several hundered kg N/ha during a rotation. The approximate optimum rate simulated (90% of maximum) was 900 kg N/ha, which is therefore within the range of expectation.
      Experiment Stockdale
        Factors
          Factor N: Specification=[Operations]
            Operations 0
              1993-07-15  [Fertiliser].Apply(0, "NH4N", 0);
            Operations 100
              1993-07-15  [Fertiliser].Apply(amount: 100, type: "NO3N")
            Operations 200
              1993-07-15  [Fertiliser].Apply(amount: 200, type: "NO3N")
            Operations 400
              1993-07-15  [Fertiliser].Apply(amount: 400, type: "NO3N")
            Operations 800
              1993-07-15  [Fertiliser].Apply(amount: 800, type: "NO3N")
            Operations 1000
              1993-07-15  [Fertiliser].Apply(amount: 1000, type: "NO3N")
            Operations 2000
              1993-07-15  [Fertiliser].Apply(amount: 2000, type: "NO3N")
            Operations 3000
              1993-07-15  [Fertiliser].Apply(amount: 3000, type: "NO3N")
        Simulation StockdalePradiataNrate
          Weather: FileName=Stockdale.met
          Clock: Start=1990-01-01; End=2015-12-31
          Summary
          SoilArbitrator Soil Arbitrator
          Zone Plantation: Area=1; Slope=0; AspectAngle=0; Altitude=50
            Soil: Latitude=0; Longitude=0
              Water: Thickness=[100, 300, 600, 1000, 1000, 1000, 1000, 1000]; InitialValues=[0.13, 0.13, 0.13, 0.13, 0.13, 0.13, 0.13, 0.13]; FilledFromTop=false
              Physical: same as Sensibility.MAI in SE Australia.Tostaree.Plantation.Soil.Physical
              WaterBalance SoilWater: same as Sensibility.MAI in SE Australia.MountWorth.Plantation.Soil.SoilWater
              Organic: FOMCNRatio=60; CarbonUnits=Total
                Thickness  Carbon  SoilCNRatio  FBiom  FInert  FOM
                100        1.5     15           0.03   0.3     0.29407
                300        0.7     15           0.02   0.4     0.253108
                600        0.1     15           0.02   0.5     0.187507
                1000       0.2     15           0.01   1       0.113729
                1000       0.12    15           0.01   1       0.06898
                1000       0.1     15           0.01   1       0.0418385
                1000       0.1     15           0.01   1       0.0253763
                1000       0.1     15           0.01   1       0.0153915
              Chemical: Thickness=[100, 300, 600, 1000, 1000, 1000, 1000, 1000]; PH=[5.8, 5.7, 5.7, 5.9, 5.7, 5.7, 5.7, 5.7]; PHUnits=Water
              Nutrient
              Solute NO3: same as Sensibility.MAI in SE Australia.MountWorth.Plantation.Soil.NO3
              Solute NH4: same as Sensibility.MAI in SE Australia.MountWorth.Plantation.Soil.NH4
              Solute Urea: same as Sensibility.MAI in SE Australia.MountWorth.Plantation.Soil.Urea
              SoilTemperature Temperature: InteractionsPerDay=8
            Irrigation
            Fertiliser
            MicroClimate: a_interception=0; b_interception=0; c_interception=0.45; d_interception=0; SoilHeatFluxFraction=0; MinimumHeightDiffForNewLayer=0; NightInterceptionFraction=0; ReferenceHeight=2
            Manager TreeTransplantRule
              RowSpace = 2.71
              RowWidth = 3.7
              CultivarName = BFG
              SowingDate = 06/01/1990 00:00:00
              script: same as in Validation.Temperate.BFG.BF.BFG.Plantation.TreeSowingRule
            Report SensibilityReport: VariableNames=[Clock].Today; EventNames=[Clock].DoReport
            Manager TreeThinning: same as Sensibility.MAI in SE Australia.MountWorth.Plantation.TreeThinning
            Plant Pinus
            SurfaceOrganicMatter: InitialResidueName=Pinus; InitialResidueType=Eucalyptus; InitialResidueMass=0; InitialStandingFraction=0; InitialCPR=0; InitialCNR=0
            Operations
    Folder GxE
      Memo
        These graphs show the simulated yields (MAI) of all genotypes in the model grown for 26 years at northern and southern contrasting sites in Australia (Toolara and TowerHill). There is a tendency for Australian genotypes of _P. radiata_ (TowerHill and BFG) to grow best in southern Australia, as expected, and conersely Australian tropical and sub-tropical genotypes (e.g. elliottiiXcaribaeaF1) to grow best in northern Australia. The New Zealand genotype (GF7) was simulated to grow best in the long-term at both locations, and the USA genotypes were worst. A wide ranage of yield potentials and patterns are therefore available.

        Although the MAI values are generally as expected for all genotypes of _P. radaita_ [#turvey1983soil] and others, this analysis raises some questions that could help focus further model improvements.

        Calibration of the model focussed on Australian datasets.

        The elliottiiIMPAC and taedaIMPAC genotypes simulate noticably reduced preformace at later ages. This is probably a consequence of simulations at the IMPAC site in Florida only going to 18 years of age for calibration, as thereafter stocking (and probably vigour of survivors) decreased considerably due to disease, which could not be simulated.

        Calibration of the GF7 genotype of _P. radiata_ for the Puruki site in New Zealand went only 12 years of age as stocking thereafter went to very low values which was not a focus of the calibrations needed for Australia. If such low stocking values need to be calibrated for in future, one might need to explore biomass allocation a function stocking (population) to attain better model skill in these circumstances.

        Several Australian genotypes performed similarly during simulations, indicating little practical difference in their calibration and therefore scope for merging, e.g. the elliottiiXcaribaeaF1 and elliottiiXcaribaeaF2 genotypes.

        One would expect more discrimination than simulated between temperate and other genotypes when simulating growth at these northern and southern extremes of commercial plantations in Australia. To achieve that though model capability might be need for disease occurance and impacts on survival and growth, which beyond the current scope of validation.

        Note that due to the long-term nature of plantation forestry, observed datasets are necessarily old and probably using out-dated genotypes. Therefore, using the genotypes curently available in the model might not be appropriate for simulating the performance of current or future plantations.
      Experiment GxE
        Factors
          Permutation
            Factor Site
              CompositeFactor TowerHill
                Specifications:
                  [Weather]
                  [Soil]
                Weather: FileName=TowerHill1900-2020SiloDataDrillModified.met
                Soil: same as Sensibility.MAI in SE Australia.MountWorth.Plantation.Soil
              CompositeFactor Toolara
                Specifications:
                  [Weather]
                  [Soil]
                Weather: FileName=Toolara1900-2020.met
                Soil: same as Sensibility.MAI in SE Australia.MountWorth.Plantation.Soil
            Factor Clone
              Specification=[TreeManagement].Script.CultivarName = caribaea, elliottii, PEE, elliottiiIMPAC, elliottiiQLD, elliottiiXcaribaeaF1, elliottiiXcaribaeaF2, taeda, taedaIMPAC, BFG, GF7, TowerHill
        Simulation GxEBase
          Weather: FileName=MountWorth.met
          Manager ClimateController: same as Sensibility.Response to Rainfall.Climate.ResponseToRainfall.ClimateController
          Clock: Start=1990-01-01; End=2015-12-31
          Summary
          SoilArbitrator Soil Arbitrator
          Zone Plantation: Area=1; Slope=0; AspectAngle=0; Altitude=50
            Soil: same as Sensibility.MAI in SE Australia.MountWorth.Plantation.Soil
            Irrigation
            Fertiliser
            MicroClimate: a_interception=0; b_interception=0; c_interception=0.45; d_interception=0; SoilHeatFluxFraction=0; MinimumHeightDiffForNewLayer=0; NightInterceptionFraction=0; ReferenceHeight=2
            Report SensibilityReport: VariableNames=[Clock].Today; EventNames=[Clock].DoReport
            Manager TreeThinning: same as Sensibility.MAI in SE Australia.MountWorth.Plantation.TreeThinning
            Plant Pinus
            SurfaceOrganicMatter: InitialResidueName=Pinus; InitialResidueType=Eucalyptus; InitialResidueMass=0; InitialStandingFraction=0; InitialCPR=0; InitialCNR=0
            Manager TreeManagement
              RowSpace = 3
              RowWidth = 3
              CultivarName = elliottiiXcaribaeaF1
              PlantingDate = 10-Feb
              HarvestAge = 30
              FertAmount = 200
```csharp
using Models.Soils;
using System;
using Models.Core;
using Models.PMF;
using APSIM.Shared.Utilities;

namespace Models
{
    [Serializable] 
    [System.Xml.Serialization.XmlInclude(typeof(Model))]
    public class Script : Model
    {
        [Link] Plant Plant;
        [Link] Clock Clock;
        [Link] Fertiliser Fertiliser;

        public double TimeSincePlanting {get; set;}

        [Description("Spacing (m) between plants within rows")]
        public double RowSpace { get; set; }

        [Description("Spacing (m) between rows")]
        public double RowWidth { get; set; }

        [Description("Cultivar")]
        [Display(Type=DisplayType.CultivarName)]
        public string CultivarName { get; set; }

        [Description("Planting Date (dd-mmm)")]
        public String PlantingDate { get; set; }

        [Description("Harvest Age (years)")]
        public double HarvestAge { get; set; }

        [Description("Amount of fertiliser N to be applied at planting (kg N/ha)")]
        public double FertAmount { get; set; }

        [EventSubscribe("DoManagement")]
        private void OnDoManagement(object sender, EventArgs e)
        {
            double PlantPopulation = 1 / (RowWidth * RowSpace);
            double RowWidthmm = RowWidth * 1000;

            if (DateUtilities.WithinDates(PlantingDate, Clock.Today, PlantingDate) && !Plant.IsAlive)
            {
                Plant.Sow(population: PlantPopulation, 
                    cultivar: CultivarName, 
                    depth: 100, 
                    rowSpacing: RowWidthmm);
                TimeSincePlanting = 0;
                Fertiliser.Apply(amount: FertAmount, type: "NO3N");
            }

            if (TimeSincePlanting > HarvestAge && Plant.IsAlive)
            {
               Plant.Harvest();
               Plant.EndCrop();         
               TimeSincePlanting = 0;  
            }

            TimeSincePlanting += 1.0/365.0;
        }
    }
}
```
            Manager Fertilise on fixed dates
              FertiliserType = NO3N
              FertiliserDates = 10-Feb
              Amount = 300
              AmountType = False
              script: same as in Validation.Temperate.FSA704.FSA704.Plantation.Fertilise on fixed dates
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